<neuroml xmlns="http://www.neuroml.org/schema/neuroml2"  xmlns:xs="http://www.w3.org/2001/XMLSchema" xmlns:xsi="http://www.w3.org/2001/XMLSchema-instance" xsi:schemaLocation="http://www.neuroml.org/schema/neuroml2 https://raw.github.com/NeuroML/NeuroML2/development/Schemas/NeuroML2/NeuroML_v2.3.xsd" id="HL23Network">
    <include href="rotated_cells/HL23PYR_0.cell.nml"/>
    <include href="rotated_cells/HL23PYR_12.cell.nml"/>
    <include href="rotated_cells/HL23SST_804.cell.nml"/>
    <include href="rotated_cells/HL23SST_816.cell.nml"/>
    <include href="rotated_cells/HL23PV_852.cell.nml"/>
    <include href="rotated_cells/HL23PV_864.cell.nml"/>
    <include href="rotated_cells/HL23VIP_924.cell.nml"/>
    <include href="rotated_cells/HL23VIP_936.cell.nml"/>
    <network id="HL23Network" temperature="34.0 degC">
        <notes>L23 network at 0.001 scale</notes>
        <population id="HL23PYR_pop_0" component="HL23PYR_0" type="populationList">
            <property tag="region" value="L23"/>
            <instance id="0">
                <location x="-221.223306399760617" y="84.192327970444907" z="-841.488627155949189"/>
            </instance>
        </population>
        <population id="HL23PYR_pop_12" component="HL23PYR_12" type="populationList">
            <property tag="region" value="L23"/>
            <instance id="0">
                <location x="-240.786800061964072" y="-49.499686844429959" z="-1456.113008141983755"/>
            </instance>
        </population>
        <population id="HL23SST_pop_804" component="HL23SST_804" type="populationList">
            <property tag="region" value="L23"/>
            <instance id="0">
                <location x="106.350954605553099" y="-214.951800779721538" z="-645.5753185087774"/>
            </instance>
        </population>
        <population id="HL23SST_pop_816" component="HL23SST_816" type="populationList">
            <property tag="region" value="L23"/>
            <instance id="0">
                <location x="-206.462723262819111" y="-23.384348836400449" z="-675.156452413023658"/>
            </instance>
        </population>
        <population id="HL23PV_pop_852" component="HL23PV_852" type="populationList">
            <property tag="region" value="L23"/>
            <instance id="0">
                <location x="-65.390056656730806" y="-116.993532553848922" z="-946.991073553129127"/>
            </instance>
        </population>
        <population id="HL23PV_pop_864" component="HL23PV_864" type="populationList">
            <property tag="region" value="L23"/>
            <instance id="0">
                <location x="110.372916240357171" y="-23.733806935129497" z="-918.42937440240803"/>
            </instance>
        </population>
        <population id="HL23VIP_pop_924" component="HL23VIP_924" type="populationList">
            <property tag="region" value="L23"/>
            <instance id="0">
                <location x="155.238762493285833" y="108.47285030975101" z="-620.439995080828112"/>
            </instance>
        </population>
        <population id="HL23VIP_pop_936" component="HL23VIP_936" type="populationList">
            <property tag="region" value="L23"/>
            <instance id="0">
                <location x="118.727725395658069" y="115.43567054935167" z="-910.081605547348772"/>
            </instance>
        </population>
        <projection id="proj_12_936" presynapticPopulation="HL23PYR_pop_12" postsynapticPopulation="HL23VIP_pop_936" synapse="HL23PYR_HL23VIP_ProbAMPANMDA">
            <connectionWD id="0" preCellId="../HL23PYR_pop_12/0/HL23PYR_12" postCellId="../HL23VIP_pop_936/0/HL23VIP_936" postSegmentId="1328" postFractionAlong="0.956868424265085" weight="1.0" delay="0.5 ms"/>
            <connectionWD id="1" preCellId="../HL23PYR_pop_12/0/HL23PYR_12" postCellId="../HL23VIP_pop_936/0/HL23VIP_936" postSegmentId="771" postFractionAlong="0.748000334417454" weight="1.0" delay="0.5 ms"/>
            <connectionWD id="2" preCellId="../HL23PYR_pop_12/0/HL23PYR_12" postCellId="../HL23VIP_pop_936/0/HL23VIP_936" postSegmentId="1482" postFractionAlong="0.266769619757607" weight="1.0" delay="0.5 ms"/>
            <connectionWD id="3" preCellId="../HL23PYR_pop_12/0/HL23PYR_12" postCellId="../HL23VIP_pop_936/0/HL23VIP_936" postSegmentId="163" postFractionAlong="0.531743529670273" weight="1.0" delay="0.5 ms"/>
        </projection>
        <projection id="proj_804_852" presynapticPopulation="HL23SST_pop_804" postsynapticPopulation="HL23PV_pop_852" synapse="HL23SST_HL23PV_ProbUDFsyn">
            <connectionWD id="0" preCellId="../HL23SST_pop_804/0/HL23SST_804" postCellId="../HL23PV_pop_852/0/HL23PV_852" postSegmentId="3943" postFractionAlong="0.621795852458034" weight="1.0" delay="0.5 ms"/>
            <connectionWD id="1" preCellId="../HL23SST_pop_804/0/HL23SST_804" postCellId="../HL23PV_pop_852/0/HL23PV_852" postSegmentId="2267" postFractionAlong="0.396584022732885" weight="1.0" delay="0.5 ms"/>
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        </projection>
        <projection id="proj_804_864" presynapticPopulation="HL23SST_pop_804" postsynapticPopulation="HL23PV_pop_864" synapse="HL23SST_HL23PV_ProbUDFsyn">
            <connectionWD id="0" preCellId="../HL23SST_pop_804/0/HL23SST_804" postCellId="../HL23PV_pop_864/0/HL23PV_864" postSegmentId="4147" postFractionAlong="0.493419517711815" weight="1.0" delay="0.5 ms"/>
            <connectionWD id="1" preCellId="../HL23SST_pop_804/0/HL23SST_804" postCellId="../HL23PV_pop_864/0/HL23PV_864" postSegmentId="1603" postFractionAlong="0.501907483866568" weight="1.0" delay="0.5 ms"/>
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        </projection>
        <projection id="proj_852_12" presynapticPopulation="HL23PV_pop_852" postsynapticPopulation="HL23PYR_pop_12" synapse="HL23PV_HL23PYR_ProbUDFsyn">
            <connectionWD id="0" preCellId="../HL23PV_pop_852/0/HL23PV_852" postCellId="../HL23PYR_pop_12/0/HL23PYR_12" postSegmentId="985" postFractionAlong="0.085721380944096" weight="1.0" delay="0.5 ms"/>
            <connectionWD id="1" preCellId="../HL23PV_pop_852/0/HL23PV_852" postCellId="../HL23PYR_pop_12/0/HL23PYR_12" postSegmentId="1223" postFractionAlong="0.410867271269559" weight="1.0" delay="0.5 ms"/>
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        </projection>
        <projection id="proj_936_804" presynapticPopulation="HL23VIP_pop_936" postsynapticPopulation="HL23SST_pop_804" synapse="HL23VIP_HL23SST_ProbUDFsyn">
            <connectionWD id="0" preCellId="../HL23VIP_pop_936/0/HL23VIP_936" postCellId="../HL23SST_pop_804/0/HL23SST_804" postSegmentId="2610" postFractionAlong="0.860121736261316" weight="1.0" delay="0.5 ms"/>
            <connectionWD id="1" preCellId="../HL23VIP_pop_936/0/HL23VIP_936" postCellId="../HL23SST_pop_804/0/HL23SST_804" postSegmentId="1092" postFractionAlong="0.615406750957362" weight="1.0" delay="0.5 ms"/>
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        </projection>
        <projection id="proj_936_816" presynapticPopulation="HL23VIP_pop_936" postsynapticPopulation="HL23SST_pop_816" synapse="HL23VIP_HL23SST_ProbUDFsyn">
            <connectionWD id="0" preCellId="../HL23VIP_pop_936/0/HL23VIP_936" postCellId="../HL23SST_pop_816/0/HL23SST_816" postSegmentId="2776" postFractionAlong="0.559737040083994" weight="1.0" delay="0.5 ms"/>
            <connectionWD id="1" preCellId="../HL23VIP_pop_936/0/HL23VIP_936" postCellId="../HL23SST_pop_816/0/HL23SST_816" postSegmentId="2855" postFractionAlong="0.38838956881838" weight="1.0" delay="0.5 ms"/>
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        </projection>
        <projection id="proj_936_852" presynapticPopulation="HL23VIP_pop_936" postsynapticPopulation="HL23PV_pop_852" synapse="HL23VIP_HL23PV_ProbUDFsyn">
            <connectionWD id="0" preCellId="../HL23VIP_pop_936/0/HL23VIP_936" postCellId="../HL23PV_pop_852/0/HL23PV_852" postSegmentId="3653" postFractionAlong="0.553542564252773" weight="1.0" delay="0.5 ms"/>
            <connectionWD id="1" preCellId="../HL23VIP_pop_936/0/HL23VIP_936" postCellId="../HL23PV_pop_852/0/HL23PV_852" postSegmentId="2893" postFractionAlong="0.480366081530362" weight="1.0" delay="0.5 ms"/>
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        </projection>
        <inputList id="Gfluct_0" population="HL23PYR_pop_0" component="Gfluct_HL23PYR_0_5">
            <input id="0" target="../HL23PYR_pop_0/0/HL23PYR_0" destination="synapses" segmentId="905" fractionAlong="0.885114796445408"/>
            <input id="1" target="../HL23PYR_pop_0/0/HL23PYR_0" destination="synapses" segmentId="1205" fractionAlong="0.851171143911959"/>
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        </inputList>
        <inputList id="Gfluct_1" population="HL23PYR_pop_0" component="Gfluct_HL23PYR_0_1">
            <input id="18" target="../HL23PYR_pop_0/0/HL23PYR_0" destination="synapses" segmentId="5626" fractionAlong="0.9431395536055"/>
            <input id="19" target="../HL23PYR_pop_0/0/HL23PYR_0" destination="synapses" segmentId="2132" fractionAlong="0.953249395378716"/>
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        </inputList>
        <inputList id="Gfluct_2" population="HL23PYR_pop_0" component="Gfluct_HL23PYR_0_3">
            <input id="27" target="../HL23PYR_pop_0/0/HL23PYR_0" destination="synapses" segmentId="2316" fractionAlong="0.982179433270446"/>
            <input id="28" target="../HL23PYR_pop_0/0/HL23PYR_0" destination="synapses" segmentId="4965" fractionAlong="0.919038444753989"/>
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        </inputList>
        <inputList id="Gfluct_3" population="HL23PYR_pop_0" component="Gfluct_HL23PYR_0_7">
            <input id="38" target="../HL23PYR_pop_0/0/HL23PYR_0" destination="synapses" segmentId="3938" fractionAlong="0.516208173623192"/>
            <input id="39" target="../HL23PYR_pop_0/0/HL23PYR_0" destination="synapses" segmentId="4371" fractionAlong="0.990298519967635"/>
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        </inputList>
        <inputList id="Gfluct_4" population="HL23PYR_pop_0" component="Gfluct_HL23PYR_0_9">
            <input id="50" target="../HL23PYR_pop_0/0/HL23PYR_0" destination="synapses" segmentId="2813" fractionAlong="0.971705983774493"/>
            <input id="51" target="../HL23PYR_pop_0/0/HL23PYR_0" destination="synapses" segmentId="4551" fractionAlong="0.824427134963368"/>
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        </inputList>
        <inputList id="Gfluct_5" population="HL23PYR_pop_12" component="Gfluct_HL23PYR_0_5">
            <input id="57" target="../HL23PYR_pop_12/0/HL23PYR_12" destination="synapses" segmentId="905" fractionAlong="0.885114796445408"/>
            <input id="58" target="../HL23PYR_pop_12/0/HL23PYR_12" destination="synapses" segmentId="1205" fractionAlong="0.851171143911959"/>
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        </inputList>
        <inputList id="Gfluct_6" population="HL23PYR_pop_12" component="Gfluct_HL23PYR_0_1">
            <input id="75" target="../HL23PYR_pop_12/0/HL23PYR_12" destination="synapses" segmentId="5626" fractionAlong="0.9431395536055"/>
            <input id="76" target="../HL23PYR_pop_12/0/HL23PYR_12" destination="synapses" segmentId="2132" fractionAlong="0.953249395378716"/>
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        </inputList>
        <inputList id="Gfluct_7" population="HL23PYR_pop_12" component="Gfluct_HL23PYR_0_3">
            <input id="84" target="../HL23PYR_pop_12/0/HL23PYR_12" destination="synapses" segmentId="2316" fractionAlong="0.982179433270446"/>
            <input id="85" target="../HL23PYR_pop_12/0/HL23PYR_12" destination="synapses" segmentId="4965" fractionAlong="0.919038444753989"/>
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        </inputList>
        <inputList id="Gfluct_8" population="HL23PYR_pop_12" component="Gfluct_HL23PYR_0_7">
            <input id="95" target="../HL23PYR_pop_12/0/HL23PYR_12" destination="synapses" segmentId="3938" fractionAlong="0.516208173623192"/>
            <input id="96" target="../HL23PYR_pop_12/0/HL23PYR_12" destination="synapses" segmentId="4371" fractionAlong="0.990298519967635"/>
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        </inputList>
        <inputList id="Gfluct_9" population="HL23PYR_pop_12" component="Gfluct_HL23PYR_0_9">
            <input id="107" target="../HL23PYR_pop_12/0/HL23PYR_12" destination="synapses" segmentId="2813" fractionAlong="0.971705983774493"/>
            <input id="108" target="../HL23PYR_pop_12/0/HL23PYR_12" destination="synapses" segmentId="4551" fractionAlong="0.824427134963368"/>
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        </inputList>
        <inputList id="Gfluct_10" population="HL23SST_pop_804" component="Gfluct_HL23SST_0_5">
            <input id="114" target="../HL23SST_pop_804/0/HL23SST_804" destination="synapses" segmentId="2955" fractionAlong="0.992363905920124"/>
            <input id="115" target="../HL23SST_pop_804/0/HL23SST_804" destination="synapses" segmentId="3013" fractionAlong="0.926913586159216"/>
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        </inputList>
        <inputList id="Gfluct_11" population="HL23SST_pop_816" component="Gfluct_HL23SST_0_5">
            <input id="134" target="../HL23SST_pop_816/0/HL23SST_816" destination="synapses" segmentId="2955" fractionAlong="0.992363905920124"/>
            <input id="135" target="../HL23SST_pop_816/0/HL23SST_816" destination="synapses" segmentId="3013" fractionAlong="0.926913586159216"/>
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        </inputList>
        <inputList id="Gfluct_12" population="HL23PV_pop_852" component="Gfluct_HL23PV_0_5">
            <input id="154" target="../HL23PV_pop_852/0/HL23PV_852" destination="synapses" segmentId="1836" fractionAlong="0.991164515108885"/>
            <input id="155" target="../HL23PV_pop_852/0/HL23PV_852" destination="synapses" segmentId="3272" fractionAlong="0.937324870527937"/>
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        </inputList>
        <inputList id="Gfluct_13" population="HL23PV_pop_864" component="Gfluct_HL23PV_0_5">
            <input id="165" target="../HL23PV_pop_864/0/HL23PV_864" destination="synapses" segmentId="1836" fractionAlong="0.991164515108885"/>
            <input id="166" target="../HL23PV_pop_864/0/HL23PV_864" destination="synapses" segmentId="3272" fractionAlong="0.937324870527937"/>
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        </inputList>
        <inputList id="Gfluct_14" population="HL23VIP_pop_924" component="Gfluct_HL23VIP_0_5">
            <input id="176" target="../HL23VIP_pop_924/0/HL23VIP_924" destination="synapses" segmentId="1218" fractionAlong="0.98143834656655"/>
            <input id="177" target="../HL23VIP_pop_924/0/HL23VIP_924" destination="synapses" segmentId="2340" fractionAlong="0.865477716974497"/>
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        </inputList>
        <inputList id="Gfluct_15" population="HL23VIP_pop_936" component="Gfluct_HL23VIP_0_5">
            <input id="192" target="../HL23VIP_pop_936/0/HL23VIP_936" destination="synapses" segmentId="1218" fractionAlong="0.98143834656655"/>
            <input id="193" target="../HL23VIP_pop_936/0/HL23VIP_936" destination="synapses" segmentId="2340" fractionAlong="0.865477716974497"/>
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        </inputList>
    </network>
</neuroml>
