<neuroml xmlns="http://www.neuroml.org/schema/neuroml2"  xmlns:xs="http://www.w3.org/2001/XMLSchema" xmlns:xsi="http://www.w3.org/2001/XMLSchema-instance" xsi:schemaLocation="http://www.neuroml.org/schema/neuroml2 https://raw.github.com/NeuroML/NeuroML2/development/Schemas/NeuroML2/NeuroML_v2.3.xsd" id="HL23Network">
    <include href="rotated_cells/HL23PYR_0.cell.nml"/>
    <include href="rotated_cells/HL23PYR_397.cell.nml"/>
    <include href="rotated_cells/HL23PYR_794.cell.nml"/>
    <include href="rotated_cells/HL23PYR_388.cell.nml"/>
    <include href="rotated_cells/HL23PYR_785.cell.nml"/>
    <include href="rotated_cells/HL23PYR_379.cell.nml"/>
    <include href="rotated_cells/HL23PYR_776.cell.nml"/>
    <include href="rotated_cells/HL23PYR_394.cell.nml"/>
    <include href="rotated_cells/HL23SST_804.cell.nml"/>
    <include href="rotated_cells/HL23SST_816.cell.nml"/>
    <include href="rotated_cells/HL23PV_852.cell.nml"/>
    <include href="rotated_cells/HL23PV_864.cell.nml"/>
    <include href="rotated_cells/HL23VIP_924.cell.nml"/>
    <include href="rotated_cells/HL23VIP_936.cell.nml"/>
    <network id="HL23Network" temperature="34.0 degC">
        <notes>L23 network at 0.01 scale</notes>
        <population id="HL23PYR_pop_0" component="HL23PYR_0" type="populationList">
            <property tag="region" value="L23"/>
            <instance id="0">
                <location x="-221.223306399760617" y="84.192327970444907" z="-841.488627155949189"/>
            </instance>
        </population>
        <population id="HL23PYR_pop_397" component="HL23PYR_397" type="populationList">
            <property tag="region" value="L23"/>
            <instance id="0">
                <location x="186.711303919687111" y="-108.088098299224441" z="-842.085796297591742"/>
            </instance>
        </population>
        <population id="HL23PYR_pop_794" component="HL23PYR_794" type="populationList">
            <property tag="region" value="L23"/>
            <instance id="0">
                <location x="-171.332036406190724" y="174.281129262744628" z="-983.946214887313204"/>
            </instance>
        </population>
        <population id="HL23PYR_pop_388" component="HL23PYR_388" type="populationList">
            <property tag="region" value="L23"/>
            <instance id="0">
                <location x="-65.680911263546363" y="-235.799658273611328" z="-705.129130001679641"/>
            </instance>
        </population>
        <population id="HL23PYR_pop_785" component="HL23PYR_785" type="populationList">
            <property tag="region" value="L23"/>
            <instance id="0">
                <location x="193.859487156738453" y="-141.113442226513342" z="-1289.199460195959091"/>
            </instance>
        </population>
        <population id="HL23PYR_pop_379" component="HL23PYR_379" type="populationList">
            <property tag="region" value="L23"/>
            <instance id="0">
                <location x="29.567558509365654" y="103.017517718606726" z="-1206.155865497995592"/>
            </instance>
        </population>
        <population id="HL23PYR_pop_776" component="HL23PYR_776" type="populationList">
            <property tag="region" value="L23"/>
            <instance id="0">
                <location x="-71.604517751624186" y="37.946322703901245" z="-1367.531552376586433"/>
            </instance>
        </population>
        <population id="HL23PYR_pop_394" component="HL23PYR_394" type="populationList">
            <property tag="region" value="L23"/>
            <instance id="0">
                <location x="91.580909358024982" y="65.813723334521015" z="-620.4714273751772"/>
            </instance>
        </population>
        <population id="HL23SST_pop_804" component="HL23SST_804" type="populationList">
            <property tag="region" value="L23"/>
            <instance id="0">
                <location x="106.350954605553099" y="-214.951800779721538" z="-645.5753185087774"/>
            </instance>
        </population>
        <population id="HL23SST_pop_816" component="HL23SST_816" type="populationList">
            <property tag="region" value="L23"/>
            <instance id="0">
                <location x="-206.462723262819111" y="-23.384348836400449" z="-675.156452413023658"/>
            </instance>
        </population>
        <population id="HL23PV_pop_852" component="HL23PV_852" type="populationList">
            <property tag="region" value="L23"/>
            <instance id="0">
                <location x="-65.390056656730806" y="-116.993532553848922" z="-946.991073553129127"/>
            </instance>
        </population>
        <population id="HL23PV_pop_864" component="HL23PV_864" type="populationList">
            <property tag="region" value="L23"/>
            <instance id="0">
                <location x="110.372916240357171" y="-23.733806935129497" z="-918.42937440240803"/>
            </instance>
        </population>
        <population id="HL23VIP_pop_924" component="HL23VIP_924" type="populationList">
            <property tag="region" value="L23"/>
            <instance id="0">
                <location x="155.238762493285833" y="108.47285030975101" z="-620.439995080828112"/>
            </instance>
        </population>
        <population id="HL23VIP_pop_936" component="HL23VIP_936" type="populationList">
            <property tag="region" value="L23"/>
            <instance id="0">
                <location x="118.727725395658069" y="115.43567054935167" z="-910.081605547348772"/>
            </instance>
        </population>
        <projection id="proj_394_0" presynapticPopulation="HL23PYR_pop_394" postsynapticPopulation="HL23PYR_pop_0" synapse="HL23PYR_HL23PYR_ProbAMPANMDA">
            <connectionWD id="0" preCellId="../HL23PYR_pop_394/0/HL23PYR_394" postCellId="../HL23PYR_pop_0/0/HL23PYR_0" postSegmentId="2731" postFractionAlong="0.414971335505089" weight="1.0" delay="0.5 ms"/>
            <connectionWD id="1" preCellId="../HL23PYR_pop_394/0/HL23PYR_394" postCellId="../HL23PYR_pop_0/0/HL23PYR_0" postSegmentId="5780" postFractionAlong="0.362606596747227" weight="1.0" delay="0.5 ms"/>
            <connectionWD id="2" preCellId="../HL23PYR_pop_394/0/HL23PYR_394" postCellId="../HL23PYR_pop_0/0/HL23PYR_0" postSegmentId="610" postFractionAlong="0.086443253156169" weight="1.0" delay="0.5 ms"/>
        </projection>
        <projection id="proj_776_397" presynapticPopulation="HL23PYR_pop_776" postsynapticPopulation="HL23PYR_pop_397" synapse="HL23PYR_HL23PYR_ProbAMPANMDA">
            <connectionWD id="0" preCellId="../HL23PYR_pop_776/0/HL23PYR_776" postCellId="../HL23PYR_pop_397/0/HL23PYR_397" postSegmentId="4897" postFractionAlong="0.967479297149906" weight="1.0" delay="0.5 ms"/>
            <connectionWD id="1" preCellId="../HL23PYR_pop_776/0/HL23PYR_776" postCellId="../HL23PYR_pop_397/0/HL23PYR_397" postSegmentId="1306" postFractionAlong="0.884539693839552" weight="1.0" delay="0.5 ms"/>
            <connectionWD id="2" preCellId="../HL23PYR_pop_776/0/HL23PYR_776" postCellId="../HL23PYR_pop_397/0/HL23PYR_397" postSegmentId="4143" postFractionAlong="0.12058294376454" weight="1.0" delay="0.5 ms"/>
        </projection>
        <projection id="proj_394_794" presynapticPopulation="HL23PYR_pop_394" postsynapticPopulation="HL23PYR_pop_794" synapse="HL23PYR_HL23PYR_ProbAMPANMDA">
            <connectionWD id="0" preCellId="../HL23PYR_pop_394/0/HL23PYR_394" postCellId="../HL23PYR_pop_794/0/HL23PYR_794" postSegmentId="3089" postFractionAlong="0.869568687302174" weight="1.0" delay="0.5 ms"/>
            <connectionWD id="1" preCellId="../HL23PYR_pop_394/0/HL23PYR_394" postCellId="../HL23PYR_pop_794/0/HL23PYR_794" postSegmentId="4593" postFractionAlong="0.220195018279041" weight="1.0" delay="0.5 ms"/>
            <connectionWD id="2" preCellId="../HL23PYR_pop_394/0/HL23PYR_394" postCellId="../HL23PYR_pop_794/0/HL23PYR_794" postSegmentId="5258" postFractionAlong="0.919359603388131" weight="1.0" delay="0.5 ms"/>
        </projection>
        <projection id="proj_776_794" presynapticPopulation="HL23PYR_pop_776" postsynapticPopulation="HL23PYR_pop_794" synapse="HL23PYR_HL23PYR_ProbAMPANMDA">
            <connectionWD id="0" preCellId="../HL23PYR_pop_776/0/HL23PYR_776" postCellId="../HL23PYR_pop_794/0/HL23PYR_794" postSegmentId="900" postFractionAlong="0.910526191652126" weight="1.0" delay="0.5 ms"/>
            <connectionWD id="1" preCellId="../HL23PYR_pop_776/0/HL23PYR_776" postCellId="../HL23PYR_pop_794/0/HL23PYR_794" postSegmentId="1818" postFractionAlong="0.364157237334001" weight="1.0" delay="0.5 ms"/>
            <connectionWD id="2" preCellId="../HL23PYR_pop_776/0/HL23PYR_776" postCellId="../HL23PYR_pop_794/0/HL23PYR_794" postSegmentId="1491" postFractionAlong="0.625784509795597" weight="1.0" delay="0.5 ms"/>
        </projection>
        <projection id="proj_379_388" presynapticPopulation="HL23PYR_pop_379" postsynapticPopulation="HL23PYR_pop_388" synapse="HL23PYR_HL23PYR_ProbAMPANMDA">
            <connectionWD id="0" preCellId="../HL23PYR_pop_379/0/HL23PYR_379" postCellId="../HL23PYR_pop_388/0/HL23PYR_388" postSegmentId="4686" postFractionAlong="0.730400911073671" weight="1.0" delay="0.5 ms"/>
            <connectionWD id="1" preCellId="../HL23PYR_pop_379/0/HL23PYR_379" postCellId="../HL23PYR_pop_388/0/HL23PYR_388" postSegmentId="4917" postFractionAlong="0.360073474675431" weight="1.0" delay="0.5 ms"/>
            <connectionWD id="2" preCellId="../HL23PYR_pop_379/0/HL23PYR_379" postCellId="../HL23PYR_pop_388/0/HL23PYR_388" postSegmentId="1546" postFractionAlong="0.471756604935747" weight="1.0" delay="0.5 ms"/>
        </projection>
        <projection id="proj_394_388" presynapticPopulation="HL23PYR_pop_394" postsynapticPopulation="HL23PYR_pop_388" synapse="HL23PYR_HL23PYR_ProbAMPANMDA">
            <connectionWD id="0" preCellId="../HL23PYR_pop_394/0/HL23PYR_394" postCellId="../HL23PYR_pop_388/0/HL23PYR_388" postSegmentId="1112" postFractionAlong="0.873049870035784" weight="1.0" delay="0.5 ms"/>
            <connectionWD id="1" preCellId="../HL23PYR_pop_394/0/HL23PYR_394" postCellId="../HL23PYR_pop_388/0/HL23PYR_388" postSegmentId="2343" postFractionAlong="0.543982953630112" weight="1.0" delay="0.5 ms"/>
            <connectionWD id="2" preCellId="../HL23PYR_pop_394/0/HL23PYR_394" postCellId="../HL23PYR_pop_388/0/HL23PYR_388" postSegmentId="2951" postFractionAlong="0.372423087182093" weight="1.0" delay="0.5 ms"/>
        </projection>
        <projection id="proj_776_388" presynapticPopulation="HL23PYR_pop_776" postsynapticPopulation="HL23PYR_pop_388" synapse="HL23PYR_HL23PYR_ProbAMPANMDA">
            <connectionWD id="0" preCellId="../HL23PYR_pop_776/0/HL23PYR_776" postCellId="../HL23PYR_pop_388/0/HL23PYR_388" postSegmentId="4936" postFractionAlong="0.708084173706072" weight="1.0" delay="0.5 ms"/>
            <connectionWD id="1" preCellId="../HL23PYR_pop_776/0/HL23PYR_776" postCellId="../HL23PYR_pop_388/0/HL23PYR_388" postSegmentId="719" postFractionAlong="0.28479210476945" weight="1.0" delay="0.5 ms"/>
            <connectionWD id="2" preCellId="../HL23PYR_pop_776/0/HL23PYR_776" postCellId="../HL23PYR_pop_388/0/HL23PYR_388" postSegmentId="1475" postFractionAlong="0.026093474200562" weight="1.0" delay="0.5 ms"/>
        </projection>
        <projection id="proj_785_388" presynapticPopulation="HL23PYR_pop_785" postsynapticPopulation="HL23PYR_pop_388" synapse="HL23PYR_HL23PYR_ProbAMPANMDA">
            <connectionWD id="0" preCellId="../HL23PYR_pop_785/0/HL23PYR_785" postCellId="../HL23PYR_pop_388/0/HL23PYR_388" postSegmentId="5335" postFractionAlong="0.026384495027209" weight="1.0" delay="0.5 ms"/>
            <connectionWD id="1" preCellId="../HL23PYR_pop_785/0/HL23PYR_785" postCellId="../HL23PYR_pop_388/0/HL23PYR_388" postSegmentId="1373" postFractionAlong="0.743130553308045" weight="1.0" delay="0.5 ms"/>
            <connectionWD id="2" preCellId="../HL23PYR_pop_785/0/HL23PYR_785" postCellId="../HL23PYR_pop_388/0/HL23PYR_388" postSegmentId="788" postFractionAlong="0.784828436648627" weight="1.0" delay="0.5 ms"/>
        </projection>
        <projection id="proj_394_785" presynapticPopulation="HL23PYR_pop_394" postsynapticPopulation="HL23PYR_pop_785" synapse="HL23PYR_HL23PYR_ProbAMPANMDA">
            <connectionWD id="0" preCellId="../HL23PYR_pop_394/0/HL23PYR_394" postCellId="../HL23PYR_pop_785/0/HL23PYR_785" postSegmentId="89" postFractionAlong="0.485446961353405" weight="1.0" delay="0.5 ms"/>
            <connectionWD id="1" preCellId="../HL23PYR_pop_394/0/HL23PYR_394" postCellId="../HL23PYR_pop_785/0/HL23PYR_785" postSegmentId="821" postFractionAlong="0.602803996382105" weight="1.0" delay="0.5 ms"/>
            <connectionWD id="2" preCellId="../HL23PYR_pop_394/0/HL23PYR_394" postCellId="../HL23PYR_pop_785/0/HL23PYR_785" postSegmentId="2021" postFractionAlong="0.558844285601197" weight="1.0" delay="0.5 ms"/>
        </projection>
        <projection id="proj_794_785" presynapticPopulation="HL23PYR_pop_794" postsynapticPopulation="HL23PYR_pop_785" synapse="HL23PYR_HL23PYR_ProbAMPANMDA">
            <connectionWD id="0" preCellId="../HL23PYR_pop_794/0/HL23PYR_794" postCellId="../HL23PYR_pop_785/0/HL23PYR_785" postSegmentId="1986" postFractionAlong="0.42892790330802" weight="1.0" delay="0.5 ms"/>
            <connectionWD id="1" preCellId="../HL23PYR_pop_794/0/HL23PYR_794" postCellId="../HL23PYR_pop_785/0/HL23PYR_785" postSegmentId="3488" postFractionAlong="0.387062137667497" weight="1.0" delay="0.5 ms"/>
            <connectionWD id="2" preCellId="../HL23PYR_pop_794/0/HL23PYR_794" postCellId="../HL23PYR_pop_785/0/HL23PYR_785" postSegmentId="1404" postFractionAlong="0.139575227460775" weight="1.0" delay="0.5 ms"/>
        </projection>
        <projection id="proj_0_776" presynapticPopulation="HL23PYR_pop_0" postsynapticPopulation="HL23PYR_pop_776" synapse="HL23PYR_HL23PYR_ProbAMPANMDA">
            <connectionWD id="0" preCellId="../HL23PYR_pop_0/0/HL23PYR_0" postCellId="../HL23PYR_pop_776/0/HL23PYR_776" postSegmentId="2411" postFractionAlong="0.571112018888472" weight="1.0" delay="0.5 ms"/>
            <connectionWD id="1" preCellId="../HL23PYR_pop_0/0/HL23PYR_0" postCellId="../HL23PYR_pop_776/0/HL23PYR_776" postSegmentId="5353" postFractionAlong="0.817893217164214" weight="1.0" delay="0.5 ms"/>
            <connectionWD id="2" preCellId="../HL23PYR_pop_0/0/HL23PYR_0" postCellId="../HL23PYR_pop_776/0/HL23PYR_776" postSegmentId="1928" postFractionAlong="0.081731899664106" weight="1.0" delay="0.5 ms"/>
        </projection>
        <projection id="proj_394_776" presynapticPopulation="HL23PYR_pop_394" postsynapticPopulation="HL23PYR_pop_776" synapse="HL23PYR_HL23PYR_ProbAMPANMDA">
            <connectionWD id="0" preCellId="../HL23PYR_pop_394/0/HL23PYR_394" postCellId="../HL23PYR_pop_776/0/HL23PYR_776" postSegmentId="4228" postFractionAlong="0.324535923594773" weight="1.0" delay="0.5 ms"/>
            <connectionWD id="1" preCellId="../HL23PYR_pop_394/0/HL23PYR_394" postCellId="../HL23PYR_pop_776/0/HL23PYR_776" postSegmentId="2134" weight="1.0" delay="0.5 ms"/>
            <connectionWD id="2" preCellId="../HL23PYR_pop_394/0/HL23PYR_394" postCellId="../HL23PYR_pop_776/0/HL23PYR_776" postSegmentId="5111" postFractionAlong="0.210693593811559" weight="1.0" delay="0.5 ms"/>
        </projection>
        <projection id="proj_379_816" presynapticPopulation="HL23PYR_pop_379" postsynapticPopulation="HL23SST_pop_816" synapse="HL23PYR_HL23SST_ProbAMPANMDA">
            <connectionWD id="0" preCellId="../HL23PYR_pop_379/0/HL23PYR_379" postCellId="../HL23SST_pop_816/0/HL23SST_816" postSegmentId="1421" postFractionAlong="0.073227554660103" weight="1.0" delay="0.5 ms"/>
            <connectionWD id="1" preCellId="../HL23PYR_pop_379/0/HL23PYR_379" postCellId="../HL23SST_pop_816/0/HL23SST_816" postSegmentId="1658" postFractionAlong="0.432673638403585" weight="1.0" delay="0.5 ms"/>
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        </projection>
        <projection id="proj_776_852" presynapticPopulation="HL23PYR_pop_776" postsynapticPopulation="HL23PV_pop_852" synapse="HL23PYR_HL23PV_ProbAMPANMDA">
            <connectionWD id="0" preCellId="../HL23PYR_pop_776/0/HL23PYR_776" postCellId="../HL23PV_pop_852/0/HL23PV_852" postSegmentId="1757" postFractionAlong="0.203158424921183" weight="1.0" delay="0.5 ms"/>
            <connectionWD id="1" preCellId="../HL23PYR_pop_776/0/HL23PYR_776" postCellId="../HL23PV_pop_852/0/HL23PV_852" postSegmentId="2321" postFractionAlong="0.078219871106718" weight="1.0" delay="0.5 ms"/>
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        </projection>
        <projection id="proj_776_864" presynapticPopulation="HL23PYR_pop_776" postsynapticPopulation="HL23PV_pop_864" synapse="HL23PYR_HL23PV_ProbAMPANMDA">
            <connectionWD id="0" preCellId="../HL23PYR_pop_776/0/HL23PYR_776" postCellId="../HL23PV_pop_864/0/HL23PV_864" postSegmentId="2376" postFractionAlong="0.456071442887983" weight="1.0" delay="0.5 ms"/>
            <connectionWD id="1" preCellId="../HL23PYR_pop_776/0/HL23PYR_776" postCellId="../HL23PV_pop_864/0/HL23PV_864" postSegmentId="4474" postFractionAlong="0.616028482655793" weight="1.0" delay="0.5 ms"/>
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        </projection>
        <projection id="proj_816_794" presynapticPopulation="HL23SST_pop_816" postsynapticPopulation="HL23PYR_pop_794" synapse="HL23SST_HL23PYR_ProbUDFsyn">
            <connectionWD id="0" preCellId="../HL23SST_pop_816/0/HL23SST_816" postCellId="../HL23PYR_pop_794/0/HL23PYR_794" postSegmentId="5076" postFractionAlong="0.352501993911949" weight="1.0" delay="0.5 ms"/>
            <connectionWD id="1" preCellId="../HL23SST_pop_816/0/HL23SST_816" postCellId="../HL23PYR_pop_794/0/HL23PYR_794" postSegmentId="2806" postFractionAlong="0.821970407089754" weight="1.0" delay="0.5 ms"/>
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        </projection>
        <projection id="proj_816_785" presynapticPopulation="HL23SST_pop_816" postsynapticPopulation="HL23PYR_pop_785" synapse="HL23SST_HL23PYR_ProbUDFsyn">
            <connectionWD id="0" preCellId="../HL23SST_pop_816/0/HL23SST_816" postCellId="../HL23PYR_pop_785/0/HL23PYR_785" postSegmentId="4388" postFractionAlong="0.820201817095359" weight="1.0" delay="0.5 ms"/>
            <connectionWD id="1" preCellId="../HL23SST_pop_816/0/HL23SST_816" postCellId="../HL23PYR_pop_785/0/HL23PYR_785" postSegmentId="5060" postFractionAlong="0.509989311475955" weight="1.0" delay="0.5 ms"/>
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        </projection>
        <projection id="proj_804_379" presynapticPopulation="HL23SST_pop_804" postsynapticPopulation="HL23PYR_pop_379" synapse="HL23SST_HL23PYR_ProbUDFsyn">
            <connectionWD id="0" preCellId="../HL23SST_pop_804/0/HL23SST_804" postCellId="../HL23PYR_pop_379/0/HL23PYR_379" postSegmentId="5258" postFractionAlong="0.919359603388131" weight="1.0" delay="0.5 ms"/>
            <connectionWD id="1" preCellId="../HL23SST_pop_804/0/HL23SST_804" postCellId="../HL23PYR_pop_379/0/HL23PYR_379" postSegmentId="2343" postFractionAlong="0.543982953630112" weight="1.0" delay="0.5 ms"/>
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        </projection>
        <projection id="proj_804_852" presynapticPopulation="HL23SST_pop_804" postsynapticPopulation="HL23PV_pop_852" synapse="HL23SST_HL23PV_ProbUDFsyn">
            <connectionWD id="0" preCellId="../HL23SST_pop_804/0/HL23SST_804" postCellId="../HL23PV_pop_852/0/HL23PV_852" postSegmentId="3943" postFractionAlong="0.621795852458034" weight="1.0" delay="0.5 ms"/>
            <connectionWD id="1" preCellId="../HL23SST_pop_804/0/HL23SST_804" postCellId="../HL23PV_pop_852/0/HL23PV_852" postSegmentId="2267" postFractionAlong="0.396584022732885" weight="1.0" delay="0.5 ms"/>
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        </projection>
        <projection id="proj_804_864" presynapticPopulation="HL23SST_pop_804" postsynapticPopulation="HL23PV_pop_864" synapse="HL23SST_HL23PV_ProbUDFsyn">
            <connectionWD id="0" preCellId="../HL23SST_pop_804/0/HL23SST_804" postCellId="../HL23PV_pop_864/0/HL23PV_864" postSegmentId="4147" postFractionAlong="0.493419517711815" weight="1.0" delay="0.5 ms"/>
            <connectionWD id="1" preCellId="../HL23SST_pop_804/0/HL23SST_804" postCellId="../HL23PV_pop_864/0/HL23PV_864" postSegmentId="1603" postFractionAlong="0.501907483866568" weight="1.0" delay="0.5 ms"/>
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        </projection>
        <projection id="proj_852_776" presynapticPopulation="HL23PV_pop_852" postsynapticPopulation="HL23PYR_pop_776" synapse="HL23PV_HL23PYR_ProbUDFsyn">
            <connectionWD id="0" preCellId="../HL23PV_pop_852/0/HL23PV_852" postCellId="../HL23PYR_pop_776/0/HL23PYR_776" postSegmentId="230" postFractionAlong="0.416086634724764" weight="1.0" delay="0.5 ms"/>
            <connectionWD id="1" preCellId="../HL23PV_pop_852/0/HL23PV_852" postCellId="../HL23PYR_pop_776/0/HL23PYR_776" postSegmentId="1417" postFractionAlong="0.88467065344297" weight="1.0" delay="0.5 ms"/>
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        </projection>
        <projection id="proj_936_804" presynapticPopulation="HL23VIP_pop_936" postsynapticPopulation="HL23SST_pop_804" synapse="HL23VIP_HL23SST_ProbUDFsyn">
            <connectionWD id="0" preCellId="../HL23VIP_pop_936/0/HL23VIP_936" postCellId="../HL23SST_pop_804/0/HL23SST_804" postSegmentId="2610" postFractionAlong="0.860121736261316" weight="1.0" delay="0.5 ms"/>
            <connectionWD id="1" preCellId="../HL23VIP_pop_936/0/HL23VIP_936" postCellId="../HL23SST_pop_804/0/HL23SST_804" postSegmentId="1092" postFractionAlong="0.615406750957362" weight="1.0" delay="0.5 ms"/>
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        </projection>
        <projection id="proj_936_816" presynapticPopulation="HL23VIP_pop_936" postsynapticPopulation="HL23SST_pop_816" synapse="HL23VIP_HL23SST_ProbUDFsyn">
            <connectionWD id="0" preCellId="../HL23VIP_pop_936/0/HL23VIP_936" postCellId="../HL23SST_pop_816/0/HL23SST_816" postSegmentId="2776" postFractionAlong="0.559737040083994" weight="1.0" delay="0.5 ms"/>
            <connectionWD id="1" preCellId="../HL23VIP_pop_936/0/HL23VIP_936" postCellId="../HL23SST_pop_816/0/HL23SST_816" postSegmentId="2855" postFractionAlong="0.38838956881838" weight="1.0" delay="0.5 ms"/>
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        </projection>
        <projection id="proj_936_852" presynapticPopulation="HL23VIP_pop_936" postsynapticPopulation="HL23PV_pop_852" synapse="HL23VIP_HL23PV_ProbUDFsyn">
            <connectionWD id="0" preCellId="../HL23VIP_pop_936/0/HL23VIP_936" postCellId="../HL23PV_pop_852/0/HL23PV_852" postSegmentId="3653" postFractionAlong="0.553542564252773" weight="1.0" delay="0.5 ms"/>
            <connectionWD id="1" preCellId="../HL23VIP_pop_936/0/HL23VIP_936" postCellId="../HL23PV_pop_852/0/HL23PV_852" postSegmentId="2893" postFractionAlong="0.480366081530362" weight="1.0" delay="0.5 ms"/>
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        </projection>
        <inputList id="Gfluct_0" population="HL23PYR_pop_0" component="Gfluct_HL23PYR_0_5">
            <input id="0" target="../HL23PYR_pop_0/0/HL23PYR_0" destination="synapses" segmentId="905" fractionAlong="0.885114796445408"/>
            <input id="1" target="../HL23PYR_pop_0/0/HL23PYR_0" destination="synapses" segmentId="1205" fractionAlong="0.851171143911959"/>
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        </inputList>
        <inputList id="Gfluct_1" population="HL23PYR_pop_0" component="Gfluct_HL23PYR_0_1">
            <input id="18" target="../HL23PYR_pop_0/0/HL23PYR_0" destination="synapses" segmentId="5626" fractionAlong="0.9431395536055"/>
            <input id="19" target="../HL23PYR_pop_0/0/HL23PYR_0" destination="synapses" segmentId="2132" fractionAlong="0.953249395378716"/>
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        </inputList>
        <inputList id="Gfluct_2" population="HL23PYR_pop_0" component="Gfluct_HL23PYR_0_3">
            <input id="27" target="../HL23PYR_pop_0/0/HL23PYR_0" destination="synapses" segmentId="2316" fractionAlong="0.982179433270446"/>
            <input id="28" target="../HL23PYR_pop_0/0/HL23PYR_0" destination="synapses" segmentId="4965" fractionAlong="0.919038444753989"/>
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        </inputList>
        <inputList id="Gfluct_3" population="HL23PYR_pop_0" component="Gfluct_HL23PYR_0_7">
            <input id="38" target="../HL23PYR_pop_0/0/HL23PYR_0" destination="synapses" segmentId="3938" fractionAlong="0.516208173623192"/>
            <input id="39" target="../HL23PYR_pop_0/0/HL23PYR_0" destination="synapses" segmentId="4371" fractionAlong="0.990298519967635"/>
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        </inputList>
        <inputList id="Gfluct_4" population="HL23PYR_pop_0" component="Gfluct_HL23PYR_0_9">
            <input id="50" target="../HL23PYR_pop_0/0/HL23PYR_0" destination="synapses" segmentId="2813" fractionAlong="0.971705983774493"/>
            <input id="51" target="../HL23PYR_pop_0/0/HL23PYR_0" destination="synapses" segmentId="4551" fractionAlong="0.824427134963368"/>
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        </inputList>
        <inputList id="Gfluct_5" population="HL23PYR_pop_397" component="Gfluct_HL23PYR_0_5">
            <input id="57" target="../HL23PYR_pop_397/0/HL23PYR_397" destination="synapses" segmentId="905" fractionAlong="0.885114796445408"/>
            <input id="58" target="../HL23PYR_pop_397/0/HL23PYR_397" destination="synapses" segmentId="1205" fractionAlong="0.851171143911959"/>
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        </inputList>
        <inputList id="Gfluct_6" population="HL23PYR_pop_397" component="Gfluct_HL23PYR_0_1">
            <input id="75" target="../HL23PYR_pop_397/0/HL23PYR_397" destination="synapses" segmentId="5626" fractionAlong="0.9431395536055"/>
            <input id="76" target="../HL23PYR_pop_397/0/HL23PYR_397" destination="synapses" segmentId="2132" fractionAlong="0.953249395378716"/>
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        </inputList>
        <inputList id="Gfluct_7" population="HL23PYR_pop_397" component="Gfluct_HL23PYR_0_3">
            <input id="84" target="../HL23PYR_pop_397/0/HL23PYR_397" destination="synapses" segmentId="2316" fractionAlong="0.982179433270446"/>
            <input id="85" target="../HL23PYR_pop_397/0/HL23PYR_397" destination="synapses" segmentId="4965" fractionAlong="0.919038444753989"/>
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        </inputList>
        <inputList id="Gfluct_8" population="HL23PYR_pop_397" component="Gfluct_HL23PYR_0_7">
            <input id="95" target="../HL23PYR_pop_397/0/HL23PYR_397" destination="synapses" segmentId="3938" fractionAlong="0.516208173623192"/>
            <input id="96" target="../HL23PYR_pop_397/0/HL23PYR_397" destination="synapses" segmentId="4371" fractionAlong="0.990298519967635"/>
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        </inputList>
        <inputList id="Gfluct_9" population="HL23PYR_pop_397" component="Gfluct_HL23PYR_0_9">
            <input id="107" target="../HL23PYR_pop_397/0/HL23PYR_397" destination="synapses" segmentId="2813" fractionAlong="0.971705983774493"/>
            <input id="108" target="../HL23PYR_pop_397/0/HL23PYR_397" destination="synapses" segmentId="4551" fractionAlong="0.824427134963368"/>
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        </inputList>
        <inputList id="Gfluct_10" population="HL23PYR_pop_794" component="Gfluct_HL23PYR_0_5">
            <input id="114" target="../HL23PYR_pop_794/0/HL23PYR_794" destination="synapses" segmentId="905" fractionAlong="0.885114796445408"/>
            <input id="115" target="../HL23PYR_pop_794/0/HL23PYR_794" destination="synapses" segmentId="1205" fractionAlong="0.851171143911959"/>
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        </inputList>
        <inputList id="Gfluct_11" population="HL23PYR_pop_794" component="Gfluct_HL23PYR_0_1">
            <input id="132" target="../HL23PYR_pop_794/0/HL23PYR_794" destination="synapses" segmentId="5626" fractionAlong="0.9431395536055"/>
            <input id="133" target="../HL23PYR_pop_794/0/HL23PYR_794" destination="synapses" segmentId="2132" fractionAlong="0.953249395378716"/>
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        </inputList>
        <inputList id="Gfluct_12" population="HL23PYR_pop_794" component="Gfluct_HL23PYR_0_3">
            <input id="141" target="../HL23PYR_pop_794/0/HL23PYR_794" destination="synapses" segmentId="2316" fractionAlong="0.982179433270446"/>
            <input id="142" target="../HL23PYR_pop_794/0/HL23PYR_794" destination="synapses" segmentId="4965" fractionAlong="0.919038444753989"/>
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        </inputList>
        <inputList id="Gfluct_13" population="HL23PYR_pop_794" component="Gfluct_HL23PYR_0_7">
            <input id="152" target="../HL23PYR_pop_794/0/HL23PYR_794" destination="synapses" segmentId="3938" fractionAlong="0.516208173623192"/>
            <input id="153" target="../HL23PYR_pop_794/0/HL23PYR_794" destination="synapses" segmentId="4371" fractionAlong="0.990298519967635"/>
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        </inputList>
        <inputList id="Gfluct_14" population="HL23PYR_pop_794" component="Gfluct_HL23PYR_0_9">
            <input id="164" target="../HL23PYR_pop_794/0/HL23PYR_794" destination="synapses" segmentId="2813" fractionAlong="0.971705983774493"/>
            <input id="165" target="../HL23PYR_pop_794/0/HL23PYR_794" destination="synapses" segmentId="4551" fractionAlong="0.824427134963368"/>
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        </inputList>
        <inputList id="Gfluct_15" population="HL23PYR_pop_388" component="Gfluct_HL23PYR_0_5">
            <input id="171" target="../HL23PYR_pop_388/0/HL23PYR_388" destination="synapses" segmentId="905" fractionAlong="0.885114796445408"/>
            <input id="172" target="../HL23PYR_pop_388/0/HL23PYR_388" destination="synapses" segmentId="1205" fractionAlong="0.851171143911959"/>
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        </inputList>
        <inputList id="Gfluct_16" population="HL23PYR_pop_388" component="Gfluct_HL23PYR_0_1">
            <input id="189" target="../HL23PYR_pop_388/0/HL23PYR_388" destination="synapses" segmentId="5626" fractionAlong="0.9431395536055"/>
            <input id="190" target="../HL23PYR_pop_388/0/HL23PYR_388" destination="synapses" segmentId="2132" fractionAlong="0.953249395378716"/>
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        </inputList>
        <inputList id="Gfluct_17" population="HL23PYR_pop_388" component="Gfluct_HL23PYR_0_3">
            <input id="198" target="../HL23PYR_pop_388/0/HL23PYR_388" destination="synapses" segmentId="2316" fractionAlong="0.982179433270446"/>
            <input id="199" target="../HL23PYR_pop_388/0/HL23PYR_388" destination="synapses" segmentId="4965" fractionAlong="0.919038444753989"/>
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        </inputList>
        <inputList id="Gfluct_18" population="HL23PYR_pop_388" component="Gfluct_HL23PYR_0_7">
            <input id="209" target="../HL23PYR_pop_388/0/HL23PYR_388" destination="synapses" segmentId="3938" fractionAlong="0.516208173623192"/>
            <input id="210" target="../HL23PYR_pop_388/0/HL23PYR_388" destination="synapses" segmentId="4371" fractionAlong="0.990298519967635"/>
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        </inputList>
        <inputList id="Gfluct_19" population="HL23PYR_pop_388" component="Gfluct_HL23PYR_0_9">
            <input id="221" target="../HL23PYR_pop_388/0/HL23PYR_388" destination="synapses" segmentId="2813" fractionAlong="0.971705983774493"/>
            <input id="222" target="../HL23PYR_pop_388/0/HL23PYR_388" destination="synapses" segmentId="4551" fractionAlong="0.824427134963368"/>
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        </inputList>
        <inputList id="Gfluct_20" population="HL23PYR_pop_785" component="Gfluct_HL23PYR_0_5">
            <input id="228" target="../HL23PYR_pop_785/0/HL23PYR_785" destination="synapses" segmentId="905" fractionAlong="0.885114796445408"/>
            <input id="229" target="../HL23PYR_pop_785/0/HL23PYR_785" destination="synapses" segmentId="1205" fractionAlong="0.851171143911959"/>
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        </inputList>
        <inputList id="Gfluct_21" population="HL23PYR_pop_785" component="Gfluct_HL23PYR_0_1">
            <input id="246" target="../HL23PYR_pop_785/0/HL23PYR_785" destination="synapses" segmentId="5626" fractionAlong="0.9431395536055"/>
            <input id="247" target="../HL23PYR_pop_785/0/HL23PYR_785" destination="synapses" segmentId="2132" fractionAlong="0.953249395378716"/>
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        </inputList>
        <inputList id="Gfluct_22" population="HL23PYR_pop_785" component="Gfluct_HL23PYR_0_3">
            <input id="255" target="../HL23PYR_pop_785/0/HL23PYR_785" destination="synapses" segmentId="2316" fractionAlong="0.982179433270446"/>
            <input id="256" target="../HL23PYR_pop_785/0/HL23PYR_785" destination="synapses" segmentId="4965" fractionAlong="0.919038444753989"/>
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        </inputList>
        <inputList id="Gfluct_23" population="HL23PYR_pop_785" component="Gfluct_HL23PYR_0_7">
            <input id="266" target="../HL23PYR_pop_785/0/HL23PYR_785" destination="synapses" segmentId="3938" fractionAlong="0.516208173623192"/>
            <input id="267" target="../HL23PYR_pop_785/0/HL23PYR_785" destination="synapses" segmentId="4371" fractionAlong="0.990298519967635"/>
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        </inputList>
        <inputList id="Gfluct_24" population="HL23PYR_pop_785" component="Gfluct_HL23PYR_0_9">
            <input id="278" target="../HL23PYR_pop_785/0/HL23PYR_785" destination="synapses" segmentId="2813" fractionAlong="0.971705983774493"/>
            <input id="279" target="../HL23PYR_pop_785/0/HL23PYR_785" destination="synapses" segmentId="4551" fractionAlong="0.824427134963368"/>
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        </inputList>
        <inputList id="Gfluct_25" population="HL23PYR_pop_379" component="Gfluct_HL23PYR_0_5">
            <input id="285" target="../HL23PYR_pop_379/0/HL23PYR_379" destination="synapses" segmentId="905" fractionAlong="0.885114796445408"/>
            <input id="286" target="../HL23PYR_pop_379/0/HL23PYR_379" destination="synapses" segmentId="1205" fractionAlong="0.851171143911959"/>
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        </inputList>
        <inputList id="Gfluct_26" population="HL23PYR_pop_379" component="Gfluct_HL23PYR_0_1">
            <input id="303" target="../HL23PYR_pop_379/0/HL23PYR_379" destination="synapses" segmentId="5626" fractionAlong="0.9431395536055"/>
            <input id="304" target="../HL23PYR_pop_379/0/HL23PYR_379" destination="synapses" segmentId="2132" fractionAlong="0.953249395378716"/>
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        </inputList>
        <inputList id="Gfluct_27" population="HL23PYR_pop_379" component="Gfluct_HL23PYR_0_3">
            <input id="312" target="../HL23PYR_pop_379/0/HL23PYR_379" destination="synapses" segmentId="2316" fractionAlong="0.982179433270446"/>
            <input id="313" target="../HL23PYR_pop_379/0/HL23PYR_379" destination="synapses" segmentId="4965" fractionAlong="0.919038444753989"/>
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        </inputList>
        <inputList id="Gfluct_28" population="HL23PYR_pop_379" component="Gfluct_HL23PYR_0_7">
            <input id="323" target="../HL23PYR_pop_379/0/HL23PYR_379" destination="synapses" segmentId="3938" fractionAlong="0.516208173623192"/>
            <input id="324" target="../HL23PYR_pop_379/0/HL23PYR_379" destination="synapses" segmentId="4371" fractionAlong="0.990298519967635"/>
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        </inputList>
        <inputList id="Gfluct_29" population="HL23PYR_pop_379" component="Gfluct_HL23PYR_0_9">
            <input id="335" target="../HL23PYR_pop_379/0/HL23PYR_379" destination="synapses" segmentId="2813" fractionAlong="0.971705983774493"/>
            <input id="336" target="../HL23PYR_pop_379/0/HL23PYR_379" destination="synapses" segmentId="4551" fractionAlong="0.824427134963368"/>
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        </inputList>
        <inputList id="Gfluct_30" population="HL23PYR_pop_776" component="Gfluct_HL23PYR_0_5">
            <input id="342" target="../HL23PYR_pop_776/0/HL23PYR_776" destination="synapses" segmentId="905" fractionAlong="0.885114796445408"/>
            <input id="343" target="../HL23PYR_pop_776/0/HL23PYR_776" destination="synapses" segmentId="1205" fractionAlong="0.851171143911959"/>
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        </inputList>
        <inputList id="Gfluct_31" population="HL23PYR_pop_776" component="Gfluct_HL23PYR_0_1">
            <input id="360" target="../HL23PYR_pop_776/0/HL23PYR_776" destination="synapses" segmentId="5626" fractionAlong="0.9431395536055"/>
            <input id="361" target="../HL23PYR_pop_776/0/HL23PYR_776" destination="synapses" segmentId="2132" fractionAlong="0.953249395378716"/>
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        </inputList>
        <inputList id="Gfluct_32" population="HL23PYR_pop_776" component="Gfluct_HL23PYR_0_3">
            <input id="369" target="../HL23PYR_pop_776/0/HL23PYR_776" destination="synapses" segmentId="2316" fractionAlong="0.982179433270446"/>
            <input id="370" target="../HL23PYR_pop_776/0/HL23PYR_776" destination="synapses" segmentId="4965" fractionAlong="0.919038444753989"/>
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        </inputList>
        <inputList id="Gfluct_33" population="HL23PYR_pop_776" component="Gfluct_HL23PYR_0_7">
            <input id="380" target="../HL23PYR_pop_776/0/HL23PYR_776" destination="synapses" segmentId="3938" fractionAlong="0.516208173623192"/>
            <input id="381" target="../HL23PYR_pop_776/0/HL23PYR_776" destination="synapses" segmentId="4371" fractionAlong="0.990298519967635"/>
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        </inputList>
        <inputList id="Gfluct_34" population="HL23PYR_pop_776" component="Gfluct_HL23PYR_0_9">
            <input id="392" target="../HL23PYR_pop_776/0/HL23PYR_776" destination="synapses" segmentId="2813" fractionAlong="0.971705983774493"/>
            <input id="393" target="../HL23PYR_pop_776/0/HL23PYR_776" destination="synapses" segmentId="4551" fractionAlong="0.824427134963368"/>
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        </inputList>
        <inputList id="Gfluct_35" population="HL23PYR_pop_394" component="Gfluct_HL23PYR_0_5">
            <input id="399" target="../HL23PYR_pop_394/0/HL23PYR_394" destination="synapses" segmentId="905" fractionAlong="0.885114796445408"/>
            <input id="400" target="../HL23PYR_pop_394/0/HL23PYR_394" destination="synapses" segmentId="1205" fractionAlong="0.851171143911959"/>
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        </inputList>
        <inputList id="Gfluct_36" population="HL23PYR_pop_394" component="Gfluct_HL23PYR_0_1">
            <input id="417" target="../HL23PYR_pop_394/0/HL23PYR_394" destination="synapses" segmentId="5626" fractionAlong="0.9431395536055"/>
            <input id="418" target="../HL23PYR_pop_394/0/HL23PYR_394" destination="synapses" segmentId="2132" fractionAlong="0.953249395378716"/>
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        </inputList>
        <inputList id="Gfluct_37" population="HL23PYR_pop_394" component="Gfluct_HL23PYR_0_3">
            <input id="426" target="../HL23PYR_pop_394/0/HL23PYR_394" destination="synapses" segmentId="2316" fractionAlong="0.982179433270446"/>
            <input id="427" target="../HL23PYR_pop_394/0/HL23PYR_394" destination="synapses" segmentId="4965" fractionAlong="0.919038444753989"/>
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        </inputList>
        <inputList id="Gfluct_38" population="HL23PYR_pop_394" component="Gfluct_HL23PYR_0_7">
            <input id="437" target="../HL23PYR_pop_394/0/HL23PYR_394" destination="synapses" segmentId="3938" fractionAlong="0.516208173623192"/>
            <input id="438" target="../HL23PYR_pop_394/0/HL23PYR_394" destination="synapses" segmentId="4371" fractionAlong="0.990298519967635"/>
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        </inputList>
        <inputList id="Gfluct_39" population="HL23PYR_pop_394" component="Gfluct_HL23PYR_0_9">
            <input id="449" target="../HL23PYR_pop_394/0/HL23PYR_394" destination="synapses" segmentId="2813" fractionAlong="0.971705983774493"/>
            <input id="450" target="../HL23PYR_pop_394/0/HL23PYR_394" destination="synapses" segmentId="4551" fractionAlong="0.824427134963368"/>
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        </inputList>
        <inputList id="Gfluct_40" population="HL23SST_pop_804" component="Gfluct_HL23SST_0_5">
            <input id="456" target="../HL23SST_pop_804/0/HL23SST_804" destination="synapses" segmentId="2955" fractionAlong="0.992363905920124"/>
            <input id="457" target="../HL23SST_pop_804/0/HL23SST_804" destination="synapses" segmentId="3013" fractionAlong="0.926913586159216"/>
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        </inputList>
        <inputList id="Gfluct_41" population="HL23SST_pop_816" component="Gfluct_HL23SST_0_5">
            <input id="476" target="../HL23SST_pop_816/0/HL23SST_816" destination="synapses" segmentId="2955" fractionAlong="0.992363905920124"/>
            <input id="477" target="../HL23SST_pop_816/0/HL23SST_816" destination="synapses" segmentId="3013" fractionAlong="0.926913586159216"/>
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        </inputList>
        <inputList id="Gfluct_42" population="HL23PV_pop_852" component="Gfluct_HL23PV_0_5">
            <input id="496" target="../HL23PV_pop_852/0/HL23PV_852" destination="synapses" segmentId="1836" fractionAlong="0.991164515108885"/>
            <input id="497" target="../HL23PV_pop_852/0/HL23PV_852" destination="synapses" segmentId="3272" fractionAlong="0.937324870527937"/>
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        </inputList>
        <inputList id="Gfluct_43" population="HL23PV_pop_864" component="Gfluct_HL23PV_0_5">
            <input id="507" target="../HL23PV_pop_864/0/HL23PV_864" destination="synapses" segmentId="1836" fractionAlong="0.991164515108885"/>
            <input id="508" target="../HL23PV_pop_864/0/HL23PV_864" destination="synapses" segmentId="3272" fractionAlong="0.937324870527937"/>
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        </inputList>
        <inputList id="Gfluct_44" population="HL23VIP_pop_924" component="Gfluct_HL23VIP_0_5">
            <input id="518" target="../HL23VIP_pop_924/0/HL23VIP_924" destination="synapses" segmentId="1218" fractionAlong="0.98143834656655"/>
            <input id="519" target="../HL23VIP_pop_924/0/HL23VIP_924" destination="synapses" segmentId="2340" fractionAlong="0.865477716974497"/>
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        </inputList>
        <inputList id="Gfluct_45" population="HL23VIP_pop_936" component="Gfluct_HL23VIP_0_5">
            <input id="534" target="../HL23VIP_pop_936/0/HL23VIP_936" destination="synapses" segmentId="1218" fractionAlong="0.98143834656655"/>
            <input id="535" target="../HL23VIP_pop_936/0/HL23VIP_936" destination="synapses" segmentId="2340" fractionAlong="0.865477716974497"/>
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        </inputList>
    </network>
</neuroml>
