<neuroml xmlns="http://www.neuroml.org/schema/neuroml2"  xmlns:xs="http://www.w3.org/2001/XMLSchema" xmlns:xsi="http://www.w3.org/2001/XMLSchema-instance" xsi:schemaLocation="http://www.neuroml.org/schema/neuroml2 https://raw.github.com/NeuroML/NeuroML2/development/Schemas/NeuroML2/NeuroML_v2.3.xsd" id="HL23Network">
    <include href="rotated_cells/HL23PYR_sim.cell.nml"/>
    <include href="rotated_cells/HL23SST_sim.cell.nml"/>
    <include href="rotated_cells/HL23PV_sim.cell.nml"/>
    <include href="rotated_cells/HL23VIP_sim.cell.nml"/>
    <network id="HL23Network" temperature="34.0 degC">
        <notes>L23 network at 0.05 scale</notes>
        <population id="HL23PYR_pop" component="HL23PYR_sim" type="populationList">
            <property tag="region" value="L23"/>
            <instance id="0">
                <location x="-221.223306399760617" y="84.192327970444907" z="-841.488627155949189"/>
            </instance>
            <instance id="1">
                <location x="85.553186031354755" y="210.000128390918206" z="-1378.673254692557975"/>
            </instance>
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        </population>
        <population id="HL23SST_pop" component="HL23SST_sim" type="populationList">
            <property tag="region" value="L23"/>
            <instance id="0">
                <location x="106.350954605553099" y="-214.951800779721538" z="-645.5753185087774"/>
            </instance>
            <instance id="1">
                <location x="-66.661393253613639" y="-154.5426981641846" z="-1365.328199399219784"/>
            </instance>
            <instance id="2">
                <location x="-164.451077229015482" y="158.923509746789762" z="-1115.226553880813071"/>
            </instance>
        </population>
        <population id="HL23PV_pop" component="HL23PV_sim" type="populationList">
            <property tag="region" value="L23"/>
            <instance id="0">
                <location x="-65.390056656730806" y="-116.993532553848922" z="-946.991073553129127"/>
            </instance>
            <instance id="1">
                <location x="-47.599084963993789" y="-61.949116430197734" z="-1138.273622150351457"/>
            </instance>
            <instance id="2">
                <location x="58.197290763543016" y="-114.772124254911574" z="-719.147114267836969"/>
            </instance>
            <instance id="3">
                <location x="-204.206995268567681" y="-109.861930972761925" z="-1040.059836734000555"/>
            </instance>
        </population>
        <population id="HL23VIP_pop" component="HL23VIP_sim" type="populationList">
            <property tag="region" value="L23"/>
            <instance id="0">
                <location x="155.238762493285833" y="108.47285030975101" z="-620.439995080828112"/>
            </instance>
            <instance id="1">
                <location x="-33.447132763495311" y="-135.140237849578682" z="-602.102083605453572"/>
            </instance>
            <instance id="2">
                <location x="-74.998405380504067" y="64.504168799248191" z="-604.371249242716431"/>
            </instance>
            <instance id="3">
                <location x="44.823960885205075" y="-238.292403288449208" z="-950.209090581213559"/>
            </instance>
        </population>
        <projection id="proj_HL23PYR_HL23PYR" presynapticPopulation="HL23PYR_pop" postsynapticPopulation="HL23PYR_pop" synapse="HL23PYR_HL23PYR_ProbAMPANMDA">
            <connectionWD id="0" preCellId="../HL23PYR_pop/1/HL23PYR_sim" postCellId="../HL23PYR_pop/0/HL23PYR_sim" postSegmentId="1889" postFractionAlong="0.304125245318127" weight="20.0" delay="0.5 ms"/>
            <connectionWD id="1" preCellId="../HL23PYR_pop/1/HL23PYR_sim" postCellId="../HL23PYR_pop/0/HL23PYR_sim" postSegmentId="2938" postFractionAlong="0.661131711908467" weight="20.0" delay="0.5 ms"/>
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        </projection>
        <projection id="proj_HL23PYR_HL23SST" presynapticPopulation="HL23PYR_pop" postsynapticPopulation="HL23SST_pop" synapse="HL23PYR_HL23SST_ProbAMPANMDA">
            <connectionWD id="0" preCellId="../HL23PYR_pop/27/HL23PYR_sim" postCellId="../HL23SST_pop/0/HL23SST_sim" postSegmentId="1472" postFractionAlong="0.57841713870705" weight="20.0" delay="0.5 ms"/>
            <connectionWD id="1" preCellId="../HL23PYR_pop/27/HL23PYR_sim" postCellId="../HL23SST_pop/0/HL23SST_sim" postSegmentId="1472" postFractionAlong="0.57841713870705" weight="20.0" delay="0.5 ms"/>
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        </projection>
        <projection id="proj_HL23PYR_HL23PV" presynapticPopulation="HL23PYR_pop" postsynapticPopulation="HL23PV_pop" synapse="HL23PYR_HL23PV_ProbAMPANMDA">
            <connectionWD id="0" preCellId="../HL23PYR_pop/17/HL23PYR_sim" postCellId="../HL23PV_pop/0/HL23PV_sim" postSegmentId="1502" postFractionAlong="0.432387431167523" weight="20.0" delay="0.5 ms"/>
            <connectionWD id="1" preCellId="../HL23PYR_pop/17/HL23PYR_sim" postCellId="../HL23PV_pop/0/HL23PV_sim" postSegmentId="4069" postFractionAlong="0.037980675567437" weight="20.0" delay="0.5 ms"/>
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        </projection>
        <projection id="proj_HL23PYR_HL23VIP" presynapticPopulation="HL23PYR_pop" postsynapticPopulation="HL23VIP_pop" synapse="HL23PYR_HL23VIP_ProbAMPANMDA">
            <connectionWD id="0" preCellId="../HL23PYR_pop/31/HL23PYR_sim" postCellId="../HL23VIP_pop/0/HL23VIP_sim" postSegmentId="2899" postFractionAlong="0.906790168568285" weight="20.0" delay="0.5 ms"/>
            <connectionWD id="1" preCellId="../HL23PYR_pop/31/HL23PYR_sim" postCellId="../HL23VIP_pop/0/HL23VIP_sim" postSegmentId="15" postFractionAlong="0.12518461935704" weight="20.0" delay="0.5 ms"/>
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        </projection>
        <projection id="proj_HL23SST_HL23PYR" presynapticPopulation="HL23SST_pop" postsynapticPopulation="HL23PYR_pop" synapse="HL23SST_HL23PYR_ProbUDFsyn">
            <connectionWD id="0" preCellId="../HL23SST_pop/2/HL23SST_sim" postCellId="../HL23PYR_pop/0/HL23PYR_sim" postSegmentId="1850" postFractionAlong="0.065975986788155" weight="20.0" delay="0.5 ms"/>
            <connectionWD id="1" preCellId="../HL23SST_pop/2/HL23SST_sim" postCellId="../HL23PYR_pop/0/HL23PYR_sim" postSegmentId="2099" postFractionAlong="0.203653134679773" weight="20.0" delay="0.5 ms"/>
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        </projection>
        <projection id="proj_HL23SST_HL23PV" presynapticPopulation="HL23SST_pop" postsynapticPopulation="HL23PV_pop" synapse="HL23SST_HL23PV_ProbUDFsyn">
            <connectionWD id="0" preCellId="../HL23SST_pop/0/HL23SST_sim" postCellId="../HL23PV_pop/0/HL23PV_sim" postSegmentId="3943" postFractionAlong="0.621795852458034" weight="20.0" delay="0.5 ms"/>
            <connectionWD id="1" preCellId="../HL23SST_pop/0/HL23SST_sim" postCellId="../HL23PV_pop/0/HL23PV_sim" postSegmentId="2267" postFractionAlong="0.396584022732885" weight="20.0" delay="0.5 ms"/>
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        </projection>
        <projection id="proj_HL23PV_HL23PYR" presynapticPopulation="HL23PV_pop" postsynapticPopulation="HL23PYR_pop" synapse="HL23PV_HL23PYR_ProbUDFsyn">
            <connectionWD id="0" preCellId="../HL23PV_pop/0/HL23PV_sim" postCellId="../HL23PYR_pop/2/HL23PYR_sim" postSegmentId="1582" postFractionAlong="0.68182405207164" weight="20.0" delay="0.5 ms"/>
            <connectionWD id="1" preCellId="../HL23PV_pop/0/HL23PV_sim" postCellId="../HL23PYR_pop/2/HL23PYR_sim" postSegmentId="1510" postFractionAlong="0.22136866826517" weight="20.0" delay="0.5 ms"/>
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        </projection>
        <projection id="proj_HL23PV_HL23SST" presynapticPopulation="HL23PV_pop" postsynapticPopulation="HL23SST_pop" synapse="HL23PV_HL23SST_ProbUDFsyn">
            <connectionWD id="0" preCellId="../HL23PV_pop/3/HL23PV_sim" postCellId="../HL23SST_pop/0/HL23SST_sim" postSegmentId="987" postFractionAlong="0.249061547312029" weight="20.0" delay="0.5 ms"/>
            <connectionWD id="1" preCellId="../HL23PV_pop/3/HL23PV_sim" postCellId="../HL23SST_pop/0/HL23SST_sim" postSegmentId="1334" postFractionAlong="0.468992454364973" weight="20.0" delay="0.5 ms"/>
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        </projection>
        <projection id="proj_HL23PV_HL23PV" presynapticPopulation="HL23PV_pop" postsynapticPopulation="HL23PV_pop" synapse="HL23PV_HL23PV_ProbUDFsyn">
            <connectionWD id="0" preCellId="../HL23PV_pop/2/HL23PV_sim" postCellId="../HL23PV_pop/1/HL23PV_sim" postSegmentId="2504" postFractionAlong="0.356401517354016" weight="20.0" delay="0.5 ms"/>
            <connectionWD id="1" preCellId="../HL23PV_pop/2/HL23PV_sim" postCellId="../HL23PV_pop/1/HL23PV_sim" postSegmentId="1252" postFractionAlong="0.112993439744885" weight="20.0" delay="0.5 ms"/>
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        </projection>
        <projection id="proj_HL23VIP_HL23SST" presynapticPopulation="HL23VIP_pop" postsynapticPopulation="HL23SST_pop" synapse="HL23VIP_HL23SST_ProbUDFsyn">
            <connectionWD id="0" preCellId="../HL23VIP_pop/3/HL23VIP_sim" postCellId="../HL23SST_pop/0/HL23SST_sim" postSegmentId="1598" postFractionAlong="0.05503924621042" weight="20.0" delay="0.5 ms"/>
            <connectionWD id="1" preCellId="../HL23VIP_pop/3/HL23VIP_sim" postCellId="../HL23SST_pop/0/HL23SST_sim" postSegmentId="37" postFractionAlong="0.853657816944775" weight="20.0" delay="0.5 ms"/>
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        </projection>
        <projection id="proj_HL23VIP_HL23PV" presynapticPopulation="HL23VIP_pop" postsynapticPopulation="HL23PV_pop" synapse="HL23VIP_HL23PV_ProbUDFsyn">
            <connectionWD id="0" preCellId="../HL23VIP_pop/1/HL23VIP_sim" postCellId="../HL23PV_pop/0/HL23PV_sim" postSegmentId="1383" postFractionAlong="0.279293430259161" weight="20.0" delay="0.5 ms"/>
            <connectionWD id="1" preCellId="../HL23VIP_pop/1/HL23VIP_sim" postCellId="../HL23PV_pop/0/HL23PV_sim" postSegmentId="3530" postFractionAlong="0.632255279060272" weight="20.0" delay="0.5 ms"/>
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        </projection>
        <inputList id="Gfluct_0" population="HL23PYR_pop" component="Gfluct_HL23PYR_0_5">
            <input id="0" target="../HL23PYR_pop/0/HL23PYR_sim" destination="synapses" segmentId="905" fractionAlong="0.885114796445408"/>
            <input id="1" target="../HL23PYR_pop/1/HL23PYR_sim" destination="synapses" segmentId="905" fractionAlong="0.885114796445408"/>
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        </inputList>
        <inputList id="Gfluct_1" population="HL23PYR_pop" component="Gfluct_HL23PYR_0_1">
            <input id="720" target="../HL23PYR_pop/0/HL23PYR_sim" destination="synapses" segmentId="5626" fractionAlong="0.9431395536055"/>
            <input id="721" target="../HL23PYR_pop/1/HL23PYR_sim" destination="synapses" segmentId="5626" fractionAlong="0.9431395536055"/>
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        </inputList>
        <inputList id="Gfluct_2" population="HL23PYR_pop" component="Gfluct_HL23PYR_0_3">
            <input id="1080" target="../HL23PYR_pop/0/HL23PYR_sim" destination="synapses" segmentId="2316" fractionAlong="0.982179433270446"/>
            <input id="1081" target="../HL23PYR_pop/1/HL23PYR_sim" destination="synapses" segmentId="2316" fractionAlong="0.982179433270446"/>
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        </inputList>
        <inputList id="Gfluct_3" population="HL23PYR_pop" component="Gfluct_HL23PYR_0_7">
            <input id="1520" target="../HL23PYR_pop/0/HL23PYR_sim" destination="synapses" segmentId="3938" fractionAlong="0.516208173623192"/>
            <input id="1521" target="../HL23PYR_pop/1/HL23PYR_sim" destination="synapses" segmentId="3938" fractionAlong="0.516208173623192"/>
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        </inputList>
        <inputList id="Gfluct_4" population="HL23PYR_pop" component="Gfluct_HL23PYR_0_9">
            <input id="2000" target="../HL23PYR_pop/0/HL23PYR_sim" destination="synapses" segmentId="2813" fractionAlong="0.971705983774493"/>
            <input id="2001" target="../HL23PYR_pop/1/HL23PYR_sim" destination="synapses" segmentId="2813" fractionAlong="0.971705983774493"/>
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        </inputList>
        <inputList id="Gfluct_5" population="HL23SST_pop" component="Gfluct_HL23SST_0_5">
            <input id="2280" target="../HL23SST_pop/0/HL23SST_sim" destination="synapses" segmentId="2955" fractionAlong="0.992363905920124"/>
            <input id="2281" target="../HL23SST_pop/1/HL23SST_sim" destination="synapses" segmentId="2955" fractionAlong="0.992363905920124"/>
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        </inputList>
        <inputList id="Gfluct_6" population="HL23PV_pop" component="Gfluct_HL23PV_0_5">
            <input id="2340" target="../HL23PV_pop/0/HL23PV_sim" destination="synapses" segmentId="1836" fractionAlong="0.991164515108885"/>
            <input id="2341" target="../HL23PV_pop/1/HL23PV_sim" destination="synapses" segmentId="1836" fractionAlong="0.991164515108885"/>
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        </inputList>
        <inputList id="Gfluct_7" population="HL23VIP_pop" component="Gfluct_HL23VIP_0_5">
            <input id="2384" target="../HL23VIP_pop/0/HL23VIP_sim" destination="synapses" segmentId="1218" fractionAlong="0.98143834656655"/>
            <input id="2385" target="../HL23VIP_pop/1/HL23VIP_sim" destination="synapses" segmentId="1218" fractionAlong="0.98143834656655"/>
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        </inputList>
    </network>
</neuroml>
