<neuroml xmlns="http://www.neuroml.org/schema/neuroml2"  xmlns:xs="http://www.w3.org/2001/XMLSchema" xmlns:xsi="http://www.w3.org/2001/XMLSchema-instance" xsi:schemaLocation="http://www.neuroml.org/schema/neuroml2 https://raw.github.com/NeuroML/NeuroML2/development/Schemas/NeuroML2/NeuroML_v2.3.xsd" id="HL23Network">
    <include href="rotated_cells/HL23PYR_sim.cell.nml"/>
    <include href="rotated_cells/HL23SST_sim.cell.nml"/>
    <include href="rotated_cells/HL23PV_sim.cell.nml"/>
    <include href="rotated_cells/HL23VIP_sim.cell.nml"/>
    <network id="HL23Network" temperature="34.0 degC">
        <notes>L23 network at 0.1 scale</notes>
        <population id="HL23PYR_pop" component="HL23PYR_sim" type="populationList">
            <property tag="region" value="L23"/>
            <instance id="0">
                <location x="-221.223306399760617" y="84.192327970444907" z="-841.488627155949189"/>
            </instance>
            <instance id="1">
                <location x="187.41995287570802" y="-113.400345911607971" z="-1172.32627660657181"/>
            </instance>
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        </population>
        <population id="HL23SST_pop" component="HL23SST_sim" type="populationList">
            <property tag="region" value="L23"/>
            <instance id="0">
                <location x="106.350954605553099" y="-214.951800779721538" z="-645.5753185087774"/>
            </instance>
            <instance id="1">
                <location x="128.647182683786042" y="-95.057261044165401" z="-1035.931704545904722"/>
            </instance>
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        </population>
        <population id="HL23PV_pop" component="HL23PV_sim" type="populationList">
            <property tag="region" value="L23"/>
            <instance id="0">
                <location x="-65.390056656730806" y="-116.993532553848922" z="-946.991073553129127"/>
            </instance>
            <instance id="1">
                <location x="1.73661479517756" y="-123.430936199725224" z="-1302.499948259468511"/>
            </instance>
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        </population>
        <population id="HL23VIP_pop" component="HL23VIP_sim" type="populationList">
            <property tag="region" value="L23"/>
            <instance id="0">
                <location x="155.238762493285833" y="108.47285030975101" z="-620.439995080828112"/>
            </instance>
            <instance id="1">
                <location x="-233.655269106973805" y="46.103389598968207" z="-928.431672741729926"/>
            </instance>
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        </population>
        <projection id="proj_HL23PYR_HL23PYR" presynapticPopulation="HL23PYR_pop" postsynapticPopulation="HL23PYR_pop" synapse="HL23PYR_HL23PYR_ProbAMPANMDA">
            <connectionWD id="0" preCellId="../HL23PYR_pop/61/HL23PYR_sim" postCellId="../HL23PYR_pop/0/HL23PYR_sim" postSegmentId="2999" postFractionAlong="0.017674796019761" weight="10.0" delay="0.5 ms"/>
            <connectionWD id="1" preCellId="../HL23PYR_pop/61/HL23PYR_sim" postCellId="../HL23PYR_pop/0/HL23PYR_sim" postSegmentId="5297" postFractionAlong="0.402327417858197" weight="10.0" delay="0.5 ms"/>
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        </projection>
        <projection id="proj_HL23PYR_HL23SST" presynapticPopulation="HL23PYR_pop" postsynapticPopulation="HL23SST_pop" synapse="HL23PYR_HL23SST_ProbAMPANMDA">
            <connectionWD id="0" preCellId="../HL23PYR_pop/47/HL23PYR_sim" postCellId="../HL23SST_pop/0/HL23SST_sim" postSegmentId="2610" postFractionAlong="0.860121736261316" weight="10.0" delay="0.5 ms"/>
            <connectionWD id="1" preCellId="../HL23PYR_pop/47/HL23PYR_sim" postCellId="../HL23SST_pop/0/HL23SST_sim" postSegmentId="1507" postFractionAlong="0.544131442449732" weight="10.0" delay="0.5 ms"/>
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        </projection>
        <projection id="proj_HL23PYR_HL23PV" presynapticPopulation="HL23PYR_pop" postsynapticPopulation="HL23PV_pop" synapse="HL23PYR_HL23PV_ProbAMPANMDA">
            <connectionWD id="0" preCellId="../HL23PYR_pop/7/HL23PYR_sim" postCellId="../HL23PV_pop/0/HL23PV_sim" postSegmentId="2144" postFractionAlong="0.115264663048345" weight="10.0" delay="0.5 ms"/>
            <connectionWD id="1" preCellId="../HL23PYR_pop/7/HL23PYR_sim" postCellId="../HL23PV_pop/0/HL23PV_sim" postSegmentId="2011" postFractionAlong="0.02018188307633" weight="10.0" delay="0.5 ms"/>
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        </projection>
        <projection id="proj_HL23PYR_HL23VIP" presynapticPopulation="HL23PYR_pop" postsynapticPopulation="HL23VIP_pop" synapse="HL23PYR_HL23VIP_ProbAMPANMDA">
            <connectionWD id="0" preCellId="../HL23PYR_pop/62/HL23PYR_sim" postCellId="../HL23VIP_pop/0/HL23VIP_sim" postSegmentId="2899" postFractionAlong="0.906790168568285" weight="10.0" delay="0.5 ms"/>
            <connectionWD id="1" preCellId="../HL23PYR_pop/62/HL23PYR_sim" postCellId="../HL23VIP_pop/0/HL23VIP_sim" postSegmentId="15" postFractionAlong="0.12518461935704" weight="10.0" delay="0.5 ms"/>
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        </projection>
        <projection id="proj_HL23SST_HL23PYR" presynapticPopulation="HL23SST_pop" postsynapticPopulation="HL23PYR_pop" synapse="HL23SST_HL23PYR_ProbUDFsyn">
            <connectionWD id="0" preCellId="../HL23SST_pop/1/HL23SST_sim" postCellId="../HL23PYR_pop/0/HL23PYR_sim" postSegmentId="4573" postFractionAlong="0.876351561436717" weight="10.0" delay="0.5 ms"/>
            <connectionWD id="1" preCellId="../HL23SST_pop/1/HL23SST_sim" postCellId="../HL23PYR_pop/0/HL23PYR_sim" postSegmentId="4257" postFractionAlong="0.209427184651538" weight="10.0" delay="0.5 ms"/>
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        </projection>
        <projection id="proj_HL23SST_HL23SST" presynapticPopulation="HL23SST_pop" postsynapticPopulation="HL23SST_pop" synapse="HL23SST_HL23SST_ProbUDFsyn">
            <connectionWD id="0" preCellId="../HL23SST_pop/0/HL23SST_sim" postCellId="../HL23SST_pop/3/HL23SST_sim" postSegmentId="1018" postFractionAlong="0.394535044951712" weight="10.0" delay="0.5 ms"/>
            <connectionWD id="1" preCellId="../HL23SST_pop/0/HL23SST_sim" postCellId="../HL23SST_pop/3/HL23SST_sim" postSegmentId="1963" postFractionAlong="0.04002318592724" weight="10.0" delay="0.5 ms"/>
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        </projection>
        <projection id="proj_HL23SST_HL23PV" presynapticPopulation="HL23SST_pop" postsynapticPopulation="HL23PV_pop" synapse="HL23SST_HL23PV_ProbUDFsyn">
            <connectionWD id="0" preCellId="../HL23SST_pop/0/HL23SST_sim" postCellId="../HL23PV_pop/0/HL23PV_sim" postSegmentId="3943" postFractionAlong="0.621795852458034" weight="10.0" delay="0.5 ms"/>
            <connectionWD id="1" preCellId="../HL23SST_pop/0/HL23SST_sim" postCellId="../HL23PV_pop/0/HL23PV_sim" postSegmentId="2267" postFractionAlong="0.396584022732885" weight="10.0" delay="0.5 ms"/>
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        </projection>
        <projection id="proj_HL23SST_HL23VIP" presynapticPopulation="HL23SST_pop" postsynapticPopulation="HL23VIP_pop" synapse="HL23SST_HL23VIP_ProbUDFsyn">
            <connectionWD id="0" preCellId="../HL23SST_pop/1/HL23SST_sim" postCellId="../HL23VIP_pop/0/HL23VIP_sim" postSegmentId="1876" postFractionAlong="0.031547188517759" weight="10.0" delay="0.5 ms"/>
            <connectionWD id="1" preCellId="../HL23SST_pop/1/HL23SST_sim" postCellId="../HL23VIP_pop/0/HL23VIP_sim" postSegmentId="222" postFractionAlong="0.633944368635897" weight="10.0" delay="0.5 ms"/>
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        </projection>
        <projection id="proj_HL23PV_HL23PYR" presynapticPopulation="HL23PV_pop" postsynapticPopulation="HL23PYR_pop" synapse="HL23PV_HL23PYR_ProbUDFsyn">
            <connectionWD id="0" preCellId="../HL23PV_pop/3/HL23PV_sim" postCellId="../HL23PYR_pop/1/HL23PYR_sim" postSegmentId="1460" postFractionAlong="0.081085935967051" weight="10.0" delay="0.5 ms"/>
            <connectionWD id="1" preCellId="../HL23PV_pop/3/HL23PV_sim" postCellId="../HL23PYR_pop/1/HL23PYR_sim" postSegmentId="129" postFractionAlong="0.45403594079104" weight="10.0" delay="0.5 ms"/>
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        </projection>
        <projection id="proj_HL23PV_HL23SST" presynapticPopulation="HL23PV_pop" postsynapticPopulation="HL23SST_pop" synapse="HL23PV_HL23SST_ProbUDFsyn">
            <connectionWD id="0" preCellId="../HL23PV_pop/6/HL23PV_sim" postCellId="../HL23SST_pop/0/HL23SST_sim" postSegmentId="987" postFractionAlong="0.249061547312029" weight="10.0" delay="0.5 ms"/>
            <connectionWD id="1" preCellId="../HL23PV_pop/6/HL23PV_sim" postCellId="../HL23SST_pop/0/HL23SST_sim" postSegmentId="1334" postFractionAlong="0.468992454364973" weight="10.0" delay="0.5 ms"/>
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        </projection>
        <projection id="proj_HL23PV_HL23PV" presynapticPopulation="HL23PV_pop" postsynapticPopulation="HL23PV_pop" synapse="HL23PV_HL23PV_ProbUDFsyn">
            <connectionWD id="0" preCellId="../HL23PV_pop/1/HL23PV_sim" postCellId="../HL23PV_pop/0/HL23PV_sim" postSegmentId="3925" postFractionAlong="0.515671703538468" weight="10.0" delay="0.5 ms"/>
            <connectionWD id="1" preCellId="../HL23PV_pop/1/HL23PV_sim" postCellId="../HL23PV_pop/0/HL23PV_sim" postSegmentId="1871" postFractionAlong="0.255876772452136" weight="10.0" delay="0.5 ms"/>
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        </projection>
        <projection id="proj_HL23PV_HL23VIP" presynapticPopulation="HL23PV_pop" postsynapticPopulation="HL23VIP_pop" synapse="HL23PV_HL23VIP_ProbUDFsyn">
            <connectionWD id="0" preCellId="../HL23PV_pop/1/HL23PV_sim" postCellId="../HL23VIP_pop/5/HL23VIP_sim" postSegmentId="874" postFractionAlong="0.468495429656292" weight="10.0" delay="0.5 ms"/>
            <connectionWD id="1" preCellId="../HL23PV_pop/1/HL23PV_sim" postCellId="../HL23VIP_pop/5/HL23VIP_sim" postSegmentId="1412" postFractionAlong="0.382577834033916" weight="10.0" delay="0.5 ms"/>
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        </projection>
        <projection id="proj_HL23VIP_HL23SST" presynapticPopulation="HL23VIP_pop" postsynapticPopulation="HL23SST_pop" synapse="HL23VIP_HL23SST_ProbUDFsyn">
            <connectionWD id="0" preCellId="../HL23VIP_pop/6/HL23VIP_sim" postCellId="../HL23SST_pop/0/HL23SST_sim" postSegmentId="1598" postFractionAlong="0.05503924621042" weight="10.0" delay="0.5 ms"/>
            <connectionWD id="1" preCellId="../HL23VIP_pop/6/HL23VIP_sim" postCellId="../HL23SST_pop/0/HL23SST_sim" postSegmentId="37" postFractionAlong="0.853657816944775" weight="10.0" delay="0.5 ms"/>
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        </projection>
        <projection id="proj_HL23VIP_HL23PV" presynapticPopulation="HL23VIP_pop" postsynapticPopulation="HL23PV_pop" synapse="HL23VIP_HL23PV_ProbUDFsyn">
            <connectionWD id="0" preCellId="../HL23VIP_pop/2/HL23VIP_sim" postCellId="../HL23PV_pop/0/HL23PV_sim" postSegmentId="1383" postFractionAlong="0.279293430259161" weight="10.0" delay="0.5 ms"/>
            <connectionWD id="1" preCellId="../HL23VIP_pop/2/HL23VIP_sim" postCellId="../HL23PV_pop/0/HL23PV_sim" postSegmentId="3530" postFractionAlong="0.632255279060272" weight="10.0" delay="0.5 ms"/>
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        </projection>
        <projection id="proj_HL23VIP_HL23VIP" presynapticPopulation="HL23VIP_pop" postsynapticPopulation="HL23VIP_pop" synapse="HL23VIP_HL23VIP_ProbUDFsyn">
            <connectionWD id="0" preCellId="../HL23VIP_pop/3/HL23VIP_sim" postCellId="../HL23VIP_pop/2/HL23VIP_sim" postSegmentId="1127" postFractionAlong="0.891630705089685" weight="10.0" delay="0.5 ms"/>
            <connectionWD id="1" preCellId="../HL23VIP_pop/3/HL23VIP_sim" postCellId="../HL23VIP_pop/2/HL23VIP_sim" postSegmentId="488" postFractionAlong="0.945459645942526" weight="10.0" delay="0.5 ms"/>
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        </projection>
        <inputList id="Gfluct_0" population="HL23PYR_pop" component="Gfluct_HL23PYR_0_5">
            <input id="0" target="../HL23PYR_pop/0/HL23PYR_sim" destination="synapses" segmentId="905" fractionAlong="0.885114796445408"/>
            <input id="1" target="../HL23PYR_pop/1/HL23PYR_sim" destination="synapses" segmentId="905" fractionAlong="0.885114796445408"/>
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        </inputList>
        <inputList id="Gfluct_1" population="HL23PYR_pop" component="Gfluct_HL23PYR_0_1">
            <input id="1440" target="../HL23PYR_pop/0/HL23PYR_sim" destination="synapses" segmentId="5626" fractionAlong="0.9431395536055"/>
            <input id="1441" target="../HL23PYR_pop/1/HL23PYR_sim" destination="synapses" segmentId="5626" fractionAlong="0.9431395536055"/>
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        </inputList>
        <inputList id="Gfluct_2" population="HL23PYR_pop" component="Gfluct_HL23PYR_0_3">
            <input id="2160" target="../HL23PYR_pop/0/HL23PYR_sim" destination="synapses" segmentId="2316" fractionAlong="0.982179433270446"/>
            <input id="2161" target="../HL23PYR_pop/1/HL23PYR_sim" destination="synapses" segmentId="2316" fractionAlong="0.982179433270446"/>
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        </inputList>
        <inputList id="Gfluct_3" population="HL23PYR_pop" component="Gfluct_HL23PYR_0_7">
            <input id="3040" target="../HL23PYR_pop/0/HL23PYR_sim" destination="synapses" segmentId="3938" fractionAlong="0.516208173623192"/>
            <input id="3041" target="../HL23PYR_pop/1/HL23PYR_sim" destination="synapses" segmentId="3938" fractionAlong="0.516208173623192"/>
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        </inputList>
        <inputList id="Gfluct_4" population="HL23PYR_pop" component="Gfluct_HL23PYR_0_9">
            <input id="4000" target="../HL23PYR_pop/0/HL23PYR_sim" destination="synapses" segmentId="2813" fractionAlong="0.971705983774493"/>
            <input id="4001" target="../HL23PYR_pop/1/HL23PYR_sim" destination="synapses" segmentId="2813" fractionAlong="0.971705983774493"/>
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        </inputList>
        <inputList id="Gfluct_5" population="HL23SST_pop" component="Gfluct_HL23SST_0_5">
            <input id="4560" target="../HL23SST_pop/0/HL23SST_sim" destination="synapses" segmentId="2955" fractionAlong="0.992363905920124"/>
            <input id="4561" target="../HL23SST_pop/1/HL23SST_sim" destination="synapses" segmentId="2955" fractionAlong="0.992363905920124"/>
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        </inputList>
        <inputList id="Gfluct_6" population="HL23PV_pop" component="Gfluct_HL23PV_0_5">
            <input id="4660" target="../HL23PV_pop/0/HL23PV_sim" destination="synapses" segmentId="1836" fractionAlong="0.991164515108885"/>
            <input id="4661" target="../HL23PV_pop/1/HL23PV_sim" destination="synapses" segmentId="1836" fractionAlong="0.991164515108885"/>
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        </inputList>
        <inputList id="Gfluct_7" population="HL23VIP_pop" component="Gfluct_HL23VIP_0_5">
            <input id="4737" target="../HL23VIP_pop/0/HL23VIP_sim" destination="synapses" segmentId="1218" fractionAlong="0.98143834656655"/>
            <input id="4738" target="../HL23VIP_pop/1/HL23VIP_sim" destination="synapses" segmentId="1218" fractionAlong="0.98143834656655"/>
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        </inputList>
    </network>
</neuroml>
