<neuroml xmlns="http://www.neuroml.org/schema/neuroml2"  xmlns:xs="http://www.w3.org/2001/XMLSchema" xmlns:xsi="http://www.w3.org/2001/XMLSchema-instance" xsi:schemaLocation="http://www.neuroml.org/schema/neuroml2 https://raw.github.com/NeuroML/NeuroML2/development/Schemas/NeuroML2/NeuroML_v2.3.1.xsd" id="HL23Network">
    <include href="rotated_cells/HL23PYR_sim.cell.nml"/>
    <include href="rotated_cells/HL23SST_sim.cell.nml"/>
    <include href="rotated_cells/HL23PV_sim.cell.nml"/>
    <include href="rotated_cells/HL23VIP_sim.cell.nml"/>
    <network id="HL23Network" temperature="34.0 degC">
        <notes>L23 network at 0.2 scale</notes>
        <population id="HL23PYR_pop" component="HL23PYR_sim" type="populationList">
            <property tag="region" value="L23"/>
            <instance id="0">
                <location x="-224.803300636861707" y="-5.805105764465801" z="-979.304497782459066"/>
            </instance>
            <instance id="1">
                <location x="-36.051439922683947" y="102.297502715769042" z="-636.885196760361282"/>
            </instance>
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        </population>
        <population id="HL23SST_pop" component="HL23SST_sim" type="populationList">
            <property tag="region" value="L23"/>
            <instance id="0">
                <location x="44.921359908303039" y="49.932050003806296" z="-990.870141338771077"/>
            </instance>
            <instance id="1">
                <location x="-165.624234715476945" y="38.647128269294285" z="-991.237403691974237"/>
            </instance>
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        </population>
        <population id="HL23PV_pop" component="HL23PV_sim" type="populationList">
            <property tag="region" value="L23"/>
            <instance id="0">
                <location x="-150.38813344036501" y="128.256798996629385" z="-1191.954516681976202"/>
            </instance>
            <instance id="1">
                <location x="-8.458658029487253" y="-217.017589281371926" z="-1492.829265360044246"/>
            </instance>
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        </population>
        <population id="HL23VIP_pop" component="HL23VIP_sim" type="populationList">
            <property tag="region" value="L23"/>
            <instance id="0">
                <location x="107.220515394643002" y="-133.086804324342381" z="-1204.071243995782879"/>
            </instance>
            <instance id="1">
                <location x="54.068416949295873" y="126.592573039544305" z="-985.45942520956055"/>
            </instance>
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        </population>
        <projection id="proj_HL23PYR_HL23PYR" presynapticPopulation="HL23PYR_pop" postsynapticPopulation="HL23PYR_pop" synapse="HL23PYR_HL23PYR_ProbAMPANMDA">
            <connectionWD id="0" preCellId="../HL23PYR_pop/80/HL23PYR_sim" postCellId="../HL23PYR_pop/0/HL23PYR_sim" postSegmentId="440" postFractionAlong="0.779426423225043" weight="5.0" delay="0.5 ms"/>
            <connectionWD id="1" preCellId="../HL23PYR_pop/80/HL23PYR_sim" postCellId="../HL23PYR_pop/0/HL23PYR_sim" postSegmentId="3998" postFractionAlong="0.532262416639108" weight="5.0" delay="0.5 ms"/>
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        </projection>
        <projection id="proj_HL23PYR_HL23SST" presynapticPopulation="HL23PYR_pop" postsynapticPopulation="HL23SST_pop" synapse="HL23PYR_HL23SST_ProbAMPANMDA">
            <connectionWD id="0" preCellId="../HL23PYR_pop/90/HL23PYR_sim" postCellId="../HL23SST_pop/1/HL23SST_sim" postSegmentId="2053" postFractionAlong="0.876247085230051" weight="5.0" delay="0.5 ms"/>
            <connectionWD id="1" preCellId="../HL23PYR_pop/90/HL23PYR_sim" postCellId="../HL23SST_pop/1/HL23SST_sim" postSegmentId="554" postFractionAlong="0.533195087917739" weight="5.0" delay="0.5 ms"/>
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        </projection>
        <projection id="proj_HL23PYR_HL23PV" presynapticPopulation="HL23PYR_pop" postsynapticPopulation="HL23PV_pop" synapse="HL23PYR_HL23PV_ProbAMPANMDA">
            <connectionWD id="0" preCellId="../HL23PYR_pop/20/HL23PYR_sim" postCellId="../HL23PV_pop/0/HL23PV_sim" postSegmentId="2679" postFractionAlong="0.899218764477517" weight="5.0" delay="0.5 ms"/>
            <connectionWD id="1" preCellId="../HL23PYR_pop/20/HL23PYR_sim" postCellId="../HL23PV_pop/0/HL23PV_sim" postSegmentId="867" postFractionAlong="0.932961628197045" weight="5.0" delay="0.5 ms"/>
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        </projection>
        <projection id="proj_HL23PYR_HL23VIP" presynapticPopulation="HL23PYR_pop" postsynapticPopulation="HL23VIP_pop" synapse="HL23PYR_HL23VIP_ProbAMPANMDA">
            <connectionWD id="0" preCellId="../HL23PYR_pop/10/HL23PYR_sim" postCellId="../HL23VIP_pop/12/HL23VIP_sim" postSegmentId="2921" postFractionAlong="0.618821534662945" weight="5.0" delay="0.5 ms"/>
            <connectionWD id="1" preCellId="../HL23PYR_pop/10/HL23PYR_sim" postCellId="../HL23VIP_pop/12/HL23VIP_sim" postSegmentId="1482" postFractionAlong="0.266769619757607" weight="5.0" delay="0.5 ms"/>
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        </projection>
        <projection id="proj_HL23SST_HL23PYR" presynapticPopulation="HL23SST_pop" postsynapticPopulation="HL23PYR_pop" synapse="HL23SST_HL23PYR_ProbUDFsyn">
            <connectionWD id="0" preCellId="../HL23SST_pop/0/HL23SST_sim" postCellId="../HL23PYR_pop/0/HL23PYR_sim" postSegmentId="5796" postFractionAlong="0.614038006598716" weight="5.0" delay="0.5 ms"/>
            <connectionWD id="1" preCellId="../HL23SST_pop/0/HL23SST_sim" postCellId="../HL23PYR_pop/0/HL23PYR_sim" postSegmentId="1947" postFractionAlong="0.560368351370677" weight="5.0" delay="0.5 ms"/>
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        </projection>
        <projection id="proj_HL23SST_HL23SST" presynapticPopulation="HL23SST_pop" postsynapticPopulation="HL23SST_pop" synapse="HL23SST_HL23SST_ProbUDFsyn">
            <connectionWD id="0" preCellId="../HL23SST_pop/0/HL23SST_sim" postCellId="../HL23SST_pop/1/HL23SST_sim" postSegmentId="153" postFractionAlong="0.699287023915353" weight="5.0" delay="0.5 ms"/>
            <connectionWD id="1" preCellId="../HL23SST_pop/0/HL23SST_sim" postCellId="../HL23SST_pop/1/HL23SST_sim" postSegmentId="3291" postFractionAlong="0.156002895423176" weight="5.0" delay="0.5 ms"/>
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        </projection>
        <projection id="proj_HL23SST_HL23PV" presynapticPopulation="HL23SST_pop" postsynapticPopulation="HL23PV_pop" synapse="HL23SST_HL23PV_ProbUDFsyn">
            <connectionWD id="0" preCellId="../HL23SST_pop/8/HL23SST_sim" postCellId="../HL23PV_pop/11/HL23PV_sim" postSegmentId="3889" postFractionAlong="0.200709767880859" weight="5.0" delay="0.5 ms"/>
            <connectionWD id="1" preCellId="../HL23SST_pop/8/HL23SST_sim" postCellId="../HL23PV_pop/11/HL23PV_sim" postSegmentId="1485" postFractionAlong="0.153737398821598" weight="5.0" delay="0.5 ms"/>
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        </projection>
        <projection id="proj_HL23SST_HL23VIP" presynapticPopulation="HL23SST_pop" postsynapticPopulation="HL23VIP_pop" synapse="HL23SST_HL23VIP_ProbUDFsyn">
            <connectionWD id="0" preCellId="../HL23SST_pop/9/HL23SST_sim" postCellId="../HL23VIP_pop/12/HL23VIP_sim" postSegmentId="1876" postFractionAlong="0.031547188517759" weight="5.0" delay="0.5 ms"/>
            <connectionWD id="1" preCellId="../HL23SST_pop/9/HL23SST_sim" postCellId="../HL23VIP_pop/12/HL23VIP_sim" postSegmentId="222" postFractionAlong="0.633944368635897" weight="5.0" delay="0.5 ms"/>
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        </projection>
        <projection id="proj_HL23PV_HL23PYR" presynapticPopulation="HL23PV_pop" postsynapticPopulation="HL23PYR_pop" synapse="HL23PV_HL23PYR_ProbUDFsyn">
            <connectionWD id="0" preCellId="../HL23PV_pop/7/HL23PV_sim" postCellId="../HL23PYR_pop/0/HL23PYR_sim" postSegmentId="1528" postFractionAlong="0.307179108841996" weight="5.0" delay="0.5 ms"/>
            <connectionWD id="1" preCellId="../HL23PV_pop/7/HL23PV_sim" postCellId="../HL23PYR_pop/0/HL23PYR_sim" postSegmentId="70" postFractionAlong="0.375954722343635" weight="5.0" delay="0.5 ms"/>
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        </projection>
        <projection id="proj_HL23PV_HL23SST" presynapticPopulation="HL23PV_pop" postsynapticPopulation="HL23SST_pop" synapse="HL23PV_HL23SST_ProbUDFsyn">
            <connectionWD id="0" preCellId="../HL23PV_pop/1/HL23PV_sim" postCellId="../HL23SST_pop/1/HL23SST_sim" postSegmentId="2418" postFractionAlong="0.880228410745822" weight="5.0" delay="0.5 ms"/>
            <connectionWD id="1" preCellId="../HL23PV_pop/1/HL23PV_sim" postCellId="../HL23SST_pop/1/HL23SST_sim" postSegmentId="987" postFractionAlong="0.249061547312029" weight="5.0" delay="0.5 ms"/>
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        </projection>
        <projection id="proj_HL23PV_HL23PV" presynapticPopulation="HL23PV_pop" postsynapticPopulation="HL23PV_pop" synapse="HL23PV_HL23PV_ProbUDFsyn">
            <connectionWD id="0" preCellId="../HL23PV_pop/3/HL23PV_sim" postCellId="../HL23PV_pop/0/HL23PV_sim" postSegmentId="1015" postFractionAlong="0.249597686506409" weight="5.0" delay="0.5 ms"/>
            <connectionWD id="1" preCellId="../HL23PV_pop/3/HL23PV_sim" postCellId="../HL23PV_pop/0/HL23PV_sim" postSegmentId="1252" postFractionAlong="0.112993439744885" weight="5.0" delay="0.5 ms"/>
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        </projection>
        <projection id="proj_HL23PV_HL23VIP" presynapticPopulation="HL23PV_pop" postsynapticPopulation="HL23VIP_pop" synapse="HL23PV_HL23VIP_ProbUDFsyn">
            <connectionWD id="0" preCellId="../HL23PV_pop/7/HL23PV_sim" postCellId="../HL23VIP_pop/12/HL23VIP_sim" postSegmentId="488" postFractionAlong="0.945459645942526" weight="5.0" delay="0.5 ms"/>
            <connectionWD id="1" preCellId="../HL23PV_pop/7/HL23PV_sim" postCellId="../HL23VIP_pop/12/HL23VIP_sim" postSegmentId="80" postFractionAlong="0.412126817806471" weight="5.0" delay="0.5 ms"/>
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        </projection>
        <projection id="proj_HL23VIP_HL23SST" presynapticPopulation="HL23VIP_pop" postsynapticPopulation="HL23SST_pop" synapse="HL23VIP_HL23SST_ProbUDFsyn">
            <connectionWD id="0" preCellId="../HL23VIP_pop/11/HL23VIP_sim" postCellId="../HL23SST_pop/1/HL23SST_sim" postSegmentId="3193" postFractionAlong="0.308648592077464" weight="5.0" delay="0.5 ms"/>
            <connectionWD id="1" preCellId="../HL23VIP_pop/11/HL23VIP_sim" postCellId="../HL23SST_pop/1/HL23SST_sim" postSegmentId="1075" postFractionAlong="0.888978645635576" weight="5.0" delay="0.5 ms"/>
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        </projection>
        <projection id="proj_HL23VIP_HL23PV" presynapticPopulation="HL23VIP_pop" postsynapticPopulation="HL23PV_pop" synapse="HL23VIP_HL23PV_ProbUDFsyn">
            <connectionWD id="0" preCellId="../HL23VIP_pop/15/HL23VIP_sim" postCellId="../HL23PV_pop/0/HL23PV_sim" postSegmentId="1334" postFractionAlong="0.582097051160339" weight="5.0" delay="0.5 ms"/>
            <connectionWD id="1" preCellId="../HL23VIP_pop/15/HL23VIP_sim" postCellId="../HL23PV_pop/0/HL23PV_sim" postSegmentId="3563" postFractionAlong="0.459622923808462" weight="5.0" delay="0.5 ms"/>
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        </projection>
        <projection id="proj_HL23VIP_HL23VIP" presynapticPopulation="HL23VIP_pop" postsynapticPopulation="HL23VIP_pop" synapse="HL23VIP_HL23VIP_ProbUDFsyn">
            <connectionWD id="0" preCellId="../HL23VIP_pop/7/HL23VIP_sim" postCellId="../HL23VIP_pop/12/HL23VIP_sim" postSegmentId="2593" postFractionAlong="0.026797773431082" weight="5.0" delay="0.5 ms"/>
            <connectionWD id="1" preCellId="../HL23VIP_pop/7/HL23VIP_sim" postCellId="../HL23VIP_pop/12/HL23VIP_sim" postSegmentId="2833" postFractionAlong="0.073068363618622" weight="5.0" delay="0.5 ms"/>
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        </projection>
        <inputList id="Gfluct_0" population="HL23PYR_pop" component="Gfluct_HL23PYR_0_5">
            <input id="0" target="../HL23PYR_pop/0/HL23PYR_sim" destination="synapses" segmentId="905" fractionAlong="0.885114796445408"/>
            <input id="1" target="../HL23PYR_pop/1/HL23PYR_sim" destination="synapses" segmentId="905" fractionAlong="0.885114796445408"/>
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        </inputList>
        <inputList id="Gfluct_1" population="HL23PYR_pop" component="Gfluct_HL23PYR_0_1">
            <input id="2880" target="../HL23PYR_pop/0/HL23PYR_sim" destination="synapses" segmentId="5626" fractionAlong="0.9431395536055"/>
            <input id="2881" target="../HL23PYR_pop/1/HL23PYR_sim" destination="synapses" segmentId="5626" fractionAlong="0.9431395536055"/>
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        </inputList>
        <inputList id="Gfluct_2" population="HL23PYR_pop" component="Gfluct_HL23PYR_0_3">
            <input id="4320" target="../HL23PYR_pop/0/HL23PYR_sim" destination="synapses" segmentId="2316" fractionAlong="0.982179433270446"/>
            <input id="4321" target="../HL23PYR_pop/1/HL23PYR_sim" destination="synapses" segmentId="2316" fractionAlong="0.982179433270446"/>
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        </inputList>
        <inputList id="Gfluct_3" population="HL23PYR_pop" component="Gfluct_HL23PYR_0_7">
            <input id="6080" target="../HL23PYR_pop/0/HL23PYR_sim" destination="synapses" segmentId="3938" fractionAlong="0.516208173623192"/>
            <input id="6081" target="../HL23PYR_pop/1/HL23PYR_sim" destination="synapses" segmentId="3938" fractionAlong="0.516208173623192"/>
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        </inputList>
        <inputList id="Gfluct_4" population="HL23PYR_pop" component="Gfluct_HL23PYR_0_9">
            <input id="8000" target="../HL23PYR_pop/0/HL23PYR_sim" destination="synapses" segmentId="2813" fractionAlong="0.971705983774493"/>
            <input id="8001" target="../HL23PYR_pop/1/HL23PYR_sim" destination="synapses" segmentId="2813" fractionAlong="0.971705983774493"/>
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        </inputList>
        <inputList id="Gfluct_5" population="HL23SST_pop" component="Gfluct_HL23SST_0_5">
            <input id="9120" target="../HL23SST_pop/0/HL23SST_sim" destination="synapses" segmentId="2955" fractionAlong="0.992363905920124"/>
            <input id="9121" target="../HL23SST_pop/1/HL23SST_sim" destination="synapses" segmentId="2955" fractionAlong="0.992363905920124"/>
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        </inputList>
        <inputList id="Gfluct_6" population="HL23PV_pop" component="Gfluct_HL23PV_0_5">
            <input id="9320" target="../HL23PV_pop/0/HL23PV_sim" destination="synapses" segmentId="1836" fractionAlong="0.991164515108885"/>
            <input id="9321" target="../HL23PV_pop/1/HL23PV_sim" destination="synapses" segmentId="1836" fractionAlong="0.991164515108885"/>
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        </inputList>
        <inputList id="Gfluct_7" population="HL23VIP_pop" component="Gfluct_HL23VIP_0_5">
            <input id="9474" target="../HL23VIP_pop/0/HL23VIP_sim" destination="synapses" segmentId="1218" fractionAlong="0.98143834656655"/>
            <input id="9475" target="../HL23VIP_pop/1/HL23VIP_sim" destination="synapses" segmentId="1218" fractionAlong="0.98143834656655"/>
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        </inputList>
    </network>
</neuroml>
