<neuroml xmlns="http://www.neuroml.org/schema/neuroml2"  xmlns:xs="http://www.w3.org/2001/XMLSchema" xmlns:xsi="http://www.w3.org/2001/XMLSchema-instance" xsi:schemaLocation="http://www.neuroml.org/schema/neuroml2 https://raw.github.com/NeuroML/NeuroML2/development/Schemas/NeuroML2/NeuroML_v2.3.xsd" id="NeuroML2_file_exported_from_NEURON">
    <notes> NeuroML 2 file generated from ModelView by: NEURON -- VERSION 8.0.2 (Fedora 37) master (f0ca745418e942ad4763bdc47459c409f0b11512) 2022-07-22
          Authors: Michael Hines, Sushil Kambampati and Padraig Gleeson,
          Yale University and UCL
  </notes>
    <include href="CaDynamics_E2_NML2.nml"/>
    <include href="pas.channel.nml"/>
    <include href="Ih.channel.nml"/>
    <include href="NaTg.channel.nml"/>
    <include href="Nap.channel.nml"/>
    <include href="K_P.channel.nml"/>
    <include href="K_T.channel.nml"/>
    <include href="Kv3_1.channel.nml"/>
    <include href="Im.channel.nml"/>
    <include href="SK.channel.nml"/>
    <include href="Ca_HVA.channel.nml"/>
    <include href="Ca_LVA.channel.nml"/>
    <cell id="HL23PV">
        <notes>Cell: HL23PV exported from NEURON ModelView. Reference: Yao, H. K.; Guet-McCreight, A.; Mazza, F.; Moradi Chameh, H.; Prevot, T. D.; Griffiths, J. D.; Tripathy, S. J.; Valiante, T. A.; Sibille, E. &amp; Hay, E.  Reduced inhibition in depression impairs stimulus processing in human cortical microcircuits Cell Reports, Elsevier, 2022, 38</notes>
        <morphology id="morphology">
            <segment id="0" name="Seg0_soma_0">
                <proximal x="608.193" y="557.609" z="30.8661" diameter="13.6136"/>
                <distal x="615.0" y="557.609" z="30.8661" diameter="13.6136"/>
            </segment>
            <segment id="2" name="Seg1_soma_0">
                <parent segment="0"/>
                <distal x="621.806" y="557.609" z="30.8661" diameter="13.6136"/>
            </segment>
            <segment id="2678" name="Seg0_dend_32">
                <parent segment="0"/>
                <proximal x="618.888" y="560.916" z="36.6856" diameter="1.1744"/>
                <distal x="619.745" y="561.596" z="37.6242" diameter="1.0794"/>
            </segment>
            <segment id="2679" name="Seg1_dend_32">
                <parent segment="2678"/>
                <distal x="620.634" y="562.276" z="38.4045" diameter="1.029"/>
            </segment>
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            <segmentGroup id="soma_0" neuroLexId="sao864921383">
                <notes>This group contains an unbranched set of segments, and all of the segmentGroups marked with
             neuroLexId = sao864921383 form a non-overlapping set of all of the segments.
             These segmentGroups correspond to the 'cables' of NeuroML v1.8.1, and map to/from NEURON sections.</notes>
                <member segment="0"/>
                <member segment="2"/>
            </segmentGroup>
            <segmentGroup id="dend_32" neuroLexId="sao864921383">
                <notes>This group contains an unbranched set of segments, and all of the segmentGroups marked with
             neuroLexId = sao864921383 form a non-overlapping set of all of the segments.
             These segmentGroups correspond to the 'cables' of NeuroML v1.8.1, and map to/from NEURON sections.</notes>
                <member segment="2678"/>
                <member segment="2679"/>
                <member segment="2680"/>
                <member segment="2681"/>
            </segmentGroup>
            <segmentGroup id="dend_27" neuroLexId="sao864921383">
                <notes>This group contains an unbranched set of segments, and all of the segmentGroups marked with
             neuroLexId = sao864921383 form a non-overlapping set of all of the segments.
             These segmentGroups correspond to the 'cables' of NeuroML v1.8.1, and map to/from NEURON sections.</notes>
                <member segment="2423"/>
                <member segment="2424"/>
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            </segmentGroup>
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            <segmentGroup id="axon_0" neuroLexId="sao864921383">
                <notes>This group contains an unbranched set of segments, and all of the segmentGroups marked with
             neuroLexId = sao864921383 form a non-overlapping set of all of the segments.
             These segmentGroups correspond to the 'cables' of NeuroML v1.8.1, and map to/from NEURON sections.</notes>
                <member segment="4483"/>
                <member segment="4484"/>
            </segmentGroup>
            <segmentGroup id="dend_44" neuroLexId="sao864921383">
                <notes>This group contains an unbranched set of segments, and all of the segmentGroups marked with
             neuroLexId = sao864921383 form a non-overlapping set of all of the segments.
             These segmentGroups correspond to the 'cables' of NeuroML v1.8.1, and map to/from NEURON sections.</notes>
                <member segment="3817"/>
                <member segment="3818"/>
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            </segmentGroup>
            <segmentGroup id="dend_33" neuroLexId="sao864921383">
                <notes>This group contains an unbranched set of segments, and all of the segmentGroups marked with
             neuroLexId = sao864921383 form a non-overlapping set of all of the segments.
             These segmentGroups correspond to the 'cables' of NeuroML v1.8.1, and map to/from NEURON sections.</notes>
                <member segment="2682"/>
                <member segment="2683"/>
                <member segment="2684"/>
            </segmentGroup>
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            <segmentGroup id="axon_1" neuroLexId="sao864921383">
                <notes>This group contains an unbranched set of segments, and all of the segmentGroups marked with
             neuroLexId = sao864921383 form a non-overlapping set of all of the segments.
             These segmentGroups correspond to the 'cables' of NeuroML v1.8.1, and map to/from NEURON sections.</notes>
                <member segment="4485"/>
                <member segment="4486"/>
            </segmentGroup>
            <segmentGroup id="dend_46" neuroLexId="sao864921383">
                <notes>This group contains an unbranched set of segments, and all of the segmentGroups marked with
             neuroLexId = sao864921383 form a non-overlapping set of all of the segments.
             These segmentGroups correspond to the 'cables' of NeuroML v1.8.1, and map to/from NEURON sections.</notes>
                <member segment="4096"/>
                <member segment="4097"/>
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            </segmentGroup>
            <segmentGroup id="dend_45" neuroLexId="sao864921383">
                <notes>This group contains an unbranched set of segments, and all of the segmentGroups marked with
             neuroLexId = sao864921383 form a non-overlapping set of all of the segments.
             These segmentGroups correspond to the 'cables' of NeuroML v1.8.1, and map to/from NEURON sections.</notes>
                <property tag="numberInternalDivisions" value="15"/>
                <member segment="3826"/>
                <member segment="3827"/>
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            </segmentGroup>
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        </morphology>
        <biophysicalProperties id="biophys">
            <membraneProperties>
                <channelDensity id="pas" ionChannel="pas" condDensity="0.00011830111773572024 S_per_cm2" erev="-83.92924122901199 mV" ion="pas"/>
                <channelDensity id="Ih" ionChannel="Ih" condDensity="2.7671764064314368e-05 S_per_cm2" erev="-45 mV" ion="hcn"/>
                <channelDensity id="NaTg_somatic" ionChannel="NaTg" condDensity="0.49958525078702043 S_per_cm2" erev="50 mV" segmentGroup="soma_0" ion="Na"/>
                <channelDensity id="Nap_somatic" ionChannel="Nap" condDensity="0.008795461417521086 S_per_cm2" erev="50 mV" segmentGroup="soma_0" ion="Na"/>
                <channelDensity id="K_P_somatic" ionChannel="K_P" condDensity="9.606092478937705e-06 S_per_cm2" erev="-85 mV" segmentGroup="soma_0" ion="K"/>
                <channelDensity id="K_T_somatic" ionChannel="K_T" condDensity="0.0011701702607527396 S_per_cm2" erev="-85 mV" segmentGroup="soma_0" ion="K"/>
                <channelDensity id="Kv3_1_somatic" ionChannel="Kv3_1" condDensity="2.9921080101237565 S_per_cm2" erev="-85 mV" segmentGroup="soma_0" ion="K"/>
                <channelDensity id="Im_somatic" ionChannel="Im" condDensity="0.04215865946497755 S_per_cm2" erev="-85 mV" segmentGroup="soma_0" ion="K"/>
                <channelDensity id="SK_somatic" ionChannel="SK" condDensity="3.7265770903193036e-06 S_per_cm2" erev="-85 mV" segmentGroup="soma_0" ion="K"/>
                <channelDensity id="NaTg_axonal" ionChannel="NaTg" condDensity="0.10914576408883477 S_per_cm2" erev="50 mV" segmentGroup="axon_0" ion="Na"/>
                <channelDensity id="Nap_axonal" ionChannel="Nap" condDensity="0.001200899579358837 S_per_cm2" erev="50 mV" segmentGroup="axon_0" ion="Na"/>
                <channelDensity id="K_P_axonal" ionChannel="K_P" condDensity="0.6854776593761795 S_per_cm2" erev="-85 mV" segmentGroup="axon_0" ion="K"/>
                <channelDensity id="K_T_axonal" ionChannel="K_T" condDensity="0.07603372775662909 S_per_cm2" erev="-85 mV" segmentGroup="axon_0" ion="K"/>
                <channelDensity id="Kv3_1_axonal" ionChannel="Kv3_1" condDensity="2.988867483754507 S_per_cm2" erev="-85 mV" segmentGroup="axon_0" ion="K"/>
                <channelDensity id="Im_axonal" ionChannel="Im" condDensity="0.029587905136596156 S_per_cm2" erev="-85 mV" segmentGroup="axon_0" ion="K"/>
                <channelDensity id="SK_axonal" ionChannel="SK" condDensity="0.5121938998281017 S_per_cm2" erev="-85 mV" segmentGroup="axon_0" ion="K"/>
                <channelDensity id="NaTg_axonal" ionChannel="NaTg" condDensity="0.10914576408883477 S_per_cm2" erev="50 mV" segmentGroup="axon_1" ion="Na"/>
                <channelDensity id="Nap_axonal" ionChannel="Nap" condDensity="0.001200899579358837 S_per_cm2" erev="50 mV" segmentGroup="axon_1" ion="Na"/>
                <channelDensity id="K_P_axonal" ionChannel="K_P" condDensity="0.6854776593761795 S_per_cm2" erev="-85 mV" segmentGroup="axon_1" ion="K"/>
                <channelDensity id="K_T_axonal" ionChannel="K_T" condDensity="0.07603372775662909 S_per_cm2" erev="-85 mV" segmentGroup="axon_1" ion="K"/>
                <channelDensity id="Kv3_1_axonal" ionChannel="Kv3_1" condDensity="2.988867483754507 S_per_cm2" erev="-85 mV" segmentGroup="axon_1" ion="K"/>
                <channelDensity id="Im_axonal" ionChannel="Im" condDensity="0.029587905136596156 S_per_cm2" erev="-85 mV" segmentGroup="axon_1" ion="K"/>
                <channelDensity id="SK_axonal" ionChannel="SK" condDensity="0.5121938998281017 S_per_cm2" erev="-85 mV" segmentGroup="axon_1" ion="K"/>
                <channelDensityNernst id="Ca_HVA_somatic" ionChannel="Ca_HVA" condDensity="0.00017953651378188165 S_per_cm2" segmentGroup="soma_0" ion="ca"/>
                <channelDensityNernst id="Ca_LVA_somatic" ionChannel="Ca_LVA" condDensity="0.09250008555398015 S_per_cm2" segmentGroup="soma_0" ion="ca"/>
                <channelDensityNernst id="Ca_HVA_somatic" ionChannel="Ca_HVA" condDensity="0.002961469262723619 S_per_cm2" segmentGroup="axon_0" ion="ca"/>
                <channelDensityNernst id="Ca_LVA_axonal" ionChannel="Ca_LVA" condDensity="5.9457835817342756e-05 S_per_cm2" segmentGroup="axon_0" ion="ca"/>
                <channelDensityNernst id="Ca_HVA_somatic" ionChannel="Ca_HVA" condDensity="0.002961469262723619 S_per_cm2" segmentGroup="axon_1" ion="ca"/>
                <channelDensityNernst id="Ca_LVA_axonal" ionChannel="Ca_LVA" condDensity="5.9457835817342756e-05 S_per_cm2" segmentGroup="axon_1" ion="ca"/>
                <specificCapacitance value="2 uF_per_cm2"/>
            </membraneProperties>
            <intracellularProperties>
                <species id="ca" concentrationModel="CaDynamics_E2_NML2_PV_somatic" ion="ca" initialConcentration="5.0E-11 mol_per_cm3" initialExtConcentration="2.0E-6 mol_per_cm3" segmentGroup="soma_0"/>
                <species id="ca" concentrationModel="CaDynamics_E2_NML2_PV_axonal" ion="ca" initialConcentration="5.0E-11 mol_per_cm3" initialExtConcentration="2.0E-6 mol_per_cm3" segmentGroup="axon_0"/>
                <species id="ca" concentrationModel="CaDynamics_E2_NML2_PV_axonal" ion="ca" initialConcentration="5.0E-11 mol_per_cm3" initialExtConcentration="2.0E-6 mol_per_cm3" segmentGroup="axon_1"/>
                <resistivity value="0.1 kohm_cm"/>
            </intracellularProperties>
        </biophysicalProperties>
    </cell>
</neuroml>
