<?xml version="1.0" encoding="UTF-8"?>
<neuroml xmlns="http://www.neuroml.org/schema/neuroml2"
    xmlns:xsi="http://www.w3.org/2001/XMLSchema-instance"
    xsi:schemaLocation="http://www.neuroml.org/schema/neuroml2 https://raw.github.com/NeuroML/NeuroML2/development/Schemas/NeuroML2/NeuroML_v2beta4.xsd"
    id = "NeuroML2_file_exported_from_NEURON">

  <notes> NeuroML 2 file generated from ModelView by: NEURON -- VERSION 8.0.2 (Fedora 37) master (f0ca745418e942ad4763bdc47459c409f0b11512) 2022-07-22
          Authors: Michael Hines, Sushil Kambampati and Padraig Gleeson,
          Yale University and UCL
  </notes>

  <cell id="NeuronTemplate_0_0">
    <notes>Cell: NeuronTemplate_0_0 exported from NEURON ModelView</notes>
    <morphology id="morphology">
<!-- Section: NeuronTemplate[0].soma[0] (segmentGroup: soma_0) which has 3 3D points, so 2 segment(s)-->
      <segment id="0" name = "Seg0_soma_0">
        <proximal x="608.193" y="557.609" z="30.8661" diameter="13.6136"/>
        <distal x="615" y="557.609" z="30.8661" diameter="13.6136"/>
      </segment>
      <segment id="2" name = "Seg1_soma_0">
        <parent segment="0"/>
        <distal x="621.806" y="557.609" z="30.8661" diameter="13.6136"/>
      </segment>
<!-- Section: NeuronTemplate[0].dend[32] (segmentGroup: dend_32) which has 5 3D points, so 4 segment(s)-->
      <segment id="2678" name = "Seg0_dend_32">  <!-- Connected at 0.5 on parent section: NeuronTemplate[0].soma[0]  -->
        <parent segment="0"/>
        <proximal x="618.888" y="560.916" z="36.6856" diameter="1.1744"/>
        <distal x="619.745" y="561.596" z="37.6242" diameter="1.0794"/>
      </segment>
      <segment id="2679" name = "Seg1_dend_32">
        <parent segment="2678"/>
        <distal x="620.634" y="562.276" z="38.4045" diameter="1.029"/>
      </segment>
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
<!-- Section: NeuronTemplate[0].soma[0] (segmentGroup: soma_0) which has 3 3D points, so 2 segment(s)-->

      <segmentGroup id = "soma_0"  neuroLexId="sao864921383">
         <notes>This group contains an unbranched set of segments, and all of the segmentGroups marked with
             neuroLexId = sao864921383 form a non-overlapping set of all of the segments.
             These segmentGroups correspond to the 'cables' of NeuroML v1.8.1, and map to/from NEURON sections.</notes>
        <member segment = "0"/>
        <member segment = "2"/>
      </segmentGroup>

<!-- Section: NeuronTemplate[0].dend[32] (segmentGroup: dend_32) which has 5 3D points, so 4 segment(s)-->

      <segmentGroup id = "dend_32"  neuroLexId="sao864921383">
         <notes>This group contains an unbranched set of segments, and all of the segmentGroups marked with
             neuroLexId = sao864921383 form a non-overlapping set of all of the segments.
             These segmentGroups correspond to the 'cables' of NeuroML v1.8.1, and map to/from NEURON sections.</notes>
        <member segment = "2678"/>
        <member segment = "2679"/>
        <member segment = "2680"/>
        <member segment = "2681"/>
      </segmentGroup>

<!-- Section: NeuronTemplate[0].dend[27] (segmentGroup: dend_27) which has 7 3D points, so 6 segment(s)-->

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
    </morphology>
  </cell>

  <network id="network" type="networkWithTemperature" temperature="6 degC">
    <population id="Pop_NeuronTemplate_0_0" component="NeuronTemplate_0_0" size="1" type="populationList">
        <instance id="0">
            <location x="0" y="0" z="0"/>
        </instance>
    </population>
  </network>

</neuroml>
