<neuroml xmlns="http://www.neuroml.org/schema/neuroml2"  xmlns:xs="http://www.w3.org/2001/XMLSchema" xmlns:xsi="http://www.w3.org/2001/XMLSchema-instance" xsi:schemaLocation="http://www.neuroml.org/schema/neuroml2 https://raw.github.com/NeuroML/NeuroML2/development/Schemas/NeuroML2/NeuroML_v2.3.xsd" id="NeuroML2_file_exported_from_NEURON">
    <notes> NeuroML 2 file generated from ModelView by: NEURON -- VERSION 8.2.1 HEAD (c1590692) 2022-08-09
          Authors: Michael Hines, Sushil Kambampati and Padraig Gleeson,
          Yale University and UCL
  </notes>
    <include href="CaDynamics_E2_NML2.nml"/>
    <include href="channels/pas.channel.nml"/>
    <include href="channels/Ih.channel.nml"/>
    <include href="channels/SK.channel.nml"/>
    <include href="channels/K_T.channel.nml"/>
    <include href="channels/K_P.channel.nml"/>
    <include href="channels/Kv3_1.channel.nml"/>
    <include href="channels/Im.channel.nml"/>
    <include href="channels/NaTg/NaTg.channel.nml"/>
    <include href="channels/Ca_HVA.channel.nml"/>
    <include href="channels/Ca_LVA.channel.nml"/>
    <include href="channels/Nap.channel.nml"/>
    <cell id="HL23PYR">
        <notes>Cell: HL23PYR exported from NEURON ModelView. Reference: Yao, H. K.; Guet-McCreight, A.; Mazza, F.; Moradi Chameh, H.; Prevot, T. D.; Griffiths, J. D.; Tripathy, S. J.; Valiante, T. A.; Sibille, E. &amp; Hay, E.  Reduced inhibition in depression impairs stimulus processing in human cortical microcircuits Cell Reports, Elsevier, 2022, 38</notes>
        <morphology id="morphology">
            <segment id="0" name="Seg0_soma_0">
                <proximal x="508.534" y="577.616" z="36.2701" diameter="12.584"/>
                <distal x="514.826" y="577.616" z="36.2701" diameter="12.584"/>
            </segment>
            <segment id="2" name="Seg1_soma_0">
                <parent segment="0"/>
                <distal x="521.118" y="577.616" z="36.2701" diameter="12.584"/>
            </segment>
            <segment id="5805" name="Seg0_axon_0">
                <parent segment="0"/>
                <proximal x="514.826" y="577.616" z="36.2701" diameter="2.875"/>
                <distal x="515.605" y="579.458" z="36.2701" diameter="2.875"/>
            </segment>
            <segment id="5806" name="Seg1_axon_0">
                <parent segment="5805"/>
                <distal x="517.163" y="583.142" z="36.2701" diameter="2.625"/>
            </segment>
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            <segmentGroup id="soma_0" neuroLexId="sao864921383">
                <notes>This group contains an unbranched set of segments, and all of the segmentGroups marked with
             neuroLexId = sao864921383 form a non-overlapping set of all of the segments.
             These segmentGroups correspond to the 'cables' of NeuroML v1.8.1, and map to/from NEURON sections.</notes>
                <member segment="0"/>
                <member segment="2"/>
            </segmentGroup>
            <segmentGroup id="axon_0" neuroLexId="sao864921383">
                <notes>This group contains an unbranched set of segments, and all of the segmentGroups marked with
             neuroLexId = sao864921383 form a non-overlapping set of all of the segments.
             These segmentGroups correspond to the 'cables' of NeuroML v1.8.1, and map to/from NEURON sections.</notes>
                <property tag="numberInternalDivisions" value="5"/>
                <annotation>
                    <property xmlns="http://www.neuroml.org/schema/neuroml2" xmlns:xsi="http://www.w3.org/2001/XMLSchema-instance" tag="numberInternalDivisions" value="5"/>

                </annotation>
                <member segment="5805"/>
                <member segment="5806"/>
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            </segmentGroup>
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            <segmentGroup id="myelin_0" neuroLexId="sao864921383">
                <notes>This group contains an unbranched set of segments, and all of the segmentGroups marked with
             neuroLexId = sao864921383 form a non-overlapping set of all of the segments.
             These segmentGroups correspond to the 'cables' of NeuroML v1.8.1, and map to/from NEURON sections.</notes>
                <property tag="numberInternalDivisions" value="21"/>
                <annotation>
                    <property xmlns="http://www.neuroml.org/schema/neuroml2" xmlns:xsi="http://www.w3.org/2001/XMLSchema-instance" tag="numberInternalDivisions" value="21"/>

                </annotation>
                <member segment="5819"/>
                <member segment="5820"/>
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            </segmentGroup>
            <segmentGroup id="apic_55" neuroLexId="sao864921383">
                <notes>This group contains an unbranched set of segments, and all of the segmentGroups marked with
             neuroLexId = sao864921383 form a non-overlapping set of all of the segments.
             These segmentGroups correspond to the 'cables' of NeuroML v1.8.1, and map to/from NEURON sections.</notes>
                <member segment="5623"/>
                <member segment="5624"/>
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            </segmentGroup>
            <segmentGroup id="apic_54" neuroLexId="sao864921383">
                <notes>This group contains an unbranched set of segments, and all of the segmentGroups marked with
             neuroLexId = sao864921383 form a non-overlapping set of all of the segments.
             These segmentGroups correspond to the 'cables' of NeuroML v1.8.1, and map to/from NEURON sections.</notes>
                <property tag="numberInternalDivisions" value="7"/>
                <annotation>
                    <property xmlns="http://www.neuroml.org/schema/neuroml2" xmlns:xsi="http://www.w3.org/2001/XMLSchema-instance" tag="numberInternalDivisions" value="7"/>

                </annotation>
                <member segment="5499"/>
                <member segment="5500"/>
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            </segmentGroup>
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            <segmentGroup id="basal_dendrite_group" neuroLexId="GO:0030425">
                <notes>Basal dendrites</notes>
                <include segmentGroup="dend_0"/>
                <include segmentGroup="dend_20"/>
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            </segmentGroup>
            <segmentGroup id="apical_dendrite_group" neuroLexId="GO:0030425">
                <notes>Apical dendrite_group</notes>
                <include segmentGroup="apic_30"/>
                <include segmentGroup="apic_53"/>
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            </segmentGroup>
            <segmentGroup id="soma_group" neuroLexId="GO:0043025">
                <notes>Default soma segment group for the cell</notes>
                <include segmentGroup="soma_0"/>
            </segmentGroup>
            <segmentGroup id="axon_group" neuroLexId="GO:0030424">
                <notes>Default axon segment group for the cell</notes>
                <include segmentGroup="axon_1"/>
                <include segmentGroup="axon_0"/>
            </segmentGroup>
            <segmentGroup id="dendrite_group" neuroLexId="GO:0030425">
                <notes>Default dendrite segment group for the cell</notes>
                <include segmentGroup="apic_7"/>
                <include segmentGroup="apic_6"/>
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            </segmentGroup>
            <segmentGroup id="all">
                <include segmentGroup="apic_54"/>
                <include segmentGroup="apic_3"/>
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            </segmentGroup>
        </morphology>
        <biophysicalProperties id="biophys">
            <membraneProperties>
                <channelDensity id="pas" ionChannel="pas" condDensity="0.0000954 S_per_cm2" erev="-80 mV" ion="non_specific"/>
                <channelDensity id="Ih" ionChannel="Ih" condDensity="2.7671764064314368e-05 S_per_cm2" erev="-45 mV" ion="hcn"/>
                <channelDensity id="SK_somatic" ionChannel="SK" condDensity="0.000853 S_per_cm2" erev="-85 mV" segmentGroup="soma_group" ion="k"/>
                <channelDensity id="K_T_somatic" ionChannel="K_T" condDensity="0.0605 S_per_cm2" erev="-85 mV" segmentGroup="soma_group" ion="k"/>
                <channelDensity id="K_P_somatic" ionChannel="K_P" condDensity="0.000208 S_per_cm2" erev="-85 mV" segmentGroup="soma_group" ion="k"/>
                <channelDensity id="Kv3_1_somatic" ionChannel="Kv3_1" condDensity="0.0424 S_per_cm2" erev="-85 mV" segmentGroup="soma_group" ion="k"/>
                <channelDensity id="Ih_somatic" ionChannel="Ih" condDensity="0.000148 S_per_cm2" erev="-45 mV" segmentGroup="soma_group" ion="hcn"/>
                <channelDensity id="Im_somatic" ionChannel="Im" condDensity="0.000306 S_per_cm2" erev="-85 mV" segmentGroup="soma_group" ion="k"/>
                <channelDensity id="NaTg_somatic" ionChannel="NaTg_PYR_somatic" condDensity="0.272 S_per_cm2" erev="50 mV" segmentGroup="soma_group" ion="na"/>
                <channelDensity id="Ih_basal" ionChannel="Ih" condDensity="0.000000709 S_per_cm2" erev="-45 mV" segmentGroup="soma_group" ion="hcn"/>
                <channelDensity id="SK_axonal" ionChannel="SK" condDensity="0.0145 S_per_cm2" erev="-85 mV" segmentGroup="axon_group" ion="k"/>
                <channelDensity id="K_T_axonal" ionChannel="K_T" condDensity="0.0424 S_per_cm2" erev="-85 mV" segmentGroup="axon_group" ion="k"/>
                <channelDensity id="K_P_axonal" ionChannel="K_P" condDensity="0.338 S_per_cm2" erev="-85 mV" segmentGroup="axon_group" ion="k"/>
                <channelDensity id="Im_axonal" ionChannel="Im" condDensity="0.000 S_per_cm2" erev="-85 mV" segmentGroup="axon_group" ion="k"/>
                <channelDensity id="NaTg_axonal" ionChannel="NaTg_PYR_axonal" condDensity="1.38 S_per_cm2" erev="50 mV" segmentGroup="axon_group" ion="na"/>
                <channelDensity id="Nap_axonal" ionChannel="Nap" condDensity="0.00842 S_per_cm2" erev="50 mV" segmentGroup="axon_group" ion="na"/>
                <channelDensityNernst id="Ca_HVA_somatic" ionChannel="Ca_HVA" condDensity="0.00155 S_per_cm2" segmentGroup="soma_group" ion="ca"/>
                <channelDensityNernst id="Ca_LVA_somatic" ionChannel="Ca_LVA" condDensity="0.00296 S_per_cm2" segmentGroup="soma_group" ion="ca"/>
                <channelDensityNernst id="Ca_HVA_axonal" ionChannel="Ca_HVA" condDensity="0.0003060000 S_per_cm2" segmentGroup="axon_group" ion="ca"/>
                <channelDensityNernst id="Ca_LVA_axonal" ionChannel="Ca_LVA" condDensity="0.0439000000 S_per_cm2" segmentGroup="axon_group" ion="ca"/>
                <specificCapacitance value="1 uF_per_cm2"/>
                <specificCapacitance value="2 uF_per_cm2" segmentGroup="apical_dendrite_group"/>
                <specificCapacitance value="2 uF_per_cm2" segmentGroup="basal_dendrite_group"/>
                <specificCapacitance value="0.02 uF_per_cm2" segmentGroup="myelin_0"/>
                <initMembPotential value="-80mV"/>
            </membraneProperties>
            <intracellularProperties>
                <species id="ca" concentrationModel="CaDynamics_E2_NML2_PYR_somatic" ion="ca" initialConcentration="5.0E-11 mol_per_cm3" initialExtConcentration="2.0E-6 mol_per_cm3" segmentGroup="soma_group"/>
                <species id="ca" concentrationModel="CaDynamics_E2_NML2_PYR_axonal" ion="ca" initialConcentration="5.0E-11 mol_per_cm3" initialExtConcentration="2.0E-6 mol_per_cm3" segmentGroup="axon_group"/>
                <resistivity value="0.1 kohm_cm"/>
                <resistivity value="0.1 kohm_cm" segmentGroup="myelin_0"/>
            </intracellularProperties>
        </biophysicalProperties>
    </cell>
</neuroml>
