<?xml version="1.0" encoding="UTF-8"?>
<neuroml xmlns="http://www.neuroml.org/schema/neuroml2"
    xmlns:xsi="http://www.w3.org/2001/XMLSchema-instance"
    xsi:schemaLocation="http://www.neuroml.org/schema/neuroml2 https://raw.github.com/NeuroML/NeuroML2/development/Schemas/NeuroML2/NeuroML_v2.3.xsd"
    id = "NeuroML2_file_exported_from_NEURON">

  <notes> NeuroML 2 file generated from ModelView by: NEURON -- VERSION 8.2.2 release/8.2 (93d41fafd) 2022-12-15
          Authors: Michael Hines, Sushil Kambampati and Padraig Gleeson,
          Yale University and UCL
  </notes>

  <cell id="NeuronTemplate_0_0">
    <notes>Cell: NeuronTemplate_0_0 exported from NEURON ModelView</notes>
    <morphology id="morphology">
<!-- Section: NeuronTemplate[0].soma[0] (segmentGroup: soma_0) which has 3 3D points, so 2 segment(s)-->
      <segment id="0" name = "Seg0_soma_0">
        <proximal x="508.534" y="577.616" z="36.2701" diameter="12.584"/>
        <distal x="514.826" y="577.616" z="36.2701" diameter="12.584"/>
      </segment>
      <segment id="2" name = "Seg1_soma_0">
        <parent segment="0"/>
        <distal x="521.118" y="577.616" z="36.2701" diameter="12.584"/>
      </segment>
<!-- Section: NeuronTemplate[0].axon[0] (segmentGroup: axon_0) which has 7 3D points, so 6 segment(s)-->
      <segment id="5805" name = "Seg0_axon_0">  <!-- Connected at 0.5 on parent section: NeuronTemplate[0].soma[0]  -->
        <parent segment="0"/>
        <proximal x="514.826" y="577.616" z="36.2701" diameter="2.875"/>
        <distal x="515.605" y="579.458" z="36.2701" diameter="2.875"/>
      </segment>
      <segment id="5806" name = "Seg1_axon_0">
        <parent segment="5805"/>
        <distal x="517.163" y="583.142" z="36.2701" diameter="2.625"/>
      </segment>
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
<!-- Section: NeuronTemplate[0].soma[0] (segmentGroup: soma_0) which has 3 3D points, so 2 segment(s)-->

      <segmentGroup id = "soma_0"  neuroLexId="sao864921383">
         <notes>This group contains an unbranched set of segments, and all of the segmentGroups marked with
             neuroLexId = sao864921383 form a non-overlapping set of all of the segments.
             These segmentGroups correspond to the 'cables' of NeuroML v1.8.1, and map to/from NEURON sections.</notes>
        <member segment = "0"/>
        <member segment = "2"/>
      </segmentGroup>

<!-- Section: NeuronTemplate[0].axon[0] (segmentGroup: axon_0) which has 7 3D points, so 6 segment(s)-->

      <segmentGroup id = "axon_0"  neuroLexId="sao864921383">
         <notes>This group contains an unbranched set of segments, and all of the segmentGroups marked with
             neuroLexId = sao864921383 form a non-overlapping set of all of the segments.
             These segmentGroups correspond to the 'cables' of NeuroML v1.8.1, and map to/from NEURON sections.</notes>
        <!-- This is currently inside (old convention) & outside (new convention) the <annotation> element, as some APIs have trouble reading what's inside <annotation> (<xs:any..> in Schema) -->
        <property tag="numberInternalDivisions" value="5"/> <!-- Discretization of model at time of export from NEURON. Can be overridden by importing application -->
        <annotation>
          <property tag="numberInternalDivisions" value="5"/> <!-- Discretization of model at time of export from NEURON. Can be overridden by importing application -->
        </annotation>
        <member segment = "5805"/>
        <member segment = "5806"/>
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      </segmentGroup>

<!-- Section: NeuronTemplate[0].apic[0] (segmentGroup: apic_0) which has 21 3D points, so 20 segment(s)-->

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
    </morphology>
  </cell>

  <network id="network" type="networkWithTemperature" temperature="6 degC">
    <population id="Pop_NeuronTemplate_0_0" component="NeuronTemplate_0_0" size="1" type="populationList">
        <instance id="0">
            <location x="0" y="0" z="0"/>
        </instance>
    </population>
  </network>

</neuroml>
