<neuroml xmlns="http://www.neuroml.org/schema/neuroml2"  xmlns:xs="http://www.w3.org/2001/XMLSchema" xmlns:xsi="http://www.w3.org/2001/XMLSchema-instance" xsi:schemaLocation="http://www.neuroml.org/schema/neuroml2 https://raw.github.com/NeuroML/NeuroML2/development/Schemas/NeuroML2/NeuroML_v2.3.xsd" id="NeuroML2_file_exported_from_NEURON">
    <notes> NeuroML 2 file generated from ModelView by: NEURON -- VERSION 8.1.0 HEAD (047dd824) 2022-03-25
          Authors: Michael Hines, Sushil Kambampati and Padraig Gleeson,
          Yale University and UCL
  </notes>
    <include href="CaDynamics_E2_NML2.nml"/>
    <include href="channels/pas.channel.nml"/>
    <include href="channels/Ih.channel.nml"/>
    <include href="channels/SK.channel.nml"/>
    <include href="channels/K_T.channel.nml"/>
    <include href="channels/K_P.channel.nml"/>
    <include href="channels/Kv3_1.channel.nml"/>
    <include href="channels/Im.channel.nml"/>
    <include href="channels/NaTg/NaTg.channel.nml"/>
    <include href="channels/Ca_HVA.channel.nml"/>
    <include href="channels/Ca_LVA.channel.nml"/>
    <include href="channels/Nap.channel.nml"/>
    <include href="channels/Tonic.nml"/>
    <cell id="HL23PYR_tonic">
        <notes>Cell: HL23PYR exported from NEURON ModelView. Reference: Yao, H. K.; Guet-McCreight, A.; Mazza, F.; Moradi Chameh, H.; Prevot, T. D.; Griffiths, J. D.; Tripathy, S. J.; Valiante, T. A.; Sibille, E. &amp; Hay, E.  Reduced inhibition in depression impairs stimulus processing in human cortical microcircuits Cell Reports, Elsevier, 2022, 38</notes>
        <morphology id="morphology">
            <segment id="0" name="Seg0_soma_0">
                <proximal x="508.534" y="577.616" z="36.2701" diameter="12.584"/>
                <distal x="514.826" y="577.616" z="36.2701" diameter="12.584"/>
            </segment>
            <segment id="2" name="Seg1_soma_0">
                <parent segment="0"/>
                <distal x="521.118" y="577.616" z="36.2701" diameter="12.584"/>
            </segment>
            <segment id="5805" name="Seg0_axon_0">
                <parent segment="0"/>
                <proximal x="514.826" y="577.616" z="36.2701" diameter="2.875"/>
                <distal x="515.605" y="579.458" z="36.2701" diameter="2.875"/>
            </segment>
            <segment id="5806" name="Seg1_axon_0">
                <parent segment="5805"/>
                <distal x="517.163" y="583.142" z="36.2701" diameter="2.625"/>
            </segment>
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            <segmentGroup id="soma_0" neuroLexId="sao864921383">
                <notes>This group contains an unbranched set of segments, and all of the segmentGroups marked with
             neuroLexId = sao864921383 form a non-overlapping set of all of the segments.
             These segmentGroups correspond to the 'cables' of NeuroML v1.8.1, and map to/from NEURON sections.</notes>
                <member segment="0"/>
                <member segment="2"/>
            </segmentGroup>
            <segmentGroup id="axon_0" neuroLexId="sao864921383">
                <notes>This group contains an unbranched set of segments, and all of the segmentGroups marked with
             neuroLexId = sao864921383 form a non-overlapping set of all of the segments.
             These segmentGroups correspond to the 'cables' of NeuroML v1.8.1, and map to/from NEURON sections.</notes>
                <property tag="numberInternalDivisions" value="5"/>
                <annotation>
                    <property xmlns="http://www.neuroml.org/schema/neuroml2" xmlns:xsi="http://www.w3.org/2001/XMLSchema-instance" tag="numberInternalDivisions" value="5"/>

                </annotation>
                <member segment="5805"/>
                <member segment="5806"/>
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            </segmentGroup>
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            <segmentGroup id="basal_dendrite_group" neuroLexId="GO:0030425">
                <notes>Basal dendrites</notes>
                <include segmentGroup="dend_0"/>
                <include segmentGroup="dend_1"/>
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            </segmentGroup>
            <segmentGroup id="apical_dendrite_group" neuroLexId="GO:0030425">
                <notes>Apical dendrite_group</notes>
                <include segmentGroup="apic_0"/>
                <include segmentGroup="apic_1"/>
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                <inhomogeneousParameter id="PathLengthOverApicDends" variable="p" metric="Path Length from root">
                    <proximal translationStart="0.0"/>
                </inhomogeneousParameter>
            </segmentGroup>
            <segmentGroup id="myelin_group">
                <notes>Myelin group</notes>
                <include segmentGroup="myelin_0"/>
            </segmentGroup>
            <segmentGroup id="all_minus_myelin">
                <notes>All without myelin</notes>
                <include segmentGroup="apic_0"/>
                <include segmentGroup="apic_1"/>
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            </segmentGroup>
            <segmentGroup id="soma_group" neuroLexId="GO:0043025">
                <notes>Default soma segment group for the cell</notes>
                <include segmentGroup="soma_0"/>
            </segmentGroup>
            <segmentGroup id="axon_group" neuroLexId="GO:0030424">
                <notes>Default axon segment group for the cell</notes>
                <include segmentGroup="axon_0"/>
                <include segmentGroup="axon_1"/>
            </segmentGroup>
            <segmentGroup id="dendrite_group" neuroLexId="GO:0030425">
                <notes>Default dendrite segment group for the cell</notes>
                <include segmentGroup="apical_dendrite_group"/>
                <include segmentGroup="basal_dendrite_group"/>
            </segmentGroup>
            <segmentGroup id="all">
                <include segmentGroup="apic_0"/>
                <include segmentGroup="apic_1"/>
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            </segmentGroup>
        </morphology>
        <biophysicalProperties id="biophys">
            <membraneProperties>
                <channelDensity id="pas" ionChannel="pas" condDensity="0.0000954 S_per_cm2" erev="-80 mV" segmentGroup="all_minus_myelin" ion="non_specific"/>
                <channelDensity id="Ih" ionChannel="Ih" condDensity="0.000148 S_per_cm2" erev="-45 mV" segmentGroup="all_minus_myelin" ion="hcn"/>
                <channelDensity id="SK_somatic" ionChannel="SK" condDensity="0.000853 S_per_cm2" erev="-85 mV" segmentGroup="soma_group" ion="k"/>
                <channelDensity id="K_T_somatic" ionChannel="K_T" condDensity="0.0605 S_per_cm2" erev="-85 mV" segmentGroup="soma_group" ion="k"/>
                <channelDensity id="K_P_somatic" ionChannel="K_P" condDensity="0.000208 S_per_cm2" erev="-85 mV" segmentGroup="soma_group" ion="k"/>
                <channelDensity id="Kv3_1_somatic" ionChannel="Kv3_1" condDensity="0.0424 S_per_cm2" erev="-85 mV" segmentGroup="soma_group" ion="k"/>
                <channelDensity id="Ih_somatic" ionChannel="Ih" condDensity="0.000148 S_per_cm2" erev="-45 mV" segmentGroup="soma_group" ion="hcn"/>
                <channelDensity id="Im_somatic" ionChannel="Im" condDensity="0.000306 S_per_cm2" erev="-85 mV" segmentGroup="soma_group" ion="k"/>
                <channelDensity id="NaTg_somatic" ionChannel="NaTg_PYR_somatic" condDensity="0.272 S_per_cm2" erev="50 mV" segmentGroup="soma_group" ion="na"/>
                <channelDensity id="Ih_basal" ionChannel="Ih" condDensity="0.000000709 S_per_cm2" erev="-45 mV" segmentGroup="basal_dendrite_group" ion="hcn"/>
                <channelDensity id="SK_axonal" ionChannel="SK" condDensity="0.0145 S_per_cm2" erev="-85 mV" segmentGroup="axon_group" ion="k"/>
                <channelDensity id="K_T_axonal" ionChannel="K_T" condDensity="0.0424 S_per_cm2" erev="-85 mV" segmentGroup="axon_group" ion="k"/>
                <channelDensity id="K_P_axonal" ionChannel="K_P" condDensity="0.338 S_per_cm2" erev="-85 mV" segmentGroup="axon_group" ion="k"/>
                <channelDensity id="Im_axonal" ionChannel="Im" condDensity="0.000 S_per_cm2" erev="-85 mV" segmentGroup="axon_group" ion="k"/>
                <channelDensity id="Kv3_1_axonal" ionChannel="Kv3_1" condDensity="0.941 S_per_cm2" erev="-85 mV" segmentGroup="axon_group" ion="k"/>
                <channelDensity id="NaTg_axonal" ionChannel="NaTg_PYR_axonal" condDensity="1.38 S_per_cm2" erev="50 mV" segmentGroup="axon_group" ion="na"/>
                <channelDensity id="Nap_axonal" ionChannel="Nap" condDensity="0.00842 S_per_cm2" erev="50 mV" segmentGroup="axon_group" ion="na"/>
                <channelDensity id="TonicInhibition" ionChannel="TonicPavlov2009" condDensity="0.000938 S_per_cm2" erev="-75 mV" segmentGroup="all_minus_myelin" ion="non_specific"/>
                <channelDensityNernst id="Ca_HVA_somatic" ionChannel="Ca_HVA" condDensity="0.00155 S_per_cm2" segmentGroup="soma_group" ion="ca"/>
                <channelDensityNernst id="Ca_LVA_somatic" ionChannel="Ca_LVA" condDensity="0.00296 S_per_cm2" segmentGroup="soma_group" ion="ca"/>
                <channelDensityNernst id="Ca_HVA_axonal" ionChannel="Ca_HVA" condDensity="0.0003060000 S_per_cm2" segmentGroup="axon_group" ion="ca"/>
                <channelDensityNernst id="Ca_LVA_axonal" ionChannel="Ca_LVA" condDensity="0.0439000000 S_per_cm2" segmentGroup="axon_group" ion="ca"/>
                <channelDensityNonUniform id="Ih_apical" ionChannel="Ih" erev="-45 mV" ion="hcn">
                    <variableParameter parameter="condDensity" segmentGroup="apical_dendrite_group">
                        <inhomogeneousValue inhomogeneousParameter="PathLengthOverApicDends" value="1E9 * (0.148 * 1E-8) * ((2.087 * exp( 3.6161 * (p/606.3464))) - 0.8696)"/>
                    </variableParameter>
                </channelDensityNonUniform>
                <specificCapacitance value="1 uF_per_cm2" segmentGroup="all_minus_myelin"/>
                <specificCapacitance value="0.02 uF_per_cm2" segmentGroup="myelin_group"/>
                <specificCapacitance value="2 uF_per_cm2" segmentGroup="apical_dendrite_group"/>
                <specificCapacitance value="2 uF_per_cm2" segmentGroup="basal_dendrite_group"/>
                <initMembPotential value="-80mV"/>
            </membraneProperties>
            <intracellularProperties>
                <species id="ca" concentrationModel="CaDynamics_E2_NML2_PYR_somatic" ion="ca" initialConcentration="1e-4 mM" initialExtConcentration="2.0E-6 mol_per_cm3" segmentGroup="soma_group"/>
                <species id="ca" concentrationModel="CaDynamics_E2_NML2_PYR_axonal" ion="ca" initialConcentration="1e-4 mM" initialExtConcentration="2.0E-6 mol_per_cm3" segmentGroup="axon_group"/>
                <resistivity value="0.1 kohm_cm" segmentGroup="all_minus_myelin"/>
                <resistivity value="0.1 kohm_cm" segmentGroup="myelin_group"/>
            </intracellularProperties>
        </biophysicalProperties>
    </cell>
</neuroml>
