<Lems>

    <!--

        This LEMS file has been automatically generated using PyNeuroML v1.0.10 (libNeuroML v0.5.3)

     -->

    <!-- Specify which component to run -->
    <Target component="HL23Sim_0.001"/>

    <!-- Include core NeuroML2 ComponentType definitions -->
    <Include file="Cells.xml"/>
    <Include file="Networks.xml"/>
    <Include file="Simulation.xml"/>

    <Include file="HL23Net_0.001.net.nml"/>
    <Include file="rotated_cells/HL23PYR_0.cell.nml"/>
    <Include file="rotated_cells/HL23PYR_12.cell.nml"/>
    <Include file="rotated_cells/HL23SST_804.cell.nml"/>
    <Include file="rotated_cells/HL23SST_816.cell.nml"/>
    <Include file="rotated_cells/HL23PV_852.cell.nml"/>
    <Include file="rotated_cells/HL23PV_864.cell.nml"/>
    <Include file="rotated_cells/HL23VIP_924.cell.nml"/>
    <Include file="rotated_cells/HL23VIP_936.cell.nml"/>
    <Include file="lems_components.xml"/>

    <Simulation id="HL23Sim_0.001" length="2000ms" step="0.025ms" target="HL23Network" seed="123">  <!-- Note seed: ensures same random numbers used every run -->

        <OutputFile id="output1" fileName="HL23Net_0.001.v.dat">
            <OutputColumn id="HL23PYR_pop_0" quantity="HL23PYR_pop_0/0/HL23PYR_0/0/v"/>
            <OutputColumn id="HL23PYR_pop_12" quantity="HL23PYR_pop_12/0/HL23PYR_12/0/v"/>
            <OutputColumn id="HL23SST_pop_804" quantity="HL23SST_pop_804/0/HL23SST_804/0/v"/>
            <OutputColumn id="HL23SST_pop_816" quantity="HL23SST_pop_816/0/HL23SST_816/0/v"/>
            <OutputColumn id="HL23PV_pop_852" quantity="HL23PV_pop_852/0/HL23PV_852/0/v"/>
            <OutputColumn id="HL23PV_pop_864" quantity="HL23PV_pop_864/0/HL23PV_864/0/v"/>
            <OutputColumn id="HL23VIP_pop_924" quantity="HL23VIP_pop_924/0/HL23VIP_924/0/v"/>
            <OutputColumn id="HL23VIP_pop_936" quantity="HL23VIP_pop_936/0/HL23VIP_936/0/v"/>
        </OutputFile>

    </Simulation>

</Lems>
