<Lems>

    <!--

        This LEMS file has been automatically generated using PyNeuroML v1.0.10 (libNeuroML v0.5.3)

     -->

    <!-- Specify which component to run -->
    <Target component="HL23Sim_0.01"/>

    <!-- Include core NeuroML2 ComponentType definitions -->
    <Include file="Cells.xml"/>
    <Include file="Networks.xml"/>
    <Include file="Simulation.xml"/>

    <Include file="HL23Net_0.01.net.nml"/>
    <Include file="rotated_cells/HL23PYR_0.cell.nml"/>
    <Include file="rotated_cells/HL23PYR_397.cell.nml"/>
    <Include file="rotated_cells/HL23PYR_794.cell.nml"/>
    <Include file="rotated_cells/HL23PYR_388.cell.nml"/>
    <Include file="rotated_cells/HL23PYR_785.cell.nml"/>
    <Include file="rotated_cells/HL23PYR_379.cell.nml"/>
    <Include file="rotated_cells/HL23PYR_776.cell.nml"/>
    <Include file="rotated_cells/HL23PYR_394.cell.nml"/>
    <Include file="rotated_cells/HL23SST_804.cell.nml"/>
    <Include file="rotated_cells/HL23SST_816.cell.nml"/>
    <Include file="rotated_cells/HL23PV_852.cell.nml"/>
    <Include file="rotated_cells/HL23PV_864.cell.nml"/>
    <Include file="rotated_cells/HL23VIP_924.cell.nml"/>
    <Include file="rotated_cells/HL23VIP_936.cell.nml"/>
    <Include file="lems_components_0.01.xml"/>

    <Simulation id="HL23Sim_0.01" length="2000ms" step="0.025ms" target="HL23Network" seed="123">  <!-- Note seed: ensures same random numbers used every run -->

        <OutputFile id="output1" fileName="HL23Net_0.01.v.dat">
            <OutputColumn id="HL23PYR_pop_0" quantity="HL23PYR_pop_0/0/HL23PYR_0/0/v"/>
            <OutputColumn id="HL23PYR_pop_397" quantity="HL23PYR_pop_397/0/HL23PYR_397/0/v"/>
            <OutputColumn id="HL23PYR_pop_794" quantity="HL23PYR_pop_794/0/HL23PYR_794/0/v"/>
            <OutputColumn id="HL23PYR_pop_388" quantity="HL23PYR_pop_388/0/HL23PYR_388/0/v"/>
            <OutputColumn id="HL23PYR_pop_785" quantity="HL23PYR_pop_785/0/HL23PYR_785/0/v"/>
            <OutputColumn id="HL23PYR_pop_379" quantity="HL23PYR_pop_379/0/HL23PYR_379/0/v"/>
            <OutputColumn id="HL23PYR_pop_776" quantity="HL23PYR_pop_776/0/HL23PYR_776/0/v"/>
            <OutputColumn id="HL23PYR_pop_394" quantity="HL23PYR_pop_394/0/HL23PYR_394/0/v"/>
            <OutputColumn id="HL23SST_pop_804" quantity="HL23SST_pop_804/0/HL23SST_804/0/v"/>
            <OutputColumn id="HL23SST_pop_816" quantity="HL23SST_pop_816/0/HL23SST_816/0/v"/>
            <OutputColumn id="HL23PV_pop_852" quantity="HL23PV_pop_852/0/HL23PV_852/0/v"/>
            <OutputColumn id="HL23PV_pop_864" quantity="HL23PV_pop_864/0/HL23PV_864/0/v"/>
            <OutputColumn id="HL23VIP_pop_924" quantity="HL23VIP_pop_924/0/HL23VIP_924/0/v"/>
            <OutputColumn id="HL23VIP_pop_936" quantity="HL23VIP_pop_936/0/HL23VIP_936/0/v"/>
        </OutputFile>

    </Simulation>

</Lems>
