<Lems>

    <!--

        This LEMS file has been automatically generated using PyNeuroML v1.0.10 (libNeuroML v0.5.3)

     -->

    <!-- Specify which component to run -->
    <Target component="HL23Sim_0.1"/>

    <!-- Include core NeuroML2 ComponentType definitions -->
    <Include file="Cells.xml"/>
    <Include file="Networks.xml"/>
    <Include file="Simulation.xml"/>

    <Include file="HL23Net_0.1.net.nml"/>
    <Include file="rotated_cells/HL23PYR_0.cell.nml"/>
    <Include file="rotated_cells/HL23PYR_120.cell.nml"/>
    <Include file="rotated_cells/HL23PYR_240.cell.nml"/>
    <Include file="rotated_cells/HL23PYR_360.cell.nml"/>
    <Include file="rotated_cells/HL23PYR_480.cell.nml"/>
    <Include file="rotated_cells/HL23PYR_600.cell.nml"/>
    <Include file="rotated_cells/HL23PYR_720.cell.nml"/>
    <Include file="rotated_cells/HL23PYR_37.cell.nml"/>
    <Include file="rotated_cells/HL23PYR_157.cell.nml"/>
    <Include file="rotated_cells/HL23PYR_277.cell.nml"/>
    <Include file="rotated_cells/HL23PYR_397.cell.nml"/>
    <Include file="rotated_cells/HL23PYR_517.cell.nml"/>
    <Include file="rotated_cells/HL23PYR_637.cell.nml"/>
    <Include file="rotated_cells/HL23PYR_757.cell.nml"/>
    <Include file="rotated_cells/HL23PYR_74.cell.nml"/>
    <Include file="rotated_cells/HL23PYR_194.cell.nml"/>
    <Include file="rotated_cells/HL23PYR_314.cell.nml"/>
    <Include file="rotated_cells/HL23PYR_434.cell.nml"/>
    <Include file="rotated_cells/HL23PYR_554.cell.nml"/>
    <Include file="rotated_cells/HL23PYR_674.cell.nml"/>
    <Include file="rotated_cells/HL23PYR_794.cell.nml"/>
    <Include file="rotated_cells/HL23PYR_111.cell.nml"/>
    <Include file="rotated_cells/HL23PYR_231.cell.nml"/>
    <Include file="rotated_cells/HL23PYR_351.cell.nml"/>
    <Include file="rotated_cells/HL23PYR_471.cell.nml"/>
    <Include file="rotated_cells/HL23PYR_591.cell.nml"/>
    <Include file="rotated_cells/HL23PYR_711.cell.nml"/>
    <Include file="rotated_cells/HL23PYR_28.cell.nml"/>
    <Include file="rotated_cells/HL23PYR_148.cell.nml"/>
    <Include file="rotated_cells/HL23PYR_268.cell.nml"/>
    <Include file="rotated_cells/HL23PYR_388.cell.nml"/>
    <Include file="rotated_cells/HL23PYR_508.cell.nml"/>
    <Include file="rotated_cells/HL23PYR_628.cell.nml"/>
    <Include file="rotated_cells/HL23PYR_748.cell.nml"/>
    <Include file="rotated_cells/HL23PYR_65.cell.nml"/>
    <Include file="rotated_cells/HL23PYR_185.cell.nml"/>
    <Include file="rotated_cells/HL23PYR_305.cell.nml"/>
    <Include file="rotated_cells/HL23PYR_425.cell.nml"/>
    <Include file="rotated_cells/HL23PYR_545.cell.nml"/>
    <Include file="rotated_cells/HL23PYR_665.cell.nml"/>
    <Include file="rotated_cells/HL23PYR_785.cell.nml"/>
    <Include file="rotated_cells/HL23PYR_102.cell.nml"/>
    <Include file="rotated_cells/HL23PYR_222.cell.nml"/>
    <Include file="rotated_cells/HL23PYR_342.cell.nml"/>
    <Include file="rotated_cells/HL23PYR_462.cell.nml"/>
    <Include file="rotated_cells/HL23PYR_582.cell.nml"/>
    <Include file="rotated_cells/HL23PYR_702.cell.nml"/>
    <Include file="rotated_cells/HL23PYR_19.cell.nml"/>
    <Include file="rotated_cells/HL23PYR_139.cell.nml"/>
    <Include file="rotated_cells/HL23PYR_259.cell.nml"/>
    <Include file="rotated_cells/HL23PYR_379.cell.nml"/>
    <Include file="rotated_cells/HL23PYR_499.cell.nml"/>
    <Include file="rotated_cells/HL23PYR_619.cell.nml"/>
    <Include file="rotated_cells/HL23PYR_739.cell.nml"/>
    <Include file="rotated_cells/HL23PYR_56.cell.nml"/>
    <Include file="rotated_cells/HL23PYR_176.cell.nml"/>
    <Include file="rotated_cells/HL23PYR_296.cell.nml"/>
    <Include file="rotated_cells/HL23PYR_416.cell.nml"/>
    <Include file="rotated_cells/HL23PYR_536.cell.nml"/>
    <Include file="rotated_cells/HL23PYR_656.cell.nml"/>
    <Include file="rotated_cells/HL23PYR_776.cell.nml"/>
    <Include file="rotated_cells/HL23PYR_105.cell.nml"/>
    <Include file="rotated_cells/HL23PYR_225.cell.nml"/>
    <Include file="rotated_cells/HL23PYR_345.cell.nml"/>
    <Include file="rotated_cells/HL23PYR_465.cell.nml"/>
    <Include file="rotated_cells/HL23PYR_585.cell.nml"/>
    <Include file="rotated_cells/HL23PYR_705.cell.nml"/>
    <Include file="rotated_cells/HL23PYR_34.cell.nml"/>
    <Include file="rotated_cells/HL23PYR_154.cell.nml"/>
    <Include file="rotated_cells/HL23PYR_274.cell.nml"/>
    <Include file="rotated_cells/HL23PYR_394.cell.nml"/>
    <Include file="rotated_cells/HL23PYR_514.cell.nml"/>
    <Include file="rotated_cells/HL23PYR_634.cell.nml"/>
    <Include file="rotated_cells/HL23PYR_754.cell.nml"/>
    <Include file="rotated_cells/HL23PYR_83.cell.nml"/>
    <Include file="rotated_cells/HL23PYR_203.cell.nml"/>
    <Include file="rotated_cells/HL23PYR_323.cell.nml"/>
    <Include file="rotated_cells/HL23PYR_443.cell.nml"/>
    <Include file="rotated_cells/HL23PYR_563.cell.nml"/>
    <Include file="rotated_cells/HL23PYR_683.cell.nml"/>
    <Include file="rotated_cells/HL23SST_804.cell.nml"/>
    <Include file="rotated_cells/HL23SST_830.cell.nml"/>
    <Include file="rotated_cells/HL23SST_809.cell.nml"/>
    <Include file="rotated_cells/HL23SST_835.cell.nml"/>
    <Include file="rotated_cells/HL23SST_837.cell.nml"/>
    <Include file="rotated_cells/HL23PV_852.cell.nml"/>
    <Include file="rotated_cells/HL23PV_901.cell.nml"/>
    <Include file="rotated_cells/HL23PV_879.cell.nml"/>
    <Include file="rotated_cells/HL23PV_857.cell.nml"/>
    <Include file="rotated_cells/HL23PV_906.cell.nml"/>
    <Include file="rotated_cells/HL23PV_884.cell.nml"/>
    <Include file="rotated_cells/HL23PV_874.cell.nml"/>
    <Include file="rotated_cells/HL23VIP_924.cell.nml"/>
    <Include file="rotated_cells/HL23VIP_961.cell.nml"/>
    <Include file="rotated_cells/HL23VIP_998.cell.nml"/>
    <Include file="rotated_cells/HL23VIP_952.cell.nml"/>
    <Include file="rotated_cells/HL23VIP_930.cell.nml"/>
    <Include file="rotated_cells/HL23VIP_979.cell.nml"/>
    <Include file="rotated_cells/HL23VIP_933.cell.nml"/>
    <Include file="rotated_cells/HL23VIP_970.cell.nml"/>
    <Include file="lems_components_0.1.xml"/>

    <Simulation id="HL23Sim_0.1" length="2000ms" step="0.025ms" target="HL23Network" seed="123">  <!-- Note seed: ensures same random numbers used every run -->

        <OutputFile id="output1" fileName="HL23Net_0.1.v.dat">
            <OutputColumn id="HL23PYR_pop_0" quantity="HL23PYR_pop_0/0/HL23PYR_0/0/v"/>
            <OutputColumn id="HL23PYR_pop_120" quantity="HL23PYR_pop_120/0/HL23PYR_120/0/v"/>
            <OutputColumn id="HL23PYR_pop_240" quantity="HL23PYR_pop_240/0/HL23PYR_240/0/v"/>
            <OutputColumn id="HL23PYR_pop_360" quantity="HL23PYR_pop_360/0/HL23PYR_360/0/v"/>
            <OutputColumn id="HL23PYR_pop_480" quantity="HL23PYR_pop_480/0/HL23PYR_480/0/v"/>
            <OutputColumn id="HL23PYR_pop_600" quantity="HL23PYR_pop_600/0/HL23PYR_600/0/v"/>
            <OutputColumn id="HL23PYR_pop_720" quantity="HL23PYR_pop_720/0/HL23PYR_720/0/v"/>
            <OutputColumn id="HL23PYR_pop_37" quantity="HL23PYR_pop_37/0/HL23PYR_37/0/v"/>
            <OutputColumn id="HL23PYR_pop_157" quantity="HL23PYR_pop_157/0/HL23PYR_157/0/v"/>
            <OutputColumn id="HL23PYR_pop_277" quantity="HL23PYR_pop_277/0/HL23PYR_277/0/v"/>
            <OutputColumn id="HL23PYR_pop_397" quantity="HL23PYR_pop_397/0/HL23PYR_397/0/v"/>
            <OutputColumn id="HL23PYR_pop_517" quantity="HL23PYR_pop_517/0/HL23PYR_517/0/v"/>
            <OutputColumn id="HL23PYR_pop_637" quantity="HL23PYR_pop_637/0/HL23PYR_637/0/v"/>
            <OutputColumn id="HL23PYR_pop_757" quantity="HL23PYR_pop_757/0/HL23PYR_757/0/v"/>
            <OutputColumn id="HL23PYR_pop_74" quantity="HL23PYR_pop_74/0/HL23PYR_74/0/v"/>
            <OutputColumn id="HL23PYR_pop_194" quantity="HL23PYR_pop_194/0/HL23PYR_194/0/v"/>
            <OutputColumn id="HL23PYR_pop_314" quantity="HL23PYR_pop_314/0/HL23PYR_314/0/v"/>
            <OutputColumn id="HL23PYR_pop_434" quantity="HL23PYR_pop_434/0/HL23PYR_434/0/v"/>
            <OutputColumn id="HL23PYR_pop_554" quantity="HL23PYR_pop_554/0/HL23PYR_554/0/v"/>
            <OutputColumn id="HL23PYR_pop_674" quantity="HL23PYR_pop_674/0/HL23PYR_674/0/v"/>
            <OutputColumn id="HL23PYR_pop_794" quantity="HL23PYR_pop_794/0/HL23PYR_794/0/v"/>
            <OutputColumn id="HL23PYR_pop_111" quantity="HL23PYR_pop_111/0/HL23PYR_111/0/v"/>
            <OutputColumn id="HL23PYR_pop_231" quantity="HL23PYR_pop_231/0/HL23PYR_231/0/v"/>
            <OutputColumn id="HL23PYR_pop_351" quantity="HL23PYR_pop_351/0/HL23PYR_351/0/v"/>
            <OutputColumn id="HL23PYR_pop_471" quantity="HL23PYR_pop_471/0/HL23PYR_471/0/v"/>
            <OutputColumn id="HL23PYR_pop_591" quantity="HL23PYR_pop_591/0/HL23PYR_591/0/v"/>
            <OutputColumn id="HL23PYR_pop_711" quantity="HL23PYR_pop_711/0/HL23PYR_711/0/v"/>
            <OutputColumn id="HL23PYR_pop_28" quantity="HL23PYR_pop_28/0/HL23PYR_28/0/v"/>
            <OutputColumn id="HL23PYR_pop_148" quantity="HL23PYR_pop_148/0/HL23PYR_148/0/v"/>
            <OutputColumn id="HL23PYR_pop_268" quantity="HL23PYR_pop_268/0/HL23PYR_268/0/v"/>
            <OutputColumn id="HL23PYR_pop_388" quantity="HL23PYR_pop_388/0/HL23PYR_388/0/v"/>
            <OutputColumn id="HL23PYR_pop_508" quantity="HL23PYR_pop_508/0/HL23PYR_508/0/v"/>
            <OutputColumn id="HL23PYR_pop_628" quantity="HL23PYR_pop_628/0/HL23PYR_628/0/v"/>
            <OutputColumn id="HL23PYR_pop_748" quantity="HL23PYR_pop_748/0/HL23PYR_748/0/v"/>
            <OutputColumn id="HL23PYR_pop_65" quantity="HL23PYR_pop_65/0/HL23PYR_65/0/v"/>
            <OutputColumn id="HL23PYR_pop_185" quantity="HL23PYR_pop_185/0/HL23PYR_185/0/v"/>
            <OutputColumn id="HL23PYR_pop_305" quantity="HL23PYR_pop_305/0/HL23PYR_305/0/v"/>
            <OutputColumn id="HL23PYR_pop_425" quantity="HL23PYR_pop_425/0/HL23PYR_425/0/v"/>
            <OutputColumn id="HL23PYR_pop_545" quantity="HL23PYR_pop_545/0/HL23PYR_545/0/v"/>
            <OutputColumn id="HL23PYR_pop_665" quantity="HL23PYR_pop_665/0/HL23PYR_665/0/v"/>
            <OutputColumn id="HL23PYR_pop_785" quantity="HL23PYR_pop_785/0/HL23PYR_785/0/v"/>
            <OutputColumn id="HL23PYR_pop_102" quantity="HL23PYR_pop_102/0/HL23PYR_102/0/v"/>
            <OutputColumn id="HL23PYR_pop_222" quantity="HL23PYR_pop_222/0/HL23PYR_222/0/v"/>
            <OutputColumn id="HL23PYR_pop_342" quantity="HL23PYR_pop_342/0/HL23PYR_342/0/v"/>
            <OutputColumn id="HL23PYR_pop_462" quantity="HL23PYR_pop_462/0/HL23PYR_462/0/v"/>
            <OutputColumn id="HL23PYR_pop_582" quantity="HL23PYR_pop_582/0/HL23PYR_582/0/v"/>
            <OutputColumn id="HL23PYR_pop_702" quantity="HL23PYR_pop_702/0/HL23PYR_702/0/v"/>
            <OutputColumn id="HL23PYR_pop_19" quantity="HL23PYR_pop_19/0/HL23PYR_19/0/v"/>
            <OutputColumn id="HL23PYR_pop_139" quantity="HL23PYR_pop_139/0/HL23PYR_139/0/v"/>
            <OutputColumn id="HL23PYR_pop_259" quantity="HL23PYR_pop_259/0/HL23PYR_259/0/v"/>
            <OutputColumn id="HL23PYR_pop_379" quantity="HL23PYR_pop_379/0/HL23PYR_379/0/v"/>
            <OutputColumn id="HL23PYR_pop_499" quantity="HL23PYR_pop_499/0/HL23PYR_499/0/v"/>
            <OutputColumn id="HL23PYR_pop_619" quantity="HL23PYR_pop_619/0/HL23PYR_619/0/v"/>
            <OutputColumn id="HL23PYR_pop_739" quantity="HL23PYR_pop_739/0/HL23PYR_739/0/v"/>
            <OutputColumn id="HL23PYR_pop_56" quantity="HL23PYR_pop_56/0/HL23PYR_56/0/v"/>
            <OutputColumn id="HL23PYR_pop_176" quantity="HL23PYR_pop_176/0/HL23PYR_176/0/v"/>
            <OutputColumn id="HL23PYR_pop_296" quantity="HL23PYR_pop_296/0/HL23PYR_296/0/v"/>
            <OutputColumn id="HL23PYR_pop_416" quantity="HL23PYR_pop_416/0/HL23PYR_416/0/v"/>
            <OutputColumn id="HL23PYR_pop_536" quantity="HL23PYR_pop_536/0/HL23PYR_536/0/v"/>
            <OutputColumn id="HL23PYR_pop_656" quantity="HL23PYR_pop_656/0/HL23PYR_656/0/v"/>
            <OutputColumn id="HL23PYR_pop_776" quantity="HL23PYR_pop_776/0/HL23PYR_776/0/v"/>
            <OutputColumn id="HL23PYR_pop_105" quantity="HL23PYR_pop_105/0/HL23PYR_105/0/v"/>
            <OutputColumn id="HL23PYR_pop_225" quantity="HL23PYR_pop_225/0/HL23PYR_225/0/v"/>
            <OutputColumn id="HL23PYR_pop_345" quantity="HL23PYR_pop_345/0/HL23PYR_345/0/v"/>
            <OutputColumn id="HL23PYR_pop_465" quantity="HL23PYR_pop_465/0/HL23PYR_465/0/v"/>
            <OutputColumn id="HL23PYR_pop_585" quantity="HL23PYR_pop_585/0/HL23PYR_585/0/v"/>
            <OutputColumn id="HL23PYR_pop_705" quantity="HL23PYR_pop_705/0/HL23PYR_705/0/v"/>
            <OutputColumn id="HL23PYR_pop_34" quantity="HL23PYR_pop_34/0/HL23PYR_34/0/v"/>
            <OutputColumn id="HL23PYR_pop_154" quantity="HL23PYR_pop_154/0/HL23PYR_154/0/v"/>
            <OutputColumn id="HL23PYR_pop_274" quantity="HL23PYR_pop_274/0/HL23PYR_274/0/v"/>
            <OutputColumn id="HL23PYR_pop_394" quantity="HL23PYR_pop_394/0/HL23PYR_394/0/v"/>
            <OutputColumn id="HL23PYR_pop_514" quantity="HL23PYR_pop_514/0/HL23PYR_514/0/v"/>
            <OutputColumn id="HL23PYR_pop_634" quantity="HL23PYR_pop_634/0/HL23PYR_634/0/v"/>
            <OutputColumn id="HL23PYR_pop_754" quantity="HL23PYR_pop_754/0/HL23PYR_754/0/v"/>
            <OutputColumn id="HL23PYR_pop_83" quantity="HL23PYR_pop_83/0/HL23PYR_83/0/v"/>
            <OutputColumn id="HL23PYR_pop_203" quantity="HL23PYR_pop_203/0/HL23PYR_203/0/v"/>
            <OutputColumn id="HL23PYR_pop_323" quantity="HL23PYR_pop_323/0/HL23PYR_323/0/v"/>
            <OutputColumn id="HL23PYR_pop_443" quantity="HL23PYR_pop_443/0/HL23PYR_443/0/v"/>
            <OutputColumn id="HL23PYR_pop_563" quantity="HL23PYR_pop_563/0/HL23PYR_563/0/v"/>
            <OutputColumn id="HL23PYR_pop_683" quantity="HL23PYR_pop_683/0/HL23PYR_683/0/v"/>
            <OutputColumn id="HL23SST_pop_804" quantity="HL23SST_pop_804/0/HL23SST_804/0/v"/>
            <OutputColumn id="HL23SST_pop_830" quantity="HL23SST_pop_830/0/HL23SST_830/0/v"/>
            <OutputColumn id="HL23SST_pop_809" quantity="HL23SST_pop_809/0/HL23SST_809/0/v"/>
            <OutputColumn id="HL23SST_pop_835" quantity="HL23SST_pop_835/0/HL23SST_835/0/v"/>
            <OutputColumn id="HL23SST_pop_837" quantity="HL23SST_pop_837/0/HL23SST_837/0/v"/>
            <OutputColumn id="HL23PV_pop_852" quantity="HL23PV_pop_852/0/HL23PV_852/0/v"/>
            <OutputColumn id="HL23PV_pop_901" quantity="HL23PV_pop_901/0/HL23PV_901/0/v"/>
            <OutputColumn id="HL23PV_pop_879" quantity="HL23PV_pop_879/0/HL23PV_879/0/v"/>
            <OutputColumn id="HL23PV_pop_857" quantity="HL23PV_pop_857/0/HL23PV_857/0/v"/>
            <OutputColumn id="HL23PV_pop_906" quantity="HL23PV_pop_906/0/HL23PV_906/0/v"/>
            <OutputColumn id="HL23PV_pop_884" quantity="HL23PV_pop_884/0/HL23PV_884/0/v"/>
            <OutputColumn id="HL23PV_pop_874" quantity="HL23PV_pop_874/0/HL23PV_874/0/v"/>
            <OutputColumn id="HL23VIP_pop_924" quantity="HL23VIP_pop_924/0/HL23VIP_924/0/v"/>
            <OutputColumn id="HL23VIP_pop_961" quantity="HL23VIP_pop_961/0/HL23VIP_961/0/v"/>
            <OutputColumn id="HL23VIP_pop_998" quantity="HL23VIP_pop_998/0/HL23VIP_998/0/v"/>
            <OutputColumn id="HL23VIP_pop_952" quantity="HL23VIP_pop_952/0/HL23VIP_952/0/v"/>
            <OutputColumn id="HL23VIP_pop_930" quantity="HL23VIP_pop_930/0/HL23VIP_930/0/v"/>
            <OutputColumn id="HL23VIP_pop_979" quantity="HL23VIP_pop_979/0/HL23VIP_979/0/v"/>
            <OutputColumn id="HL23VIP_pop_933" quantity="HL23VIP_pop_933/0/HL23VIP_933/0/v"/>
            <OutputColumn id="HL23VIP_pop_970" quantity="HL23VIP_pop_970/0/HL23VIP_970/0/v"/>
        </OutputFile>

    </Simulation>

</Lems>
