<Lems>

    <!--

        This LEMS file has been automatically generated using PyNeuroML v0.7.3 (libNeuroML v0.4.2)

     -->

    <!-- Specify which component to run -->
    <Target component="Sim_IClamp_HL23PV" reportFile="report.Sim_IClamp_HL23PV.txt"/>

    <!-- Include core NeuroML2 ComponentType definitions -->
    <Include file="Cells.xml"/>
    <Include file="Networks.xml"/>
    <Include file="Simulation.xml"/>

    <Include file="PyNN.xml"/>
    <Include file="IClamp_HL23PV.net.nml"/>
    <Include file="HL23PV.cell.nml"/>

    <Simulation id="Sim_IClamp_HL23PV" length="300.0ms" step="0.01ms" target="IClamp_HL23PV" seed="12345">  <!-- Note seed: ensures same random numbers used every run -->

        <Display id="pop_HL23PV_v" title="Plots of pop_HL23PV_v" timeScale="1ms" xmin="-30.0" xmax="330.0" ymin="-80" ymax="40">
            <Line id="pop_HL23PV_0__v" quantity="pop_HL23PV[0]/v" scale="1mV" color="#d54f33" timeScale="1ms"/>
        </Display>

        <OutputFile id="Sim_IClamp_HL23PV_pop_HL23PV_v_dat" fileName="Sim_IClamp_HL23PV.pop_HL23PV.v.dat">
            <OutputColumn id="pop_HL23PV_0__v" quantity="pop_HL23PV[0]/v"/>
        </OutputFile>

    </Simulation>

</Lems>
