<Lems xmlns="http://www.neuroml.org/lems/0.7.2"
    xmlns:xsi="http://www.w3.org/2001/XMLSchema-instance"
    xsi:schemaLocation="http://www.neuroml.org/lems/0.7.2 https://raw.githubusercontent.com/LEMS/LEMS/development/Schemas/LEMS/LEMS_v0.7.2.xsd">

    <Target component="sim1" reportFile="report.txt" timesFile="time.dat"/>

    <!--Include standard NeuroML 2 ComponentType definitions-->

    <Include file="Cells.xml"/>
    <Include file="Networks.xml"/>
    <Include file="Simulation.xml"/>
    <Include file="ionChannelVShiftSlope.xml"/>

    <!--   Channel/synapse files-->
    <Include file="NaTg.channel.nml"/>

    <!--   Cell files-->
    <Include file="Na.cell.nml"/>
    <!--   Network file-->
    <Include file="Na.net.nml"/>

    <Component type="Simulation" id="sim1" length="1000.0ms" step="0.01ms" target="NaTg_network">

              <Display id="NaTg_test_display" title="Testing NaTg channel" xmin="-100" xmax="1100" ymin="-100" ymax="70" timeScale="1ms">
                  <Line id="v" timeScale="1 ms" quantity="NaTg_pop/0/NaTg_cell/v" scale="1 mV" color="#000000"/>
              </Display>

              <Display id="NaTg_test_display_mh" title="Testing NaTg channel - m h " xmin="-100" xmax="1100" ymin="-.10" ymax="1.10" timeScale="1ms">
                <Line id="m" timeScale="1 ms" quantity="NaTg_pop/0/NaTg_cell/biophys/membraneProperties/Na_all/NaTg_PV_somatic/m/q" scale="1" color="#ff0000"/>
                <Line id="h" timeScale="1 ms" quantity="NaTg_pop/0/NaTg_cell/biophys/membraneProperties/Na_all/NaTg_PV_somatic/h/q" scale="1" color="#00ff00"/>
            </Display>

        <OutputFile id="NaTg_output" fileName="NaTg.dat">
            <OutputColumn id="v" quantity="NaTg_pop/0/NaTg_cell/v"/>
        </OutputFile>
    </Component>

</Lems>
