<?xml version="1.0" ?>
<Lems xmlns="http://www.neuroml.org/lems/0.7.6" xmlns:xsi="http://www.w3.org/2001/XMLSchema-instance" xsi:schemaLocation="http://www.neuroml.org/lems/0.7.6 https://raw.githubusercontent.com/LEMS/LEMS/development/Schemas/LEMS/LEMS_v0.7.6.xsd">
  <Include file="CaDynamics_E2_NML2.nml"/>
  <Include file="synapses/ProbAMPANMDA.synapse.nml"/>
  <Include file="synapses/ProbUDF.synapse.nml"/>
  <Include file="channels/Ca_HVA.channel.nml"/>
  <Include file="channels/Ca_LVA.channel.nml"/>
  <Include file="channels/Ih.channel.nml"/>
  <Include file="channels/Im.channel.nml"/>
  <Include file="channels/K_P.channel.nml"/>
  <Include file="channels/K_T.channel.nml"/>
  <Include file="channels/Kv3_1.channel.nml"/>
  <Include file="channels/Nap.channel.nml"/>
  <Include file="channels/SK.channel.nml"/>
  <Include file="channels/pas.channel.nml"/>
  <Include file="channels/NaTg/NaTg.channel.nml"/>
  <Include file="synapses/Gfluct.nml"/>
  <Component id="Gfluct_HL23PYR_0_5" type="Gfluct" start="0ms" stop="1000ms" dt="0.025ms" E_e="0mV" E_i="-80mV" g_e0="0.00010881560386620847 uS" g_i0="0pS" tau_e="65ms" tau_i="20ms" std_e="0.00010881560386620847 uS" std_i="0pS"/>
  <Component id="Gfluct_HL23SST_0_5" type="Gfluct" start="0ms" stop="1000ms" dt="0.025ms" E_e="0mV" E_i="-80mV" g_e0="4.9461638121003845e-05 uS" g_i0="0pS" tau_e="65ms" tau_i="20ms" std_e="4.9461638121003845e-05 uS" std_i="0pS"/>
  <Component id="Gfluct_HL23PV_0_5" type="Gfluct" start="0ms" stop="1000ms" dt="0.025ms" E_e="0mV" E_i="-80mV" g_e0="0.00046164195579603584 uS" g_i0="0pS" tau_e="65ms" tau_i="20ms" std_e="0.00046164195579603584 uS" std_i="0pS"/>
  <Component id="Gfluct_HL23VIP_0_5" type="Gfluct" start="0ms" stop="1000ms" dt="0.025ms" E_e="0mV" E_i="-80mV" g_e0="0.00010881560386620847 uS" g_i0="0pS" tau_e="65ms" tau_i="20ms" std_e="0.00010881560386620847 uS" std_i="0pS"/>
  <Component id="Gfluct_HL23PYR_0_1" type="Gfluct" start="0ms" stop="1000ms" dt="0.025ms" E_e="0mV" E_i="-80mV" g_e0="7.294128059299276e-05 uS" g_i0="0pS" tau_e="65ms" tau_i="20ms" std_e="7.294128059299276e-05 uS" std_i="0pS"/>
  <Component id="Gfluct_HL23PYR_0_3" type="Gfluct" start="0ms" stop="1000ms" dt="0.025ms" E_e="0mV" E_i="-80mV" g_e0="8.909068130001622e-05 uS" g_i0="0pS" tau_e="65ms" tau_i="20ms" std_e="8.909068130001622e-05 uS" std_i="0pS"/>
  <Component id="Gfluct_HL23PYR_0_7" type="Gfluct" start="0ms" stop="1000ms" dt="0.025ms" E_e="0mV" E_i="-80mV" g_e0="0.00013290767869305147 uS" g_i0="0pS" tau_e="65ms" tau_i="20ms" std_e="0.00013290767869305147 uS" std_i="0pS"/>
  <Component id="Gfluct_HL23PYR_0_9" type="Gfluct" start="0ms" stop="1000ms" dt="0.025ms" E_e="0mV" E_i="-80mV" g_e0="0.0001623338053363587 uS" g_i0="0pS" tau_e="65ms" tau_i="20ms" std_e="0.0001623338053363587 uS" std_i="0pS"/>
</Lems>
