<?xml version="1.0" encoding="UTF-8"?>
<neuroml xmlns="http://www.neuroml.org/schema/neuroml2"
    xmlns:xsi="http://www.w3.org/2001/XMLSchema-instance"
    xsi:schemaLocation="http://www.neuroml.org/schema/neuroml2 https://raw.github.com/NeuroML/NeuroML2/development/Schemas/NeuroML2/NeuroML_v2beta4.xsd"
    id = "NeuroML2_file_exported_from_NEURON">

  <notes> NeuroML 2 file generated from ModelView by: NEURON -- VERSION 8.0.2 (Fedora 37) master (f0ca745418e942ad4763bdc47459c409f0b11512) 2022-07-22
          Authors: Michael Hines, Sushil Kambampati and Padraig Gleeson,
          Yale University and UCL
  </notes>

  <cell id="NeuronTemplate_1_0">
    <notes>Cell: NeuronTemplate_1_0 exported from NEURON ModelView</notes>
    <morphology id="morphology">
<!-- Section: NeuronTemplate[0].soma[0] (segmentGroup: soma_0) which has 3 3D points, so 2 segment(s)-->
      <segment id="1" name = "Seg0_soma_0">
        <proximal x="608.193" y="557.609" z="30.8661" diameter="13.6136"/>
        <distal x="615" y="557.609" z="30.8661" diameter="13.6136"/>
      </segment>
      <segment id="2" name = "Seg1_soma_0">
        <parent segment="1"/>
        <distal x="621.806" y="557.609" z="30.8661" diameter="13.6136"/>
      </segment>
<!-- Section: NeuronTemplate[0].dend[32] (segmentGroup: dend_32) which has 5 3D points, so 4 segment(s)-->
      <segment id="2678" name = "Seg0_dend_32">  <!-- Connected at 0.5 on parent section: NeuronTemplate[0].soma[0]  -->
        <parent segment="0"/>
        <proximal x="618.888" y="560.916" z="36.6856" diameter="1.1744"/>
        <distal x="619.745" y="561.596" z="37.6242" diameter="1.0794"/>
      </segment>
      <segment id="2679" name = "Seg1_dend_32">
        <parent segment="2678"/>
        <distal x="620.634" y="562.276" z="38.4045" diameter="1.029"/>
      </segment>
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
<!-- Section: NeuronTemplate[0].soma[0] (segmentGroup: soma_0) which has 3 3D points, so 2 segment(s)-->

      <segmentGroup id = "soma_0"  neuroLexId="sao864921383">
         <notes>This group contains an unbranched set of segments, and all of the segmentGroups marked with
             neuroLexId = sao864921383 form a non-overlapping set of all of the segments.
             These segmentGroups correspond to the 'cables' of NeuroML v1.8.1, and map to/from NEURON sections.</notes>
        <member segment = "1"/>
        <member segment = "2"/>
      </segmentGroup>

<!-- Section: NeuronTemplate[0].dend[32] (segmentGroup: dend_32) which has 5 3D points, so 4 segment(s)-->

      <segmentGroup id = "dend_32"  neuroLexId="sao864921383">
         <notes>This group contains an unbranched set of segments, and all of the segmentGroups marked with
             neuroLexId = sao864921383 form a non-overlapping set of all of the segments.
             These segmentGroups correspond to the 'cables' of NeuroML v1.8.1, and map to/from NEURON sections.</notes>
        <member segment = "2678"/>
        <member segment = "2679"/>
        <member segment = "2680"/>
        <member segment = "2681"/>
      </segmentGroup>

<!-- Section: NeuronTemplate[0].dend[27] (segmentGroup: dend_27) which has 7 3D points, so 6 segment(s)-->

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
    </morphology>
  </cell>
  <cell id="NeuronTemplate_1_1">
    <notes>Cell: NeuronTemplate_1_1 exported from NEURON ModelView</notes>
    <morphology id="morphology">
<!-- Section: NeuronTemplate[1].soma[0] (segmentGroup: soma_0) which has 3 3D points, so 2 segment(s)-->
      <segment id="4481" name = "Seg0_soma_0">
        <proximal x="508.534" y="577.616" z="36.2701" diameter="12.584"/>
        <distal x="514.826" y="577.616" z="36.2701" diameter="12.584"/>
      </segment>
      <segment id="4482" name = "Seg1_soma_0">
        <parent segment="4481"/>
        <distal x="521.118" y="577.616" z="36.2701" diameter="12.584"/>
      </segment>
<!-- Section: NeuronTemplate[1].axon[0] (segmentGroup: axon_0) which has 0 3D points, so -1 segment(s)-->
<!-- Section: NeuronTemplate[1].apic[0] (segmentGroup: apic_0) which has 21 3D points, so 20 segment(s)-->
      <segment id="6090" name = "Seg0_apic_0">  <!-- Connected at 0.5 on parent section: NeuronTemplate[1].soma[0]  -->
        <parent segment="4480"/>
        <proximal x="512.124" y="572.201" z="39.0762" diameter="2.7456"/>
        <distal x="511.647" y="571.163" z="39.3817" diameter="2.7456"/>
      </segment>
      <segment id="6091" name = "Seg1_apic_0">
        <parent segment="6090"/>
        <distal x="511.162" y="570.126" z="39.5867" diameter="2.7456"/>
      </segment>
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
<!-- Section: NeuronTemplate[1].soma[0] (segmentGroup: soma_0) which has 3 3D points, so 2 segment(s)-->

      <segmentGroup id = "soma_0"  neuroLexId="sao864921383">
         <notes>This group contains an unbranched set of segments, and all of the segmentGroups marked with
             neuroLexId = sao864921383 form a non-overlapping set of all of the segments.
             These segmentGroups correspond to the 'cables' of NeuroML v1.8.1, and map to/from NEURON sections.</notes>
        <member segment = "4481"/>
        <member segment = "4482"/>
      </segmentGroup>

<!-- Section: NeuronTemplate[1].axon[0] (segmentGroup: axon_0) which has 0 3D points, so -1 segment(s)-->

      <segmentGroup id = "axon_0"  neuroLexId="sao864921383">
         <notes>This group contains an unbranched set of segments, and all of the segmentGroups marked with
             neuroLexId = sao864921383 form a non-overlapping set of all of the segments.
             These segmentGroups correspond to the 'cables' of NeuroML v1.8.1, and map to/from NEURON sections.</notes>
        <!-- This is currently inside (old convention) & outside (new convention) the <annotation> element, as some APIs have trouble reading what's inside <annotation> (<xs:any..> in Schema) -->
        <property tag="numberInternalDivisions" value="5"/> <!-- Discretization of model at time of export from NEURON. Can be overridden by importing application -->
        <annotation>
          <property tag="numberInternalDivisions" value="5"/> <!-- Discretization of model at time of export from NEURON. Can be overridden by importing application -->
        </annotation>
      </segmentGroup>

<!-- Section: NeuronTemplate[1].apic[0] (segmentGroup: apic_0) which has 21 3D points, so 20 segment(s)-->

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
    </morphology>
  </cell>

  <network id="network" type="networkWithTemperature" temperature="6 degC">
    <population id="Pop_NeuronTemplate_1_0" component="NeuronTemplate_1_0" size="1" type="populationList">
        <instance id="0">
            <location x="0" y="0" z="0"/>
        </instance>
    </population>
    <population id="Pop_NeuronTemplate_1_1" component="NeuronTemplate_1_1" size="1" type="populationList">
        <instance id="0">
            <location x="0" y="0" z="0"/>
        </instance>
    </population>
  </network>

</neuroml>
