<?xml version="1.0" encoding="UTF-8"?>
<neuroml xmlns="http://www.neuroml.org/schema/neuroml2"
    xmlns:xsi="http://www.w3.org/2001/XMLSchema-instance"
    xsi:schemaLocation="http://www.neuroml.org/schema/neuroml2 https://raw.github.com/NeuroML/NeuroML2/development/Schemas/NeuroML2/NeuroML_v2beta4.xsd"
    id = "NeuroML2_file_exported_from_NEURON">

  <notes> NeuroML 2 file generated from ModelView by: NEURON -- VERSION 8.0.2 (Fedora 37) master (f0ca745418e942ad4763bdc47459c409f0b11512) 2022-07-22
          Authors: Michael Hines, Sushil Kambampati and Padraig Gleeson,
          Yale University and UCL
  </notes>

  <cell id="NeuronTemplate_2_0">
    <notes>Cell: NeuronTemplate_2_0 exported from NEURON ModelView</notes>
    <morphology id="morphology">
<!-- Section: NeuronTemplate[1].soma[0] (segmentGroup: soma_0) which has 3 3D points, so 2 segment(s)-->
      <segment id="1" name = "Seg0_soma_0">
        <proximal x="508.534" y="577.616" z="36.2701" diameter="12.584"/>
        <distal x="514.826" y="577.616" z="36.2701" diameter="12.584"/>
      </segment>
      <segment id="2" name = "Seg1_soma_0">
        <parent segment="1"/>
        <distal x="521.118" y="577.616" z="36.2701" diameter="12.584"/>
      </segment>
<!-- Section: NeuronTemplate[1].axon[0] (segmentGroup: axon_0) which has 0 3D points, so -1 segment(s)-->
<!-- Section: NeuronTemplate[1].apic[0] (segmentGroup: apic_0) which has 21 3D points, so 20 segment(s)-->
      <segment id="1610" name = "Seg0_apic_0">  <!-- Connected at 0.5 on parent section: NeuronTemplate[1].soma[0]  -->
        <parent segment="0"/>
        <proximal x="512.124" y="572.201" z="39.0762" diameter="2.7456"/>
        <distal x="511.647" y="571.163" z="39.3817" diameter="2.7456"/>
      </segment>
      <segment id="1611" name = "Seg1_apic_0">
        <parent segment="1610"/>
        <distal x="511.162" y="570.126" z="39.5867" diameter="2.7456"/>
      </segment>
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
<!-- Section: NeuronTemplate[1].soma[0] (segmentGroup: soma_0) which has 3 3D points, so 2 segment(s)-->

      <segmentGroup id = "soma_0"  neuroLexId="sao864921383">
         <notes>This group contains an unbranched set of segments, and all of the segmentGroups marked with
             neuroLexId = sao864921383 form a non-overlapping set of all of the segments.
             These segmentGroups correspond to the 'cables' of NeuroML v1.8.1, and map to/from NEURON sections.</notes>
        <member segment = "1"/>
        <member segment = "2"/>
      </segmentGroup>

<!-- Section: NeuronTemplate[1].axon[0] (segmentGroup: axon_0) which has 0 3D points, so -1 segment(s)-->

      <segmentGroup id = "axon_0"  neuroLexId="sao864921383">
         <notes>This group contains an unbranched set of segments, and all of the segmentGroups marked with
             neuroLexId = sao864921383 form a non-overlapping set of all of the segments.
             These segmentGroups correspond to the 'cables' of NeuroML v1.8.1, and map to/from NEURON sections.</notes>
        <!-- This is currently inside (old convention) & outside (new convention) the <annotation> element, as some APIs have trouble reading what's inside <annotation> (<xs:any..> in Schema) -->
        <property tag="numberInternalDivisions" value="5"/> <!-- Discretization of model at time of export from NEURON. Can be overridden by importing application -->
        <annotation>
          <property tag="numberInternalDivisions" value="5"/> <!-- Discretization of model at time of export from NEURON. Can be overridden by importing application -->
        </annotation>
      </segmentGroup>

<!-- Section: NeuronTemplate[1].apic[0] (segmentGroup: apic_0) which has 21 3D points, so 20 segment(s)-->

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
    </morphology>
  </cell>
  <cell id="NeuronTemplate_2_1">
    <notes>Cell: NeuronTemplate_2_1 exported from NEURON ModelView</notes>
    <morphology id="morphology">
<!-- Section: NeuronTemplate[2].soma[0] (segmentGroup: soma_0) which has 3 3D points, so 2 segment(s)-->
      <segment id="5802" name = "Seg0_soma_0">
        <proximal x="289.84" y="985.039" z="19.04" diameter="16.7688"/>
        <distal x="298.225" y="985.039" z="19.04" diameter="16.7688"/>
      </segment>
      <segment id="5803" name = "Seg1_soma_0">
        <parent segment="5802"/>
        <distal x="306.609" y="985.039" z="19.04" diameter="16.7688"/>
      </segment>
<!-- Section: NeuronTemplate[2].axon[0] (segmentGroup: axon_0) which has 0 3D points, so -1 segment(s)-->
<!-- Section: NeuronTemplate[2].dend[31] (segmentGroup: dend_31) which has 2 3D points, so 1 segment(s)-->
      <segment id="7900" name = "Seg0_dend_31">  <!-- Connected at 0.5 on parent section: NeuronTemplate[2].soma[0]  -->
        <parent segment="5801"/>
        <proximal x="293.271" y="976.977" z="19.342" diameter="4.5382"/>
        <distal x="291.981" y="973.825" z="19.7117" diameter="2.677"/>
      </segment>
<!-- Section: NeuronTemplate[2].dend[18] (segmentGroup: dend_18) which has 6 3D points, so 5 segment(s)-->
      <segment id="6857" name = "Seg0_dend_18">  <!-- Connected at 0.5 on parent section: NeuronTemplate[2].soma[0]  -->
        <parent segment="5801"/>
        <proximal x="304.851" y="981.816" z="24.0299" diameter="1.8422"/>
        <distal x="306.909" y="980.853" z="24.9663" diameter="1.7006"/>
      </segment>
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
<!-- Section: NeuronTemplate[2].soma[0] (segmentGroup: soma_0) which has 3 3D points, so 2 segment(s)-->

      <segmentGroup id = "soma_0"  neuroLexId="sao864921383">
         <notes>This group contains an unbranched set of segments, and all of the segmentGroups marked with
             neuroLexId = sao864921383 form a non-overlapping set of all of the segments.
             These segmentGroups correspond to the 'cables' of NeuroML v1.8.1, and map to/from NEURON sections.</notes>
        <member segment = "5802"/>
        <member segment = "5803"/>
      </segmentGroup>

<!-- Section: NeuronTemplate[2].axon[0] (segmentGroup: axon_0) which has 0 3D points, so -1 segment(s)-->

      <segmentGroup id = "axon_0"  neuroLexId="sao864921383">
         <notes>This group contains an unbranched set of segments, and all of the segmentGroups marked with
             neuroLexId = sao864921383 form a non-overlapping set of all of the segments.
             These segmentGroups correspond to the 'cables' of NeuroML v1.8.1, and map to/from NEURON sections.</notes>
        <!-- This is currently inside (old convention) & outside (new convention) the <annotation> element, as some APIs have trouble reading what's inside <annotation> (<xs:any..> in Schema) -->
        <property tag="numberInternalDivisions" value="5"/> <!-- Discretization of model at time of export from NEURON. Can be overridden by importing application -->
        <annotation>
          <property tag="numberInternalDivisions" value="5"/> <!-- Discretization of model at time of export from NEURON. Can be overridden by importing application -->
        </annotation>
      </segmentGroup>

<!-- Section: NeuronTemplate[2].dend[31] (segmentGroup: dend_31) which has 2 3D points, so 1 segment(s)-->

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
    </morphology>
  </cell>

  <network id="network" type="networkWithTemperature" temperature="6 degC">
    <population id="Pop_NeuronTemplate_2_0" component="NeuronTemplate_2_0" size="1" type="populationList">
        <instance id="0">
            <location x="0" y="0" z="0"/>
        </instance>
    </population>
    <population id="Pop_NeuronTemplate_2_1" component="NeuronTemplate_2_1" size="1" type="populationList">
        <instance id="0">
            <location x="0" y="0" z="0"/>
        </instance>
    </population>
  </network>

</neuroml>
