<?xml version="1.0" encoding="UTF-8"?>
<neuroml xmlns="http://www.neuroml.org/schema/neuroml2"
    xmlns:xsi="http://www.w3.org/2001/XMLSchema-instance"
    xsi:schemaLocation="http://www.neuroml.org/schema/neuroml2 https://raw.github.com/NeuroML/NeuroML2/development/Schemas/NeuroML2/NeuroML_v2beta4.xsd"
    id = "NeuroML2_file_exported_from_NEURON">

  <notes> NeuroML 2 file generated from ModelView by: NEURON -- VERSION 8.0.2 (Fedora 37) master (f0ca745418e942ad4763bdc47459c409f0b11512) 2022-07-22
          Authors: Michael Hines, Sushil Kambampati and Padraig Gleeson,
          Yale University and UCL
  </notes>

  <cell id="NeuronTemplate_3_0">
    <notes>Cell: NeuronTemplate_3_0 exported from NEURON ModelView</notes>
    <morphology id="morphology">
<!-- Section: NeuronTemplate[2].soma[0] (segmentGroup: soma_0) which has 3 3D points, so 2 segment(s)-->
      <segment id="1" name = "Seg0_soma_0">
        <proximal x="289.84" y="985.039" z="19.04" diameter="16.7688"/>
        <distal x="298.225" y="985.039" z="19.04" diameter="16.7688"/>
      </segment>
      <segment id="2" name = "Seg1_soma_0">
        <parent segment="1"/>
        <distal x="306.609" y="985.039" z="19.04" diameter="16.7688"/>
      </segment>
<!-- Section: NeuronTemplate[2].axon[0] (segmentGroup: axon_0) which has 0 3D points, so -1 segment(s)-->
<!-- Section: NeuronTemplate[2].dend[31] (segmentGroup: dend_31) which has 2 3D points, so 1 segment(s)-->
      <segment id="2099" name = "Seg0_dend_31">  <!-- Connected at 0.5 on parent section: NeuronTemplate[2].soma[0]  -->
        <parent segment="0"/>
        <proximal x="293.271" y="976.977" z="19.342" diameter="4.5382"/>
        <distal x="291.981" y="973.825" z="19.7117" diameter="2.677"/>
      </segment>
<!-- Section: NeuronTemplate[2].dend[18] (segmentGroup: dend_18) which has 6 3D points, so 5 segment(s)-->
      <segment id="1056" name = "Seg0_dend_18">  <!-- Connected at 0.5 on parent section: NeuronTemplate[2].soma[0]  -->
        <parent segment="0"/>
        <proximal x="304.851" y="981.816" z="24.0299" diameter="1.8422"/>
        <distal x="306.909" y="980.853" z="24.9663" diameter="1.7006"/>
      </segment>
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
<!-- Section: NeuronTemplate[2].soma[0] (segmentGroup: soma_0) which has 3 3D points, so 2 segment(s)-->

      <segmentGroup id = "soma_0"  neuroLexId="sao864921383">
         <notes>This group contains an unbranched set of segments, and all of the segmentGroups marked with
             neuroLexId = sao864921383 form a non-overlapping set of all of the segments.
             These segmentGroups correspond to the 'cables' of NeuroML v1.8.1, and map to/from NEURON sections.</notes>
        <member segment = "1"/>
        <member segment = "2"/>
      </segmentGroup>

<!-- Section: NeuronTemplate[2].axon[0] (segmentGroup: axon_0) which has 0 3D points, so -1 segment(s)-->

      <segmentGroup id = "axon_0"  neuroLexId="sao864921383">
         <notes>This group contains an unbranched set of segments, and all of the segmentGroups marked with
             neuroLexId = sao864921383 form a non-overlapping set of all of the segments.
             These segmentGroups correspond to the 'cables' of NeuroML v1.8.1, and map to/from NEURON sections.</notes>
        <!-- This is currently inside (old convention) & outside (new convention) the <annotation> element, as some APIs have trouble reading what's inside <annotation> (<xs:any..> in Schema) -->
        <property tag="numberInternalDivisions" value="5"/> <!-- Discretization of model at time of export from NEURON. Can be overridden by importing application -->
        <annotation>
          <property tag="numberInternalDivisions" value="5"/> <!-- Discretization of model at time of export from NEURON. Can be overridden by importing application -->
        </annotation>
      </segmentGroup>

<!-- Section: NeuronTemplate[2].dend[31] (segmentGroup: dend_31) which has 2 3D points, so 1 segment(s)-->

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
    </morphology>
  </cell>
  <cell id="NeuronTemplate_3_1">
    <notes>Cell: NeuronTemplate_3_1 exported from NEURON ModelView</notes>
    <morphology id="morphology">
<!-- Section: NeuronTemplate[3].soma[0] (segmentGroup: soma_0) which has 3 3D points, so 2 segment(s)-->
      <segment id="3298" name = "Seg0_soma_0">
        <proximal x="305.172" y="263.232" z="28.84" diameter="16.9312"/>
        <distal x="313.638" y="263.232" z="28.84" diameter="16.9312"/>
      </segment>
      <segment id="3299" name = "Seg1_soma_0">
        <parent segment="3298"/>
        <distal x="322.104" y="263.232" z="28.84" diameter="16.9312"/>
      </segment>
<!-- Section: NeuronTemplate[3].dend[46] (segmentGroup: dend_46) which has 17 3D points, so 16 segment(s)-->
      <segment id="5948" name = "Seg0_dend_46">  <!-- Connected at 0.5 on parent section: NeuronTemplate[3].soma[0]  -->
        <parent segment="3297"/>
        <proximal x="313.578" y="256.004" z="31.6196" diameter="0.2288"/>
        <distal x="313.7" y="254.871" z="31.423" diameter="0.7032"/>
      </segment>
      <segment id="5949" name = "Seg1_dend_46">
        <parent segment="5948"/>
        <distal x="313.996" y="253.783" z="31.3071" diameter="0.714"/>
      </segment>
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
<!-- Section: NeuronTemplate[3].soma[0] (segmentGroup: soma_0) which has 3 3D points, so 2 segment(s)-->

      <segmentGroup id = "soma_0"  neuroLexId="sao864921383">
         <notes>This group contains an unbranched set of segments, and all of the segmentGroups marked with
             neuroLexId = sao864921383 form a non-overlapping set of all of the segments.
             These segmentGroups correspond to the 'cables' of NeuroML v1.8.1, and map to/from NEURON sections.</notes>
        <member segment = "3298"/>
        <member segment = "3299"/>
      </segmentGroup>

<!-- Section: NeuronTemplate[3].dend[46] (segmentGroup: dend_46) which has 17 3D points, so 16 segment(s)-->

      <segmentGroup id = "dend_46"  neuroLexId="sao864921383">
         <notes>This group contains an unbranched set of segments, and all of the segmentGroups marked with
             neuroLexId = sao864921383 form a non-overlapping set of all of the segments.
             These segmentGroups correspond to the 'cables' of NeuroML v1.8.1, and map to/from NEURON sections.</notes>
        <member segment = "5948"/>
        <member segment = "5949"/>
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      </segmentGroup>

<!-- Section: NeuronTemplate[3].dend[17] (segmentGroup: dend_17) which has 11 3D points, so 10 segment(s)-->

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
    </morphology>
  </cell>

  <network id="network" type="networkWithTemperature" temperature="6 degC">
    <population id="Pop_NeuronTemplate_3_0" component="NeuronTemplate_3_0" size="1" type="populationList">
        <instance id="0">
            <location x="0" y="0" z="0"/>
        </instance>
    </population>
    <population id="Pop_NeuronTemplate_3_1" component="NeuronTemplate_3_1" size="1" type="populationList">
        <instance id="0">
            <location x="0" y="0" z="0"/>
        </instance>
    </population>
  </network>

</neuroml>
