<Lems>

    <!--

        This LEMS file has been automatically generated using PyNeuroML v1.0.1 (libNeuroML v0.5.1)

     -->

    <!-- Specify which component to run -->
    <Target component="test_probUDF"/>

    <!-- Include core NeuroML2 ComponentType definitions -->
    <Include file="Cells.xml"/>
    <Include file="Networks.xml"/>
    <Include file="Simulation.xml"/>

    <Include file="ProbUDF.synapse.xml"/>
    <Include file="testProbUDF.net.nml"/>
    <Include file="passiveCell.cell.nml"/>

    <Simulation id="test_probUDF" length="500ms" step="0.01ms" target="TestNet" seed="123">  <!-- Note seed: ensures same random numbers used every run -->

        <OutputFile id="output1" fileName="test_probUDF.output.dat">
            <OutputColumn id="v" quantity="TestPop/0/0/v"/>
            <OutputColumn id="i" quantity="TestPop/0/0/synapses:probUDFSyn:0/i"/>
            <OutputColumn id="g" quantity="TestPop/0/0/synapses:probUDFSyn:0/g"/>
            <OutputColumn id="A" quantity="TestPop/0/0/synapses:probUDFSyn:0/A"/>
            <OutputColumn id="B" quantity="TestPop/0/0/synapses:probUDFSyn:0/B"/>
        </OutputFile>

    </Simulation>

</Lems>
