<neuroml xmlns="http://www.neuroml.org/schema/neuroml2"  xmlns:xs="http://www.w3.org/2001/XMLSchema" xmlns:xsi="http://www.w3.org/2001/XMLSchema-instance" xsi:schemaLocation="http://www.neuroml.org/schema/neuroml2 https://raw.github.com/NeuroML/NeuroML2/development/Schemas/NeuroML2/NeuroML_v2.3.xsd" id="test_probAMPANMDA">
    <include href="ProbAMPANMDA.synapsedef.nml"/>
    <include href="ProbAMPANMDA.synapse.nml"/>
    <izhikevich2007Cell id="izh2007RS0" C="100pF" v0="-60mV" k="0.7nS_per_mV" vr="-60mV" vt="-40mV" vpeak="35mV" a="0.03per_ms" b="-2nS" c="-50.0mV" d="100pA"/>
    <spikeArray id="spikeArray">
        <spike id="0" time="30 ms"/>
        <spike id="1" time="40 ms"/>
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    </spikeArray>
    <network id="TestNet">
        <population id="TestPop" component="izh2007RS0" size="1"/>
        <population id="SpikePop" component="spikeArray" size="1"/>
        <projection id="proj" presynapticPopulation="SpikePop" postsynapticPopulation="TestPop" synapse="probAMPANMDASyn">
            <connection id="0" preCellId="../SpikePop[0]" postCellId="../TestPop[0]"/>
        </projection>
    </network>
</neuroml>
